Simulations: Version=216
  Simulation Wheat
    Clock: Start=2023-01-01; End=2023-12-31
    Summary
    Weather
      FileName=/mnt/c/Users/user/Desktop/APSIMX_Main_Task/ApsimOptimization_Work_in_prog/data/calibration_weather/weather_zlata_2023.met
    SoilArbitrator
    MicroClimate: a_interception=0; b_interception=1; c_interception=0; d_interception=0; SoilHeatFluxFraction=0.4; MinimumHeightDiffForNewLayer=0; NightInterceptionFraction=0.5; ReferenceHeight=2
    Zone Field: Area=1; Slope=0; AspectAngle=0; Altitude=50
      Report: EventNames=[Clock].EndOfDay
        VariableNames:
          [Clock].Today
          [Wheat].LAI
          [Wheat].Phenology.Zadok.Stage
          [Wheat].Phenology.CurrentStageName
          [Wheat].AboveGround.Wt
          [Wheat].AboveGround.N
          [Wheat].Grain.Total.Wt*10 as Yield
          [Wheat].Grain.Protein
          [Wheat].Grain.Size
          [Wheat].Grain.Number
          [Wheat].Grain.Total.Wt
          [Wheat].Grain.Total.N
          [Wheat].Total.Wt
          [Soil].Swim3.Drainage as Drainage
          [Soil].Swim3.Runoff as Runoff
          [Soil].Swim3.Pond as PondDepth
          [Soil].Swim3.PAW as PAW
          [Soil].Swim3.WaterTable
          sum([Soil].Water.MM) as WaterStored
          [Soil].Swim3.Runoff as Runoff[Soil].Water.Volumetric as SW
          sum([NO3].kgha + [NH4].kgha + [Urea].kgha) as MineralN
          [Denitrification].Value + [Denitrification].Natm
          [NFlow].Natm
          sum([Nutrient].Organic.C) as OrganicC
          [SnowManager].Script.SWE as SnowSWE
          [SnowManager].Script.Snowfall as Snowfall
          [SnowManager].Script.Melt as SnowMelt
          [SnowManager].Script.RainToApsim as RainToApsim
      Fertiliser
      Soil: ASCOrder=Vertosol; ASCSubOrder=Black; SoilType=Clay; Site=Norwin; NearestTown=Norwin; Region=Darling Downs and Granite Belt; State=Queensland; Country=Russia; NaturalVegetation=Qld. Bluegrass, possible Qld. Blue gum; ApsoilNumber=900; Latitude=56.77719; Longitude=36.11066; LocationAccuracy=+/- 20m; YearOfSampling=0; DataSource=Hydrology v2 empirical topsoil sensitivity ensemble
        Comments=Top 0-30 cm AirDry/LL15 hypotheses are quantile-derived from 2023 field-3 0-20 cm water observations; DUL includes an explicit +0.03 sensitivity margin. Deep profile and hydraulic conductivity remain inherited and unvalidated.
        Organic: FOMCNRatio=40; CarbonUnits=Total
          Thickness  Carbon  SoilCNRatio  FBiom  FInert  FOM
          150        1.2     12           0.04   0.4     347.129
          150        0.96    12           0.02   0.6     270.344
          300        0.6     12           0.02   0.8     163.972
          300        0.3     12           0.02   1       99.4541
          300        0.18    12           0.01   1       60.322
          300        0.12    12           0.01   1       36.5871
          300        0.12    12           0.01   1       22.1912
        Chemical: Thickness=[150, 150, 300, 300, 300, 300, 300]; PH=[8, 8, 8, 8, 8, 8, 8]; PHUnits=Water
        Water: Thickness=[150, 150, 300, 300, 300, 300, 300]; FilledFromTop=false
          InitialValues=[0.48, 0.48, 0.488438, 0.480297, 0.471584, 0.457071, 0.452332]
        Nutrient
        Solute NO3: InitialValuesUnits=ppm; WaterTableConcentration=0; D0=0; DepthConstant=0; MaxDepthSoluteAccessible=0; RunoffEffectivenessAtMovingSolute=0; MaxEffectiveRunoff=0
          Thickness  InitialValues  Exco  FIP
          150        1              0     1
          150        1              0     1
          300        1              0     1
          300        1              0     1
          300        1              0     1
          300        1              0     1
          300        1              0     1
        Solute NH4: InitialValuesUnits=ppm; WaterTableConcentration=0; D0=0.05; DepthConstant=0; MaxDepthSoluteAccessible=0; RunoffEffectivenessAtMovingSolute=0; MaxEffectiveRunoff=0
          Thickness  InitialValues  Exco  FIP
          150        0.1            0     1
          150        0.1            0     1
          300        0.1            0     1
          300        0.1            0     1
          300        0.1            0     1
          300        0.1            0     1
          300        0.1            0     1
        Solute Urea: InitialValuesUnits=kg/ha; WaterTableConcentration=0; D0=0.05; DepthConstant=0; MaxDepthSoluteAccessible=0; RunoffEffectivenessAtMovingSolute=0; MaxEffectiveRunoff=0
          Thickness  InitialValues  Exco  FIP
          150        0              0     1
          150        0              0     1
          300        0              0     1
          300        0              0     1
          300        0              0     1
          300        0              0     1
          300        0              0     1
        SoilTemperature: InteractionsPerDay=8
        LayerStructure: Thickness=[150, 150, 300, 300, 300, 300, 300]
        CERESSoilTemperature
        Physical
          Thickness  ParticleSizeSand  ParticleSizeSilt  ParticleSizeClay  Rocks  BD       AirDry     LL15       DUL       SAT       KS
          150        52.31             33.03             14.66             0      1.19453  0.0693659  0.0956775  0.48      0.549234  20
          150        81.61             10.68             7.71              0      1.19453  0.0693659  0.0956775  0.48      0.549234  20
          300        40                30                30                0      0.865    0.28       0.28       0.488438  0.557193  20
          300        40                30                30                0      0.865    0.28       0.28       0.480297  0.532787  20
          300        40                30                30                0      0.865    0.28       0.28       0.471584  0.527354  20
          300        40                30                30                0      0.865    0.28       0.28       0.457071  0.53118   20
          300        40                30                30                0      0.865    0.28       0.28       0.452332  0.521888  20
          SoilCrop WheatSoil: LL=[0.0956775, 0.0956775, 0.28, 0.306, 0.36, 0.392, 0.446]; KL=[0.06, 0.06, 0.06, 0.04, 0.04, 0.02, 0.01]; XF=[1, 1, 1, 1, 1, 1, 1]
        Swim3: Salb=0.13; CN2Bare=50; CNRed=20; CNCov=0.8; KDul=1; PSIDul=-100; VC=true; DTMin=0; DTMax=60; MaxWaterIncrement=5; SpaceWeightingFactor=0; SoluteSpaceWeightingFactor=1; Dis=0; Disp=1; A=2; DTHC=0.1; DTHP=2; vcon1=7.28e-09; vcon2=7.26e-07; eo_time=06:00; eo_durn=720; default_rain_time=00:00; default_rain_duration=720; Diagnostics=false
      SurfaceOrganicMatter: InitialResidueName=wheat_stubble; InitialResidueType=wheat; InitialResidueMass=500; InitialStandingFraction=0; InitialCPR=0; InitialCNR=100
      Plant Wheat
        Cultivar Zlata
          Command:
            [Phenology].HeadEmergencePpSensitivity.FixedValue = 2.0
            [Phenology].Phyllochron.BasePhyllochron.FixedValue = 75
            [Leaf].ExtinctionCoeff.VegetativePhase.FixedValue = 0.8
            [Phenology].PhyllochronPpSensitivity.FixedValue = 0.4
            [Phenology].CAMP.FLNparams.MinLN = 5
            [Phenology].CAMP.FLNparams.PpLN = 2.5
            [Phenology].CAMP.FLNparams.VrnLN = 7
            [Phenology].CAMP.FLNparams.VxPLN = 0.0
            [Phenology].GrainFilling.Target.FixedValue = 250
            [Phenology].GrainRipening.Target.FixedValue = 100
        Cultivar Irgina
          Command:
            [Phenology].HeadEmergencePpSensitivity.FixedValue = 2.0
            [Phenology].Phyllochron.BasePhyllochron.FixedValue = 50
            [Leaf].ExtinctionCoeff.VegetativePhase.FixedValue = 0.8
            [Phenology].PhyllochronPpSensitivity.FixedValue = 0.4
            [Phenology].CAMP.FLNparams.MinLN = 5
            [Phenology].CAMP.FLNparams.PpLN = 2.5
            [Phenology].CAMP.FLNparams.VrnLN = 7
            [Phenology].CAMP.FLNparams.VxPLN = 0.0
            [Phenology].GrainFilling.Target.FixedValue = 225
            [Phenology].GrainRipening.Target.FixedValue = 100
      Manager Sow using a variable rule
        Crop = [Wheat]
        StartDate = 1-may
        EndDate = 30-may
        MinESW = 100
        MinRain = 25
        RainDays = 7
        CultivarName = Otane
        SowingDepth = 30
        RowSpacing = 250
        Population = 250
```csharp
using APSIM.Numerics;
using Models.Climate;
using System.Linq;
using System;
using Models.Core;
using Models.PMF;
using Models.Soils;
using Models.Utilities;
using APSIM.Shared.Utilities;
using Models.Interfaces;

namespace Models
{
    [Serializable]
    public class Script : Model
    {
        [Link] private Clock Clock;
        [Link] private Fertiliser Fertiliser;
        [Link] private Summary Summary;
        [Link] private Soil Soil;
        private Accumulator accumulatedRain;
        [Link]
        private Swim3 swim;
        
        [Description("Crop")]
        public IPlant Crop { get; set; }

        [Description("Start of sowing window (d-mmm)")]
        public string StartDate { get; set; }

        [Description("End of sowing window (d-mmm)")]
        public string EndDate { get; set; }

        [Description("Minimum extractable soil water for sowing (mm)")]
        public double MinESW { get; set; }

        [Description("Accumulated rainfall required for sowing (mm)")]
        public double MinRain { get; set; }

        [Description("Duration of rainfall accumulation (d)")]
        public int RainDays { get; set; }

        [Display(Type = DisplayType.CultivarName)]
        [Description("Cultivar to be sown")]
        public string CultivarName { get; set; }

        [Description("Sowing depth (mm)")]
        public double SowingDepth { get; set; }

        [Description("Row spacing (mm)")]
        public double RowSpacing { get; set; }

        [Description("Plant population (/m2)")]
        public double Population { get; set; }
        
        
        [EventSubscribe("StartOfSimulation")]
        private void OnSimulationCommencing(object sender, EventArgs e)
        {
            accumulatedRain = new Accumulator(this, "[Weather].Rain", RainDays);
        }

        [EventSubscribe("DoManagement")]
        private void OnDoManagement(object sender, EventArgs e)
        {
            accumulatedRain.Update();
            
            if (DateUtilities.WithinDates(StartDate, Clock.Today, EndDate) &&
                !Crop.IsAlive &&
                MathUtilities.Sum(swim.ESW) > MinESW &&
                accumulatedRain.Sum > MinRain)
            {
                Crop.Sow(population: Population, cultivar: CultivarName, depth: SowingDepth, rowSpacing: RowSpacing);    
            }
        }
    }
}
```
      Manager Fertilise at sowing
        Crop = [Wheat]
        FertiliserType = NO3N
        Amount = 80
```csharp
using Models.Soils;
using System;
using System.Linq;
using Models.Core;
using Models.PMF;
namespace Models
{
    [Serializable]
    public class Script : Model
    {
        [Link] Clock Clock;
        [Link] Fertiliser Fertiliser;
        
        [Description("Crop to be fertilised")]
        public IPlant Crop { get; set; }

        [Description("Type of fertiliser to apply? ")] 
        [Display(Type = DisplayType.FertiliserType)]public string FertiliserType { get; set; }
    
        [Description("Amount of fertiliser to be applied (kg/ha)")]
        public double Amount { get; set; }
        
        [EventSubscribe("Sowing")]
        private void OnSowing(object sender, EventArgs e)
        {
            Model crop = sender as Model;
            if (Crop != null && crop.Name.ToLower() == (Crop as IModel).Name.ToLower())
                Fertiliser.Apply(amount: Amount, type: FertiliserType);
        }
    }
}
```
      Manager Harvest
        Crop = [Wheat]
```csharp
using APSIM.Shared.Utilities;
using Models.Utilities;
using Models.Soils;
using Models.PMF;
using Models.Core;
using System;
using System.Linq;

namespace Models
{
    [Serializable] 
    public class Script : Model
    {
        [Description("Crop")]
        public IPlant Crop { get; set; }
        
        [EventSubscribe("DoManagement")]
        private void OnDoManagement(object sender, EventArgs e)
        {
            if (Crop.IsReadyForHarvesting)
            {
                Crop.Harvest();
                Crop.EndCrop();
            }
        }
    }
}
```
      Manager SWIMSetLowerBC
        LowerBCType = gradient
        LowerBCValue = -500
```csharp
using Models.Climate;
using APSIM.Shared.Utilities;
using Models.Soils.Nutrients;
using Models.Soils;
using Models.PMF;
using Models.Core;
using System.Xml.Serialization;
using System;
using System.Linq;
using Models.AgPasture;
using Models.Interfaces;

namespace Models
{
    [Serializable] 
    [System.Xml.Serialization.XmlInclude(typeof(Model))]
    public class Script : Model
    {
        [Link] Clock clock;
        [Link] ISummary summary;
        [Link] private Swim3 swim;
        //[Link] private PastureSpecies ryegrass;
        //[Link] private SimpleGrazing grazing;
        
        public enum LowerBCTypeOptions {gradient,seepage,potential};

        [Separator("Sets the lower boundary condition type (and value if set to 'potential' for SWIM3. The change is applied at the beginning of the first day of the simulation.")]
        [Description("[Get a dropdown] What lower boundary condition is wanted?")] public LowerBCTypeOptions LowerBCType { get; set; }
        [Description("If 'potential', then what potential? (mm) ")] public double LowerBCValue { get; set; }

        public double SoilWaterStart  { get; set; }
        public double SoilWaterEnd  { get; set; }

        [EventSubscribe("DoDailyInitialisation")]
        private void DoDailyInitialisation(object sender, EventArgs e)
        {
        }

        [EventSubscribe("DoReportCalculations")]
        private void DoReportCalculations(object sender, EventArgs e)
        {
        }

        [EventSubscribe("DoManagement")]
        private void DoDailyCalculations(object sender, EventArgs e)
        {
            if (clock.Today == clock.StartDate)
            {
                summary.WriteMessage(this, "Script is setting lower boundary condition to " + LowerBCType, MessageType.Diagnostic);
                if (LowerBCType == LowerBCTypeOptions.gradient)
                    swim.SetLowerBCForGradient(bbcGradient: 0.0);   // in cm/cm (ibbc=0) Note that this is the default setting
                else if (LowerBCType == LowerBCTypeOptions.potential)
                    swim.SetLowerBCForGivenPotential(bbcPotential: LowerBCValue /10.0 );    //  convert to cm (ibbc=1), DUL is -100 cm so values more positive will often result in inflow to the bottom of the soil profile. Input in mm so divide here.
                else if (LowerBCType == LowerBCTypeOptions.seepage)
                    swim.SetLowerBCForSeepage(bbcPotentialSeepage: 0.0);  // in cm (ibbc=3). This is for zero-tension lysimeters
                else
                    throw new Exception("Wrong lower boundary condition type");
            }
        }
    }
}
```
      Manager Synchroniser (disabled)
        Identifier = <undefined>
```csharp
using APSIM.Core;
using APSIM.Shared.Utilities;
using NetMQ.Sockets;
using NetMQ;
using System.Collections.Generic;
using System.IO;
using MessagePack;
using Models.Functions;
using Models.Utilities;
using Models.Surface;
using Models.Soils;
using Models.PMF;
using Models.Core;
using System;
using System.Linq;
using Models.Soils.Nutrients;

namespace Models
{
    [Serializable]
    public class Script : Model, IStructureDependency
    {
        [Link] private Clock clock;
        [Link] private Simulation simulation;
        [Link] private Summary Summary;
        [NonSerialized] private DealerSocket connection;
        public IStructure Structure { private get; set; }

        [Description("Identifier")]
        public string Identifier { get; set; }

        [NonSerialized] private bool pausedAfterWaterToday = false;

        

        [EventSubscribe("StartOfSimulation")]
        private void OnSimulationCommencing(object sender, EventArgs e)
        {
            if (Identifier == "<undefined>")
            {
                Console.WriteLine("Need an endpoint to connect to");
                Summary.WriteMessage(this, "Need an endpoint to connect to", MessageType.Error);
                return;
            }
            Identifier = "tcp://" + Identifier;
            connection = new DealerSocket(Identifier);
            connection.SendFrame("connect");
            var msg = connection.ReceiveFrameString();
            if (msg != "ok") throw new Exception("Expected ok");
        }

        [EventSubscribe("StartOfDay")]
        private void OnStartOfDay(object s, EventArgs e) => pausedAfterWaterToday = false;

        // --- Пауза сразу после DoSoilWaterMovement ---
        [EventSubscribe("DoSoilWaterMovement")]
        private void OnAfterSoilWaterMovement(object s, EventArgs e)
        {
            if (connection == null || pausedAfterWaterToday) return;
            pausedAfterWaterToday = true;

            connection.SendFrame("paused1");
            bool moreToDo = true;
            while (moreToDo)
            {
                var msg = connection.ReceiveMultipartMessage();
                if (msg == null || msg.FrameCount == 0) continue;

                var command = msg[0].ConvertToString();
                switch (command)
                {
                    case "resume1":
                        moreToDo = false;
                        break;
                    case "put":
                        RequireParts(msg, 3, "put");
                        ProcessPutCommand(msg);
                        break;
                    case "get":
                        RequireParts(msg, 2, "get");
                        ProcessReadCommand(msg);
                        break;
                    default:
                        throw new Exception("Expected resume1/get/put/do during paused1, not '" + command + "'");
                }
            }
            Summary?.WriteMessage(this, "Resumed after paused1", MessageType.Information);
        }

        [EventSubscribe("EndOfDay")]
        private void OnEndOfDay(object sender, EventArgs e)
        {
            if (connection == null) return;

            connection.SendFrame("paused");
            bool moreToDo = true;
            while (moreToDo)
            {
                var msg = connection.ReceiveMultipartMessage();
                if (msg == null || msg.FrameCount == 0) continue;

                var command = msg[0].ConvertToString();
                switch (command)
                {
                    case "resume":
                        moreToDo = false;
                        break;
                    case "put":
                        RequireParts(msg, 3, "put");
                        ProcessPutCommand(msg);
                        break;
                    case "get":
                        RequireParts(msg, 2, "get");
                        ProcessReadCommand(msg);
                        break;
                    default:
                        throw new Exception("Expected resume/get/put, not '" + command + "'");
                }
            }
        }

        [EventSubscribe("EndOfSimulation")]
        private void OnSimulationEnding(object sender, EventArgs e)
        {
            if (connection == null) return;

            connection.SendFrame("finished");
            var msg = connection.ReceiveFrameString();
            if (msg != "ok") throw new Exception("Expected ok at end");
            connection.Close();
            Console.WriteLine("Simulation Ending");
        }

        // ==========================
        //        Общие методы
        // ==========================

        private void ProcessPutCommand(NetMQMessage msg)
        {
            // msg[1] — packed string variableName; msg[2] — packed object value
            string variableName = MessagePackSerializer.Deserialize<string>(msg[1].Buffer);

            // Что за тип у переменной в APSIM
            var targetObj = Structure.Get(variableName, relativeTo: simulation);
            if (targetObj == null)
                throw new Exception($"Variable '{variableName}' not found in simulation.");
            var targetType = targetObj.GetType();

            object incoming = MessagePackSerializer.Deserialize<object>(msg[2].Buffer);

            // Проверка согласованности массив/скаляр
            if (incoming.GetType().IsArray != targetType.IsArray)
                throw new Exception("Array/scalar mismatch for " + variableName);

            if (targetType.IsArray)
            {
                Type elemType = targetType.GetElementType();
                var incomingArray = (incoming as object[]) ?? throw new Exception("Expected array payload for " + variableName);

                if (IsNumeric(elemType))
                {
                    var casted = Array.ConvertAll(incomingArray, e => (double)e);
                    Structure.Set(variableName, casted, relativeTo: simulation);
                }
                else if (IsInteger(elemType))
                {
                    var casted = Array.ConvertAll(incomingArray, e => (int)e);
                    Structure.Set(variableName, casted, relativeTo: simulation);
                }
                else if (IsString(elemType))
                {
                    var casted = Array.ConvertAll(incomingArray, e => (string)e);
                    Structure.Set(variableName, casted, relativeTo: simulation);
                }
                else
                {
                    throw new Exception("Don't know what to do setting an array of " + elemType);
                }
            }
            else
            {
                Structure.Set(variableName, Convert.ChangeType(incoming, targetType), relativeTo: simulation);
            }

            connection.SendFrame("ok");
        }

        private void ProcessReadCommand(NetMQMessage msg)
        {
            // msg[1] — packed string variableName
            string variableName = MessagePackSerializer.Deserialize<string>(msg[1].Buffer);

            object value = Structure.Get(variableName, relativeTo: simulation);

            if (value is IFunction fun)
            {
                value = fun.Value();
            }
            else if (value != null && (value.GetType().IsArray || value.GetType().IsClass))
            {
                try
                {
                    value = ReflectionUtilities.Clone(value);
                }
                catch (Exception err)
                {
                    throw new Exception(
                        $"Cannot report variable \"{variableName}\": Variable is a non-reportable type: \"{value?.GetType()?.Name}\".", err);
                }
            }

            byte[] bytes = MessagePackSerializer.Serialize(value ?? "NA");
            connection.SendFrame(bytes);
        }

        private static void RequireParts(NetMQMessage msg, int expected, string cmd)
        {
            if (msg.FrameCount != expected)
                throw new Exception($"Command '{cmd}' expects {expected} frames, got {msg.FrameCount}.");
        }

        private static bool IsNumeric(Type type)
        {
            switch (Type.GetTypeCode(type))
            {
                case TypeCode.Double:
                case TypeCode.Single:
                    return true;
                default:
                    return false;
            }
        }

        private static bool IsInteger(Type type)
        {
            switch (Type.GetTypeCode(type))
            {
                case TypeCode.Int16:
                case TypeCode.Int32:
                case TypeCode.Int64:
                case TypeCode.UInt16:
                case TypeCode.UInt32:
                case TypeCode.UInt64:
                    return true;
                default:
                    return false;
            }
        }

        private static bool IsString(Type type) => Type.GetTypeCode(type) == TypeCode.String;
    }
}
```
      Manager SnowManager
        SnowTemperature = -1.0
        RainTemperature = 1.0
        MeltTemperature = 0.0
        DegreeDayFactor = 2.0
        InitialSWE = 0.0
```csharp
using System;
using Models.Core;
using Models.Climate;

namespace Models
{
    [Serializable]
    public class Script : Model
    {
        [Link] private Weather weather = null;
        public double SnowTemperature { get; set; } = -1.0;
        public double RainTemperature { get; set; } = 1.0;
        public double MeltTemperature { get; set; } = 0.0;
        public double DegreeDayFactor { get; set; } = 3.0;
        public double InitialSWE { get; set; } = 0.0;
        private const double MinLookupTemperature = -50.0;
        private const double MaxLookupTemperature = 50.0;
        private const double LookupStep = 0.1;
        private double[] snowFractionLookup;
        private double[] meltLookup;
        [Units("mm")] public double SWE { get; private set; }
        [Units("°C")] public double MeanTemperature { get; private set; }
        [Units("mm")] public double OriginalPrecipitation { get; private set; }
        [Units("mm")] public double Snowfall { get; private set; }
        [Units("mm")] public double LiquidRain { get; private set; }
        [Units("mm")] public double PotentialMelt { get; private set; }
        [Units("mm")] public double Melt { get; private set; }
        [Units("mm")] public double RainToApsim { get; private set; }
        public double SnowFraction { get; private set; }

        [EventSubscribe("StartOfSimulation")]
        private void OnStartOfSimulation(object sender, EventArgs e)
        {
            SWE = InitialSWE;
            BuildLookupTables();
            weather.PreparingNewWeatherData += OnPreparingNewWeatherData;
        }

        private void BuildLookupTables()
        {
            if (RainTemperature <= SnowTemperature)
                throw new Exception("RainTemperature must be greater than SnowTemperature.");
            if (DegreeDayFactor < 0.0)
                throw new Exception("DegreeDayFactor cannot be negative.");
            int count = (int)Math.Round((MaxLookupTemperature - MinLookupTemperature) / LookupStep) + 1;
            snowFractionLookup = new double[count];
            meltLookup = new double[count];
            for (int i = 0; i < count; i++)
            {
                double temperature = MinLookupTemperature + i * LookupStep;
                if (temperature <= SnowTemperature) snowFractionLookup[i] = 1.0;
                else if (temperature >= RainTemperature) snowFractionLookup[i] = 0.0;
                else snowFractionLookup[i] = (RainTemperature - temperature) /
                                             (RainTemperature - SnowTemperature);
                meltLookup[i] = temperature <= MeltTemperature
                    ? 0.0 : DegreeDayFactor * (temperature - MeltTemperature);
            }
        }

        private int GetTemperatureIndex(double temperature)
        {
            temperature = Math.Max(MinLookupTemperature, Math.Min(MaxLookupTemperature, temperature));
            return (int)Math.Round((temperature - MinLookupTemperature) / LookupStep);
        }

        private void OnPreparingNewWeatherData(object sender, EventArgs e)
        {
            MeanTemperature = (weather.MaxT + weather.MinT) / 2.0;
            int index = GetTemperatureIndex(MeanTemperature);
            OriginalPrecipitation = weather.Rain;
            SnowFraction = snowFractionLookup[index];
            Snowfall = OriginalPrecipitation * SnowFraction;
            LiquidRain = OriginalPrecipitation - Snowfall;
            SWE += Snowfall;
            PotentialMelt = meltLookup[index];
            Melt = Math.Min(SWE, PotentialMelt);
            SWE = Math.Max(0.0, SWE - Melt);
            RainToApsim = LiquidRain + Melt;
            weather.Rain = RainToApsim;
        }

        [EventSubscribe("Completed")]
        private void OnCompleted(object sender, EventArgs e)
        {
            weather.PreparingNewWeatherData -= OnPreparingNewWeatherData;
        }
    }
}
```
  DataStore: FileName=01_measured_bd_top30.db
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