Simulations: Version=216
  Simulation Wheat
    Clock: Start=2019-01-01; End=2023-12-31
    Summary
    Weather: FileName=weather_2019_2023_normalized.met
    SoilArbitrator
    MicroClimate: a_interception=0; b_interception=1; c_interception=0; d_interception=0; SoilHeatFluxFraction=0.4; MinimumHeightDiffForNewLayer=0; NightInterceptionFraction=0.5; ReferenceHeight=2
    Zone Field1: Area=1; Slope=0; AspectAngle=0; Altitude=50; CanopyType=BroadAcre
      Report Report1: EventNames=[Clock].EndOfDay
        VariableNames:
          [Clock].Today
          [Wheat].LAI as WheatLAI
          [Wheat].Phenology.Zadok.Stage as WheatZadok
          [Wheat].Phenology.CurrentStageName as WheatStage
          [Wheat].AboveGround.Wt as WheatAGWt
          [Wheat].AboveGround.N as WheatAGN
          [Wheat].Grain.Total.Wt*10 as WheatYield
          [Wheat].Grain.Protein as WheatProtein
          [Wheat].Grain.Size as WheatSize
          [Wheat].Grain.Number as WheatNumber
          [Wheat].Grain.Total.Wt as WheatGrainWt
          [Wheat].Grain.Total.N as WheatGrainN
          [Wheat].Total.Wt as WheatTotalWt
          [RedClover].LAI as CloverLAI
          [RedClover].Phenology.CurrentStageName as CloverStage
          [RedClover].AboveGround.Wt as CloverAGWt
          [RedClover].AboveGround.N as CloverAGN
          [RedClover].Total.Wt as CloverTotalWt
          [RedClover].AboveGround.Wt*10 as CloverYield
          [PlantainForage].LAI as PlantainLAI
          [PlantainForage].AboveGround.Wt as PlantainAGWt
          [PlantainForage].AboveGround.N as PlantainAGN
          [PlantainForage].Total.Wt as PlantainTotalWt
          [PlantainForage].AboveGround.Wt*10 as PlantainYield
          [RedClover].AboveGround.Wt + [PlantainForage].AboveGround.Wt as MixAGWt
          ([RedClover].AboveGround.Wt + [PlantainForage].AboveGround.Wt)*10 as MixYield
          [RedClover].AboveGround.N + [PlantainForage].AboveGround.N as MixAGN
          [Oats].LAI as OatsLAI
          [Oats].Phenology.Zadok.Stage as OatsZadok
          [Oats].Phenology.CurrentStageName as OatsStage
          [Oats].AboveGround.Wt as OatsAGWt
          [Oats].AboveGround.N as OatsAGN
          [Oats].Grain.Total.Wt*10 as OatsYield
          [Oats].Grain.Total.Wt as OatsGrainWt
          [Oats].Total.Wt as OatsTotalWt
          [Potato].LAI as PotatoLAI
          [Potato].Phenology.CurrentStageName as PotatoStage
          [Potato].AboveGround.Wt as PotatoAGWt
          [Potato].AboveGround.N as PotatoAGN
          [Potato].Total.Wt as PotatoTotalWt
          [Potato].Tuber.Total.Wt*10 as PotatoYield
          [Potato].Tuber.Total.Wt as PotatoTuberWt
          [Rape].LAI as RapeLAI
          [Rape].Phenology.CurrentStageName as RapeStage
          [Rape].AboveGround.Wt as RapeAGWt
          [Rape].AboveGround.N as RapeAGN
          [Rape].Total.Wt as RapeTotalWt
          [Rape].Grain.Total.Wt*10 as RapeYield
          [Rape].Grain.Total.Wt as RapeGrainWt
          [Mustard].LAI as MustardLAI
          [Mustard].Phenology.CurrentStageName as MustardStage
          [Mustard].AboveGround.Wt as MustardAGWt
          [Mustard].AboveGround.N as MustardAGN
          [Mustard].Total.Wt as MustardTotalWt
          [Mustard].Grain.Total.Wt*10 as MustardYield
          [Mustard].Grain.Total.Wt as MustardGrainWt
          [Soil].Swim3.Drainage as Drainage
          [Soil].Swim3.Runoff as Runoff
          [Soil].Swim3.Pond as PondDepth
          [Soil].Swim3.PAW as PAW
          sum([Soil].Water.MM) as WaterStored
          [Soil].Water.Volumetric as SW
          sum([NO3].kgha + [NH4].kgha + [Urea].kgha) as MineralN
          [Denitrification].Value + [Denitrification].Natm as Denitrification
          [NFlow].Natm as NFlow
          sum([Nutrient].Organic.C) as OrganicC
      Fertiliser
      Soil: ASCOrder=Vertosol; ASCSubOrder=Black; SoilType=Clay; Site=Norwin; NearestTown=Norwin; Region=Darling Downs and Granite Belt; State=Queensland; Country=Russia; NaturalVegetation=Qld. Bluegrass, possible Qld. Blue gum; ApsoilNumber=900; Latitude=56.77719; Longitude=56.11066; LocationAccuracy=+/- 20m; YearOfSampling=0
        DataSource=CSIRO Sustainable Ecosystems, Toowoomba; Characteriesd as part of the GRDC funded project"Doing it better, doing it smarter, managing soil water in Australian agriculture' 2011
        Comments=Clay - OC, CLL for all crops estimated-based on Bongeen Mywybilla Soil No1
        Organic: FOMCNRatio=30; CarbonUnits=Total
          Thickness  Carbon  SoilCNRatio  FBiom  FInert  FOM
          150        1.44    12           0.06   0.35    347.129
          150        1.16    12           0.04   0.55    270.344
          300        1.04    12           0.03   0.75    163.972
          300        0.93    12           0.02   1       99.4541
          300        0.81    12           0.01   1       60.322
          300        0.73    12           0.01   1       36.5871
          300        0.5     12           0.01   1       22.1912
        Chemical: Thickness=[150, 150, 300, 300, 300, 300, 300]; PH=[5.09, 5.09, 5, 5, 5, 5, 5]; PHUnits=Water
        Water: Thickness=[150, 150, 300, 300, 300, 300, 300]; InitialValues=[0.28545, 0.265526, 0.2999, 0.299, 0.298, 0.2968, 0.2967]; FilledFromTop=false
        Nutrient
        Solute NO3: InitialValuesUnits=ppm; WaterTableConcentration=0; D0=0; DepthConstant=0; MaxDepthSoluteAccessible=0; RunoffEffectivenessAtMovingSolute=0; MaxEffectiveRunoff=0
          Thickness  InitialValues  Exco  FIP
          150        4              0     1
          150        3.5            0     1
          300        3              0     1
          300        2              0     1
          300        1.5            0     1
          300        1              0     1
          300        0.5            0     1
        Solute NH4: InitialValuesUnits=ppm; WaterTableConcentration=0; D0=0.05; DepthConstant=0; MaxDepthSoluteAccessible=0; RunoffEffectivenessAtMovingSolute=0; MaxEffectiveRunoff=0
          Thickness  InitialValues  Exco  FIP
          150        1              0     1
          150        0.8            0     1
          300        0.5            0     1
          300        0.3            0     1
          300        0.2            0     1
          300        0.1            0     1
          300        0.05           0     1
        Solute Urea: InitialValuesUnits=kg/ha; WaterTableConcentration=0; D0=0.05; DepthConstant=0; MaxDepthSoluteAccessible=0; RunoffEffectivenessAtMovingSolute=0; MaxEffectiveRunoff=0
          Thickness  InitialValues  Exco  FIP
          150        0              0     1
          150        0              0     1
          300        0              0     1
          300        0              0     1
          300        0              0     1
          300        0              0     1
          300        0              0     1
        SoilTemperature: InteractionsPerDay=8
        LayerStructure: Thickness=[150, 150, 300, 300, 300, 300, 300]
        CERESSoilTemperature
        Physical
          Thickness  ParticleSizeSand  ParticleSizeSilt  ParticleSizeClay  Rocks  BD    AirDry    LL15      DUL    SAT    KS
          150        52.31             33.03             14.66             0      1.19  0.13025   0.2605    0.51   0.515  20
          150        81.61             10.68             7.71              0      1.25  0.198689  0.248362  0.42   0.487  20
          300        40                30                30                0      1.3   0.28      0.28      0.479  0.48   20
          300        40                30                30                0      1.35  0.28      0.28      0.47   0.472  20
          300        40                30                30                0      1.35  0.28      0.28      0.46   0.464  20
          300        40                30                30                0      1.35  0.28      0.28      0.448  0.449  20
          300        40                30                30                0      1.35  0.28      0.28      0.447  0.452  20
          SoilCrop WheatSoil: LL=[0.261, 0.248, 0.28, 0.28, 0.28, 0.28, 0.28]; KL=[0.06, 0.06, 0.06, 0.04, 0.04, 0.02, 0.01]; XF=[1, 1, 1, 1, 1, 1, 1]
          SoilCrop RedCloverSoil: LL=[0.261, 0.248, 0.28, 0.28, 0.28, 0.28, 0.28]; KL=[0.06, 0.06, 0.06, 0.05, 0.05, 0.03, 0.02]; XF=[1, 1, 1, 1, 1, 1, 1]
          SoilCrop PlantainForageSoil: LL=[0.261, 0.248, 0.28, 0.28, 0.28, 0.28, 0.28]; KL=[0.06, 0.06, 0.06, 0.045, 0.04, 0.02, 0.01]; XF=[1, 1, 1, 1, 0.8, 0.5, 0.2]
          SoilCrop OatsSoil: LL=[0.261, 0.248, 0.28, 0.28, 0.28, 0.28, 0.28]; KL=[0.06, 0.06, 0.06, 0.04, 0.03, 0.015, 0.005]; XF=[1, 1, 1, 1, 0.8, 0.3, 0.1]
          SoilCrop PotatoSoil: LL=[0.261, 0.248, 0.28, 0.28, 0.28, 0.28, 0.28]; KL=[0.09, 0.08, 0.06, 0.04, 0.02, 0.01, 0.005]; XF=[1, 1, 1, 1, 1, 1, 1]
          SoilCrop MustardSoil: LL=[0.261, 0.248, 0.28, 0.28, 0.28, 0.28, 0.28]; KL=[0.09, 0.08, 0.06, 0.04, 0.02, 0.01, 0.005]; XF=[1, 1, 1, 1, 1, 1, 1]
          SoilCrop RapeSoil: LL=[0.261, 0.248, 0.28, 0.28, 0.28, 0.28, 0.28]; KL=[0.09, 0.08, 0.06, 0.04, 0.02, 0.01, 0.005]; XF=[1, 1, 1, 1, 1, 1, 1]
        Swim3: Salb=0.13; CN2Bare=50; CNRed=20; CNCov=0.8; KDul=150; PSIDul=-100; VC=true; DTMin=0; DTMax=60; MaxWaterIncrement=5; SpaceWeightingFactor=0.5; SoluteSpaceWeightingFactor=1; Dis=1; Disp=1; A=2; DTHC=0.1; DTHP=2; vcon1=7.28e-09; vcon2=7.26e-07; eo_time=06:00; eo_durn=720; default_rain_time=00:00; default_rain_duration=720; Diagnostics=false
        CERESSoilTemperature Temperature
      SurfaceOrganicMatter: InitialResidueName=redclover_stubble; InitialResidueType=redclover; InitialResidueMass=500; InitialStandingFraction=0; InitialCPR=0; InitialCNR=100
      Plant RedClover
        Cultivar First_RedClover
          Command:
            [Leaf].Photosynthesis.FT.XYPairs.X = 0,4,9,15,18.5,23,27,30,37.5
            [Leaf].Photosynthesis.FT.XYPairs.Y = 0,0,0.1125,0.45,0.75,0.75,0.75,0.375,0
            [Leaf].NRetranslocationFactor.TemperatureFactor.XYPairs.X = 0,4,9,15,18.5,23,27,30,37.5
            [Leaf].NRetranslocationFactor.TemperatureFactor.XYPairs.Y = 0,0,0.15,0.6,1,1,1,0.5,0
            [Phenology].Inductive.Target.FixedValue = 15
            [Phenology].Reproductive.Target.FixedValue = 5000
        Cultivar Second_RedClover
          Command:
            [Leaf].Photosynthesis.FT.XYPairs.X = 0,2,6,10,14,18.5,23,27,30,35,37.5
            [Leaf].Photosynthesis.FT.XYPairs.Y = 0,0.075,0.225,0.45,0.6375,0.75,0.75,0.75,0.525,0.225,0
            [Leaf].NRetranslocationFactor.TemperatureFactor.XYPairs.X = 0,2,6,10,14,18.5,23,27,30,35,37.5
            [Leaf].NRetranslocationFactor.TemperatureFactor.XYPairs.Y = 0,0.1,0.3,0.6,0.85,1,1,1,0.7,0.3,0
            [Phenology].Inductive.Target.FixedValue = 10
            [Phenology].Reproductive.Target.FixedValue = 1200
      Plant Wheat
        Cultivar Zlata
          Command:
            [Phenology].HeadEmergencePpSensitivity.FixedValue = 2.0
            [Phenology].Phyllochron.BasePhyllochron.FixedValue = 75.0
            [Leaf].ExtinctionCoeff.VegetativePhase.FixedValue = 0.8
            [Phenology].PhyllochronPpSensitivity.FixedValue = 0.4
            [Phenology].CAMP.FLNparams.MinLN = 5.0
            [Phenology].CAMP.FLNparams.PpLN = 2.5
            [Phenology].CAMP.FLNparams.VrnLN = 7
            [Phenology].CAMP.FLNparams.VxPLN = 0.0
            [Phenology].GrainFilling.Target.FixedValue = 250
            [Phenology].GrainRipening.Target.FixedValue = 100
        Cultivar Irgina
          Command:
            [Phenology].HeadEmergencePpSensitivity.FixedValue = 2.0
            [Phenology].Phyllochron.BasePhyllochron.FixedValue = 50
            [Leaf].ExtinctionCoeff.VegetativePhase.FixedValue = 0.8
            [Phenology].PhyllochronPpSensitivity.FixedValue = 0.4
            [Phenology].CAMP.FLNparams.MinLN = 5
            [Phenology].CAMP.FLNparams.PpLN = 2.5
            [Phenology].CAMP.FLNparams.VrnLN = 7
            [Phenology].CAMP.FLNparams.VxPLN = 0.0
            [Phenology].GrainFilling.Target.FixedValue = 225
            [Phenology].GrainRipening.Target.FixedValue = 100
        Cultivar Winter_rye_smoke
          Command:
            [Phenology].HeadEmergencePpSensitivity.FixedValue = 2.8
            [Phenology].Phyllochron.BasePhyllochron.FixedValue = 98
            [Leaf].ExtinctionCoeff.VegetativePhase.FixedValue = 0.85
            [Phenology].PhyllochronPpSensitivity.FixedValue = 0.2
            [Phenology].CAMP.FLNparams.MinLN = 7.25
            [Phenology].CAMP.FLNparams.PpLN = 0.9
            [Phenology].CAMP.FLNparams.VrnLN = 5.7
            [Phenology].CAMP.FLNparams.VxPLN = 5.5
            [Phenology].GrainFilling.Target.FixedValue = 280
            [Phenology].GrainRipening.Target.FixedValue = 120
            [Phenology].CAMP.EnvData.VrnTreatTemp = 5.8
            [Phenology].CAMP.EnvData.VrnTreatDuration = 60
            [Phenology].HeadEmergenceLongDayBase.FixedValue = 50
      Plant Oats
        Cultivar Yakov
          Command:
            [Phenology].MinimumLeafNumber.FixedValue = 6.5
            [Phenology].VrnSensitivity.FixedValue = 0
            [Phenology].PpSensitivity.FixedValue = 3.5
            [Phenology].EarlyReproductiveLongDayBase.FixedValue = 5.5
            [Phenology].EarlyReproductivePpSensitivity.FixedValue = 0.5
            [Structure].Phyllochron.BasePhyllochron.FixedValue = 85
            [Leaf].CohortParameters.MaxArea.AreaLargestLeaves.FixedValue = 3500
            [Leaf].CohortParameters.SenescenceDuration.Multiplier.FixedValue = 2.5
            [Leaf].CohortParameters.GrowthDuration.AgeFactor.XYPairs.Y = 1,1,0.1
            [Grain].MaximumPotentialGrainSize.FixedValue = 0.04
            [Grain].NumberFunction.GrainNumber.GrainsPerGramOfStem.FixedValue = 45
            [Leaf].ExtinctionCoeff.FixedValue = 0.7
      Plant Potato
      Plant PlantainForage
        Cultivar First_Timothy
          Command:
            [Phenology].ThermalTime.Response.X = 8.0, 27.5, 38.0
            [Phenology].ThermalTime.Response.Y = 0.0, 20.0, 0.0
            [Leaf].Photosynthesis.FT.XYPairs.X = 8, 10, 15, 21, 27.5, 35, 38
            [Leaf].Photosynthesis.FT.XYPairs.Y = 0,0.0375,0.225,0.75,0.75,0.075,0
            [Leaf].HeightFunction.XYPairs.Y = 0.0, 100, 300, 450, 450
        Cultivar Second_Timothy
          Command:
            [Phenology].ThermalTime.Response.X = 8.0, 27.5, 38.0
            [Phenology].ThermalTime.Response.Y = 0.0, 20.0, 0.0
            [Leaf].Photosynthesis.FT.XYPairs.X = 8, 10, 15, 21, 27.5, 35, 38
            [Leaf].Photosynthesis.FT.XYPairs.Y = 0,0.0375,0.225,0.75,0.75,0.075,0
            [Leaf].HeightFunction.XYPairs.Y = 0.0, 100, 300, 450, 450
      Plant Mustard: ResourceName=Canola
        Cultivar Mustard_sort
          Command:
            [Phenology].Vegetative.Target.XYPairs.X = 0, 25
            [Phenology].Vegetative.Target.XYPairs.Y = 210, 1
            [Phenology].StemElongation.Target.PPResponse.Amount.FixedValue = 180
            [Leaf].Phyllochron.Base.FixedValue = 55
      Plant Rape: ResourceName=Canola
        Cultivar Rape_sort
          Command:
            [Phenology].Vegetative.Target.XYPairs.X = 0, 25
            [Phenology].Vegetative.Target.XYPairs.Y = 290, 1
            [Phenology].StemElongation.Target.PPResponse.Amount.FixedValue = 240
            [Leaf].Phyllochron.Base.FixedValue = 65
      Manager Sow using a variable rule
        StartDate = 1-may
        EndDate = 30-may
        MinESW = 100
        MinRain = 25
        RainDays = 12
        RotationCrops = RedClover+PlantainForage, RedClover+PlantainForage, Oats+RedClover+PlantainForage, RedClover+PlantainForage, RedClover+PlantainForage
        RotationCultivars = First_RedClover;First_Timothy, Second_RedClover;Second_Timothy, Yakov;First_RedClover;First_Timothy, First_RedClover;First_Timothy, Second_RedClover;Second_Timothy
        RotationSowingDepths = 10;10, 10;10, 20;10;10, 10;10, 10;10
        RotationRowSpacings = 150;150, 150;150, 150;150;150, 150;150, 150;150
        RotationPopulations = 450;300, 450;300, 250;150;150, 450;300, 450;300
        RotationSowingDates = -, -, 18-May, -, -
        RotationHarvestDates = 30-Sep, 30-Sep, 31-Aug, 30-Sep, 30-Sep
```csharp
using APSIM.Shared.Utilities;
using Models.Core;
using Models.PMF;
using System;
using System.Collections.Generic;
using System.Globalization;
using System.Linq;

namespace Models
{
    [Serializable]
    public class Script : Model
    {
        [Link] private Clock Clock;
        [Link] private Summary Summary;
        [Link(ByName = true)] private Plant Wheat;
        [Link(ByName = true)] private Plant RedClover;
        [Link(ByName = true)] private Plant PlantainForage;
        [Link(ByName = true)] private Plant Oats;
        [Link(ByName = true)] private Plant Potato;
        [Link(ByName = true)] private Plant Rape;
        [Link(ByName = true)] private Plant Mustard;

        [Description("Crop names in rotation order (e.g. Wheat, Maize, Canola)")]
        public string[] RotationCrops { get; set; }
        [Description("Cultivar for each crop in rotation (same order)")]
        public string[] RotationCultivars { get; set; }
        [Description("Sowing depth for each crop (mm)")]
        public string[] RotationSowingDepths { get; set; }
        [Description("Row spacing for each crop (mm)")]
        public string[] RotationRowSpacings { get; set; }
        [Description("Population for each crop (/m2)")]
        public string[] RotationPopulations { get; set; }
        [Description("Sowing date for each crop (d-mmm; dash for perennial carry-over)")]
        public string[] RotationSowingDates { get; set; }
        [Description("Harvest or cut date for each crop (d-mmm)")]
        public string[] RotationHarvestDates { get; set; }

        private Dictionary<string, IPlant> plants;
        private int startYear;

        [EventSubscribe("StartOfSimulation")]
        private void OnSimulationCommencing(object sender, EventArgs e)
        {
            startYear = Clock.StartDate.Year;
            plants = new Dictionary<string, IPlant>(StringComparer.OrdinalIgnoreCase)
            {
                { "Wheat", Wheat }, { "RedClover", RedClover },
                { "PlantainForage", PlantainForage }, { "Oats", Oats },
                { "Potato", Potato }, { "Rape", Rape }, { "Mustard", Mustard }
            };
            ValidateArrays();

            int index = IndexForYear(Clock.Today.Year);
            if (Clock.Today == Clock.StartDate && index >= 0 && index < RotationCrops.Length &&
                (IsPurePerennial(index) || IsWinterCrop(index)))
                SowGroup(index, "startup approximation: crop established before available weather record");
        }

        [EventSubscribe("DoManagement")]
        private void OnDoManagement(object sender, EventArgs e)
        {
            int index = IndexForYear(Clock.Today.Year);
            if (index < 0 || index >= RotationCrops.Length)
                return;

            if (!IsWinterCrop(index) && !IsPurePerennial(index) && DateMatches(RotationSowingDates[index]))
            {
                EndPlantsNotIn(index);
                SowGroup(index, "scheduled sowing");
            }

            if (DateMatches(RotationHarvestDates[index]))
                HarvestGroup(index);

            int next = index + 1;
            if (next < RotationCrops.Length && IsWinterCrop(next) && DateMatches(RotationSowingDates[next]))
            {
                EndPlantsNotIn(next);
                SowGroup(next, "autumn sowing for next harvest year");
            }

            if (Clock.Today.Month == 12 && Clock.Today.Day == 31)
            {
                if (next < RotationCrops.Length)
                    EndPlantsNotIn(next);
                else
                    EndAllPlants();
            }
        }

        private int IndexForYear(int year) => year - startYear;

        private void ValidateArrays()
        {
            int n = RotationCrops.Length;
            if (new[] { RotationCultivars.Length, RotationSowingDepths.Length,
                        RotationRowSpacings.Length, RotationPopulations.Length,
                        RotationSowingDates.Length, RotationHarvestDates.Length }.Any(x => x != n))
                throw new Exception("All rotation and calendar arrays must have the same length.");
        }

        private bool DateMatches(string dayMonth)
        {
            if (string.IsNullOrWhiteSpace(dayMonth) || dayMonth == "-")
                return false;
            return DateUtilities.WithinDates(dayMonth, Clock.Today, dayMonth);
        }

        private string[] Parts(string value, char separator) =>
            value.Split(separator).Select(x => x.Trim()).ToArray();

        private bool IsPerennial(string crop) =>
            crop.Equals("RedClover", StringComparison.OrdinalIgnoreCase) ||
            crop.Equals("PlantainForage", StringComparison.OrdinalIgnoreCase);

        private bool IsPurePerennial(int index) => Parts(RotationCrops[index], '+').All(IsPerennial);

        private bool IsWinterCrop(int index) =>
            RotationCrops[index].IndexOf("Wheat", StringComparison.OrdinalIgnoreCase) >= 0 &&
            RotationCultivars[index].IndexOf("Winter_rye", StringComparison.OrdinalIgnoreCase) >= 0;

        private void SowGroup(int index, string reason)
        {
            string[] crops = Parts(RotationCrops[index], '+');
            string[] cultivars = Parts(RotationCultivars[index], ';');
            string[] depths = Parts(RotationSowingDepths[index], ';');
            string[] spacings = Parts(RotationRowSpacings[index], ';');
            string[] populations = Parts(RotationPopulations[index], ';');
            for (int i = 0; i < crops.Length; i++)
            {
                IPlant plant = plants[crops[i]];
                if (plant.IsAlive)
                    continue;
                string cultivar = i < cultivars.Length ? cultivars[i] : "Default";
                double depth = double.Parse(i < depths.Length ? depths[i] : "20", CultureInfo.InvariantCulture);
                double spacing = double.Parse(i < spacings.Length ? spacings[i] : "150", CultureInfo.InvariantCulture);
                double population = double.Parse(i < populations.Length ? populations[i] : "200", CultureInfo.InvariantCulture);
                plant.Sow(population: population, cultivar: cultivar, depth: depth, rowSpacing: spacing);
                Summary.WriteMessage(this, $"Sowed {crops[i]} ({cultivar}) on {Clock.Today:d}: {reason}", MessageType.Information);
            }
        }

        private void HarvestGroup(int index)
        {
            foreach (string crop in Parts(RotationCrops[index], '+'))
            {
                IPlant plant = plants[crop];
                if (!plant.IsAlive)
                    continue;
                plant.Harvest();
                if (!IsPerennial(crop))
                    plant.EndCrop();
            }
            Summary.WriteMessage(this, $"Scheduled harvest/cut on {Clock.Today:d}", MessageType.Information);
        }

        private void EndPlantsNotIn(int index)
        {
            HashSet<string> keep = new HashSet<string>(Parts(RotationCrops[index], '+'), StringComparer.OrdinalIgnoreCase);
            foreach (KeyValuePair<string, IPlant> item in plants)
                if (item.Value.IsAlive && !keep.Contains(item.Key))
                    item.Value.EndCrop();
        }

        private void EndAllPlants()
        {
            foreach (IPlant plant in plants.Values)
                if (plant.IsAlive)
                    plant.EndCrop();
        }
    }
}
```
      Manager Fertilise at sowing
        FertiliserType = NO3N
        Amount = 10
```csharp
using System;
using Models.Core;
namespace Models
{
    [Serializable]
    public class Script : Model
    {
        [Link] Clock Clock;
        [Link] Fertiliser Fertiliser;

        [Description("Type of fertiliser to apply?")]
        [Display(Type = DisplayType.FertiliserType)] public string FertiliserType { get; set; }

        [Description("Amount of fertiliser to be applied once per sowing date (kg/ha)")]
        public double Amount { get; set; }

        private DateTime lastApplication = DateTime.MinValue;

        [EventSubscribe("Sowing")]
        private void OnSowing(object sender, EventArgs e)
        {
            if (Clock.Today.Date == lastApplication.Date)
                return;
            Fertiliser.Apply(amount: Amount, type: FertiliserType);
            lastApplication = Clock.Today.Date;
        }
    }
}
```
      Manager Harvest
        Crop = [Wheat]
```csharp
using APSIM.Shared.Utilities;
using Models.Utilities;
using Models.Soils;
using Models.PMF;
using Models.Core;
using System;
using System.Linq;

namespace Models
{
    [Serializable] 
    public class Script : Model
    {
        [Description("Crop")]
        public IPlant Crop { get; set; }
        
        [EventSubscribe("DoManagement")]
        private void OnDoManagement(object sender, EventArgs e)
        {
            if (Crop.IsReadyForHarvesting)
            {
                Crop.Harvest();
                Crop.EndCrop();
            }
        }
    }
}
```
      Manager SWIMSetLowerBC
        LowerBCType = seepage
        LowerBCValue = -500
```csharp
using Models.Climate;
using APSIM.Shared.Utilities;
using Models.Soils.Nutrients;
using Models.Soils;
using Models.PMF;
using Models.Core;
using System.Xml.Serialization;
using System;
using System.Linq;
using Models.AgPasture;
using Models.Interfaces;

namespace Models
{
    [Serializable] 
    [System.Xml.Serialization.XmlInclude(typeof(Model))]
    public class Script : Model
    {
        [Link] Clock clock;
        [Link] ISummary summary;
        [Link] private Swim3 swim;
        //[Link] private PastureSpecies ryegrass;
        //[Link] private SimpleGrazing grazing;
        
        public enum LowerBCTypeOptions {gradient,seepage,potential};

        [Separator("Sets the lower boundary condition type (and value if set to 'potential' for SWIM3. The change is applied at the beginning of the first day of the simulation.")]
        [Description("[Get a dropdown] What lower boundary condition is wanted?")] public LowerBCTypeOptions LowerBCType { get; set; }
        [Description("If 'potential', then what potential? (mm) ")] public double LowerBCValue { get; set; }

        public double SoilWaterStart  { get; set; }
        public double SoilWaterEnd  { get; set; }

        [EventSubscribe("DoDailyInitialisation")]
        private void DoDailyInitialisation(object sender, EventArgs e)
        {
        }

        [EventSubscribe("DoReportCalculations")]
        private void DoReportCalculations(object sender, EventArgs e)
        {
        }

        [EventSubscribe("DoManagement")]
        private void DoDailyCalculations(object sender, EventArgs e)
        {
            if (clock.Today == clock.StartDate)
            {
                summary.WriteMessage(this, "Script is setting lower boundary condition to " + LowerBCType, MessageType.Diagnostic);
                if (LowerBCType == LowerBCTypeOptions.gradient)
                    swim.SetLowerBCForGradient(bbcGradient: 0.0);   // in cm/cm (ibbc=0) Note that this is the default setting
                else if (LowerBCType == LowerBCTypeOptions.potential)
                    swim.SetLowerBCForGivenPotential(bbcPotential: LowerBCValue /10.0 );    //  convert to cm (ibbc=1), DUL is -100 cm so values more positive will often result in inflow to the bottom of the soil profile. Input in mm so divide here.
                else if (LowerBCType == LowerBCTypeOptions.seepage)
                    swim.SetLowerBCForSeepage(bbcPotentialSeepage: 0.0);  // in cm (ibbc=3). This is for zero-tension lysimeters
                else
                    throw new Exception("Wrong lower boundary condition type");
            }
        }
    }
}
```
      Manager Synchroniser
        Identifier = <undefined>
```csharp
using APSIM.Core;
using APSIM.Shared.Utilities;
using NetMQ.Sockets;
using NetMQ;
using System.Collections.Generic;
using System.IO;
using MessagePack;
using Models.Functions;
using Models.Utilities;
using Models.Surface;
using Models.Soils;
using Models.PMF;
using Models.Core;
using System;
using System.Linq;
using Models.Soils.Nutrients;

namespace Models
{
    [Serializable]
    public class Script : Model, IStructureDependency
    {
        [Link] private Clock clock;
        [Link] private Simulation simulation;
        [Link] private Summary Summary;
        [NonSerialized] private DealerSocket connection;
        public IStructure Structure { private get; set; }

        [Description("Identifier")]
        public string Identifier { get; set; }

        [NonSerialized] private bool pausedAfterWaterToday = false;

        

        [EventSubscribe("StartOfSimulation")]
        private void OnSimulationCommencing(object sender, EventArgs e)
        {
            if (Identifier == "<undefined>")
            {
                Console.WriteLine("Need an endpoint to connect to");
                Summary.WriteMessage(this, "Need an endpoint to connect to", MessageType.Error);
                return;
            }
            Identifier = "tcp://" + Identifier;
            connection = new DealerSocket(Identifier);
            connection.SendFrame("connect");
            var msg = connection.ReceiveFrameString();
            if (msg != "ok") throw new Exception("Expected ok");
        }

        [EventSubscribe("StartOfDay")]
        private void OnStartOfDay(object s, EventArgs e) => pausedAfterWaterToday = false;

        // --- Р В РЎСџР В Р’В°Р РЋРЎвЂњР В Р’В·Р В Р’В° Р РЋР С“Р РЋР вЂљР В Р’В°Р В Р’В·Р РЋРЎвЂњ Р В РЎвЂ”Р В РЎвЂўР РЋР С“Р В Р’В»Р В Р’Вµ DoSoilWaterMovement ---
        [EventSubscribe("DoSoilWaterMovement")]
        private void OnAfterSoilWaterMovement(object s, EventArgs e)
        {
            if (connection == null || pausedAfterWaterToday) return;
            pausedAfterWaterToday = true;

            connection.SendFrame("paused1");
            bool moreToDo = true;
            while (moreToDo)
            {
                var msg = connection.ReceiveMultipartMessage();
                if (msg == null || msg.FrameCount == 0) continue;

                var command = msg[0].ConvertToString();
                switch (command)
                {
                    case "resume1":
                        moreToDo = false;
                        break;
                    case "put":
                        RequireParts(msg, 3, "put");
                        ProcessPutCommand(msg);
                        break;
                    case "get":
                        RequireParts(msg, 2, "get");
                        ProcessReadCommand(msg);
                        break;
                    default:
                        throw new Exception("Expected resume1/get/put/do during paused1, not '" + command + "'");
                }
            }
            Summary?.WriteMessage(this, "Resumed after paused1", MessageType.Information);
        }

        [EventSubscribe("EndOfDay")]
        private void OnEndOfDay(object sender, EventArgs e)
        {
            if (connection == null) return;

            connection.SendFrame("paused");
            bool moreToDo = true;
            while (moreToDo)
            {
                var msg = connection.ReceiveMultipartMessage();
                if (msg == null || msg.FrameCount == 0) continue;

                var command = msg[0].ConvertToString();
                switch (command)
                {
                    case "resume":
                        moreToDo = false;
                        break;
                    case "put":
                        RequireParts(msg, 3, "put");
                        ProcessPutCommand(msg);
                        break;
                    case "get":
                        RequireParts(msg, 2, "get");
                        ProcessReadCommand(msg);
                        break;
                    default:
                        throw new Exception("Expected resume/get/put, not '" + command + "'");
                }
            }
        }

        [EventSubscribe("EndOfSimulation")]
        private void OnSimulationEnding(object sender, EventArgs e)
        {
            if (connection == null) return;

            connection.SendFrame("finished");
            var msg = connection.ReceiveFrameString();
            if (msg != "ok") throw new Exception("Expected ok at end");
            connection.Close();
            Console.WriteLine("Simulation Ending");
        }

        // ==========================
        //        Р В РЎвЂєР В Р’В±Р РЋРІР‚В°Р В РЎвЂР В Р’Вµ Р В РЎВР В Р’ВµР РЋРІР‚С™Р В РЎвЂўР В РўвЂР РЋРІР‚в„–
        // ==========================

        private void ProcessPutCommand(NetMQMessage msg)
        {
            // msg[1] Р Р†Р вЂљРІР‚Сњ packed string variableName; msg[2] Р Р†Р вЂљРІР‚Сњ packed object value
            string variableName = MessagePackSerializer.Deserialize<string>(msg[1].Buffer);

            // Р В Р’В§Р РЋРІР‚С™Р В РЎвЂў Р В Р’В·Р В Р’В° Р РЋРІР‚С™Р В РЎвЂР В РЎвЂ” Р РЋРЎвЂњ Р В РЎвЂ”Р В Р’ВµР РЋР вЂљР В Р’ВµР В РЎВР В Р’ВµР В Р вЂ¦Р В Р вЂ¦Р В РЎвЂўР В РІвЂћвЂ“ Р В Р вЂ  APSIM
            var targetObj = Structure.Get(variableName, relativeTo: simulation);
            if (targetObj == null)
                throw new Exception($"Variable '{variableName}' not found in simulation.");
            var targetType = targetObj.GetType();

            object incoming = MessagePackSerializer.Deserialize<object>(msg[2].Buffer);

            // Р В РЎСџР РЋР вЂљР В РЎвЂўР В Р вЂ Р В Р’ВµР РЋР вЂљР В РЎвЂќР В Р’В° Р РЋР С“Р В РЎвЂўР В РЎвЂ“Р В Р’В»Р В Р’В°Р РЋР С“Р В РЎвЂўР В Р вЂ Р В Р’В°Р В Р вЂ¦Р В Р вЂ¦Р В РЎвЂўР РЋР С“Р РЋРІР‚С™Р В РЎвЂ Р В РЎВР В Р’В°Р РЋР С“Р РЋР С“Р В РЎвЂР В Р вЂ /Р РЋР С“Р В РЎвЂќР В Р’В°Р В Р’В»Р РЋР РЏР РЋР вЂљ
            if (incoming.GetType().IsArray != targetType.IsArray)
                throw new Exception("Array/scalar mismatch for " + variableName);

            if (targetType.IsArray)
            {
                Type elemType = targetType.GetElementType();
                var incomingArray = (incoming as object[]) ?? throw new Exception("Expected array payload for " + variableName);

                if (IsNumeric(elemType))
                {
                    var casted = Array.ConvertAll(incomingArray, e => (double)e);
                    Structure.Set(variableName, casted, relativeTo: simulation);
                }
                else if (IsInteger(elemType))
                {
                    var casted = Array.ConvertAll(incomingArray, e => (int)e);
                    Structure.Set(variableName, casted, relativeTo: simulation);
                }
                else if (IsString(elemType))
                {
                    var casted = Array.ConvertAll(incomingArray, e => (string)e);
                    Structure.Set(variableName, casted, relativeTo: simulation);
                }
                else
                {
                    throw new Exception("Don't know what to do setting an array of " + elemType);
                }
            }
            else
            {
                Structure.Set(variableName, Convert.ChangeType(incoming, targetType), relativeTo: simulation);
            }

            connection.SendFrame("ok");
        }

        private void ProcessReadCommand(NetMQMessage msg)
        {
            // msg[1] Р Р†Р вЂљРІР‚Сњ packed string variableName
            string variableName = MessagePackSerializer.Deserialize<string>(msg[1].Buffer);

            object value = Structure.Get(variableName, relativeTo: simulation);

            if (value is IFunction fun)
            {
                value = fun.Value();
            }
            else if (value != null && (value.GetType().IsArray || value.GetType().IsClass))
            {
                try
                {
                    value = ReflectionUtilities.Clone(value);
                }
                catch (Exception err)
                {
                    throw new Exception(
                        $"Cannot report variable \"{variableName}\": Variable is a non-reportable type: \"{value?.GetType()?.Name}\".", err);
                }
            }

            byte[] bytes = MessagePackSerializer.Serialize(value ?? "NA");
            connection.SendFrame(bytes);
        }

        private static void RequireParts(NetMQMessage msg, int expected, string cmd)
        {
            if (msg.FrameCount != expected)
                throw new Exception($"Command '{cmd}' expects {expected} frames, got {msg.FrameCount}.");
        }

        private static bool IsNumeric(Type type)
        {
            switch (Type.GetTypeCode(type))
            {
                case TypeCode.Double:
                case TypeCode.Single:
                    return true;
                default:
                    return false;
            }
        }

        private static bool IsInteger(Type type)
        {
            switch (Type.GetTypeCode(type))
            {
                case TypeCode.Int16:
                case TypeCode.Int32:
                case TypeCode.Int64:
                case TypeCode.UInt16:
                case TypeCode.UInt32:
                case TypeCode.UInt64:
                    return true;
                default:
                    return false;
            }
        }

        private static bool IsString(Type type) => Type.GetTypeCode(type) == TypeCode.String;
    }
}
```
    Zone Field2: Area=1; Slope=0; AspectAngle=0; Altitude=50; CanopyType=BroadAcre
      Report Report2: EventNames=[Clock].EndOfDay
        VariableNames:
          [Clock].Today
          [Wheat].LAI as WheatLAI
          [Wheat].Phenology.Zadok.Stage as WheatZadok
          [Wheat].Phenology.CurrentStageName as WheatStage
          [Wheat].AboveGround.Wt as WheatAGWt
          [Wheat].AboveGround.N as WheatAGN
          [Wheat].Grain.Total.Wt*10 as WheatYield
          [Wheat].Grain.Protein as WheatProtein
          [Wheat].Grain.Size as WheatSize
          [Wheat].Grain.Number as WheatNumber
          [Wheat].Grain.Total.Wt as WheatGrainWt
          [Wheat].Grain.Total.N as WheatGrainN
          [Wheat].Total.Wt as WheatTotalWt
          [RedClover].LAI as CloverLAI
          [RedClover].Phenology.CurrentStageName as CloverStage
          [RedClover].AboveGround.Wt as CloverAGWt
          [RedClover].AboveGround.N as CloverAGN
          [RedClover].Total.Wt as CloverTotalWt
          [RedClover].AboveGround.Wt*10 as CloverYield
          [PlantainForage].LAI as PlantainLAI
          [PlantainForage].AboveGround.Wt as PlantainAGWt
          [PlantainForage].AboveGround.N as PlantainAGN
          [PlantainForage].Total.Wt as PlantainTotalWt
          [PlantainForage].AboveGround.Wt*10 as PlantainYield
          [RedClover].AboveGround.Wt + [PlantainForage].AboveGround.Wt as MixAGWt
          ([RedClover].AboveGround.Wt + [PlantainForage].AboveGround.Wt)*10 as MixYield
          [RedClover].AboveGround.N + [PlantainForage].AboveGround.N as MixAGN
          [Oats].LAI as OatsLAI
          [Oats].Phenology.Zadok.Stage as OatsZadok
          [Oats].Phenology.CurrentStageName as OatsStage
          [Oats].AboveGround.Wt as OatsAGWt
          [Oats].AboveGround.N as OatsAGN
          [Oats].Grain.Total.Wt*10 as OatsYield
          [Oats].Grain.Total.Wt as OatsGrainWt
          [Oats].Total.Wt as OatsTotalWt
          [Potato].LAI as PotatoLAI
          [Potato].Phenology.CurrentStageName as PotatoStage
          [Potato].AboveGround.Wt as PotatoAGWt
          [Potato].AboveGround.N as PotatoAGN
          [Potato].Total.Wt as PotatoTotalWt
          [Potato].Tuber.Total.Wt*10 as PotatoYield
          [Potato].Tuber.Total.Wt as PotatoTuberWt
          [Rape].LAI as RapeLAI
          [Rape].Phenology.CurrentStageName as RapeStage
          [Rape].AboveGround.Wt as RapeAGWt
          [Rape].AboveGround.N as RapeAGN
          [Rape].Total.Wt as RapeTotalWt
          [Rape].Grain.Total.Wt*10 as RapeYield
          [Rape].Grain.Total.Wt as RapeGrainWt
          [Mustard].LAI as MustardLAI
          [Mustard].Phenology.CurrentStageName as MustardStage
          [Mustard].AboveGround.Wt as MustardAGWt
          [Mustard].AboveGround.N as MustardAGN
          [Mustard].Total.Wt as MustardTotalWt
          [Mustard].Grain.Total.Wt*10 as MustardYield
          [Mustard].Grain.Total.Wt as MustardGrainWt
          [Soil].Swim3.Drainage as Drainage
          [Soil].Swim3.Runoff as Runoff
          [Soil].Swim3.Pond as PondDepth
          [Soil].Swim3.PAW as PAW
          sum([Soil].Water.MM) as WaterStored
          [Soil].Water.Volumetric as SW
          sum([NO3].kgha + [NH4].kgha + [Urea].kgha) as MineralN
          [Denitrification].Value + [Denitrification].Natm as Denitrification
          [NFlow].Natm as NFlow
          sum([Nutrient].Organic.C) as OrganicC
          [Sow using a variable rule].Script.DiagnosticResidueRemovalCount as CerealResidueRemovalCount
          [Sow using a variable rule].Script.DiagnosticResidueRemovedMassKgHa as CerealResidueRemovedMassKgHa
          [Sow using a variable rule].Script.DiagnosticResidueRemovedNKgHa as CerealResidueRemovedNKgHa
      Fertiliser
      Soil: same as Wheat.Field1.Soil
      SurfaceOrganicMatter: InitialResidueName=redclover_stubble; InitialResidueType=redclover; InitialResidueMass=500; InitialStandingFraction=0; InitialCPR=0; InitialCNR=100
      Plant RedClover: same as Wheat.Field1.RedClover
      Plant Wheat
        Cultivar Zlata: same as Wheat.Field1.Wheat.Zlata
        Cultivar Irgina: same as Wheat.Field1.Wheat.Irgina
        Cultivar Winter_rye_smoke
          Command:
            [Phenology].HeadEmergencePpSensitivity.FixedValue = 2.8
            [Phenology].Phyllochron.BasePhyllochron.FixedValue = 98
            [Leaf].ExtinctionCoeff.VegetativePhase.FixedValue = 0.85
            [Phenology].PhyllochronPpSensitivity.FixedValue = 0.2
            [Phenology].CAMP.FLNparams.MinLN = 7.25
            [Phenology].CAMP.FLNparams.PpLN = 0.9
            [Phenology].CAMP.FLNparams.VrnLN = 5.7
            [Phenology].CAMP.FLNparams.VxPLN = 5.5
            [Phenology].GrainFilling.Target.FixedValue = 350
            [Phenology].GrainRipening.Target.FixedValue = 150
            [Phenology].CAMP.EnvData.VrnTreatTemp = 5.8
            [Phenology].CAMP.EnvData.VrnTreatDuration = 60
            [Phenology].HeadEmergenceLongDayBase.FixedValue = 50
      Plant Oats: same as Wheat.Field1.Oats
      Plant PlantainForage: same as Wheat.Field1.PlantainForage
      Plant Potato
      Plant Mustard: ResourceName=Canola
        Cultivar Mustard_sort
          Command:
            [Phenology].Vegetative.Target.XYPairs.X = 0, 25
            [Phenology].Vegetative.Target.XYPairs.Y = 210, 1
            [Phenology].StemElongation.Target.PPResponse.Amount.FixedValue = 180
            [Leaf].Phyllochron.Base.FixedValue = 55
      Plant Rape: ResourceName=Canola
        Cultivar Rape_sort
          Command:
            [Phenology].Vegetative.Target.XYPairs.X = 0, 25
            [Phenology].Vegetative.Target.XYPairs.Y = 290, 1
            [Phenology].StemElongation.Target.PPResponse.Amount.FixedValue = 240
            [Leaf].Phyllochron.Base.FixedValue = 65
      Manager Sow using a variable rule
        StartDate = 1-may
        EndDate = 30-may
        MinESW = 100
        MinRain = 25
        RainDays = 12
        RotationCrops = Mustard, Wheat, Rape, Wheat, Oats+RedClover+PlantainForage
        RotationCultivars = Mustard_sort, Winter_rye_smoke, Rape_sort, Zlata, Yakov;First_RedClover;First_Timothy
        RotationSowingDepths = 20, 30, 20, 28, 20;10;10
        RotationRowSpacings = 200, 200, 200, 200, 150;150;150
        RotationPopulations = 45, 230, 45, 480, 250;150;150
        RotationSowingDates = 10-May, 5-Sep, 10-May, 12-May, 4-May
        RotationHarvestDates = 31-Aug, 31-Aug, 31-Aug, 17-Aug, 31-Aug
```csharp
using APSIM.Shared.Utilities;
using Models.Core;
using Models.PMF;
using Models.Surface;
using System;
using System.Collections.Generic;
using System.Globalization;
using System.Linq;

namespace Models
{
    [Serializable]
    public class Script : Model
    {
        [Link] private Clock Clock;
        [Link] private Summary Summary;
        [Link] private SurfaceOrganicMatter SurfaceOrganicMatter;

        public double DiagnosticResidueRemovalCount { get; private set; }
        public double DiagnosticResidueRemovedMassKgHa { get; private set; }
        public double DiagnosticResidueRemovedNKgHa { get; private set; }
        [Link(ByName = true)] private Plant Wheat;
        [Link(ByName = true)] private Plant RedClover;
        [Link(ByName = true)] private Plant PlantainForage;
        [Link(ByName = true)] private Plant Oats;
        [Link(ByName = true)] private Plant Potato;
        [Link(ByName = true)] private Plant Rape;
        [Link(ByName = true)] private Plant Mustard;

        [Description("Crop names in rotation order (e.g. Wheat, Maize, Canola)")]
        public string[] RotationCrops { get; set; }
        [Description("Cultivar for each crop in rotation (same order)")]
        public string[] RotationCultivars { get; set; }
        [Description("Sowing depth for each crop (mm)")]
        public string[] RotationSowingDepths { get; set; }
        [Description("Row spacing for each crop (mm)")]
        public string[] RotationRowSpacings { get; set; }
        [Description("Population for each crop (/m2)")]
        public string[] RotationPopulations { get; set; }
        [Description("Sowing date for each crop (d-mmm; dash for perennial carry-over)")]
        public string[] RotationSowingDates { get; set; }
        [Description("Harvest or cut date for each crop (d-mmm)")]
        public string[] RotationHarvestDates { get; set; }

        private Dictionary<string, IPlant> plants;
        private int startYear;

        [EventSubscribe("StartOfSimulation")]
        private void OnSimulationCommencing(object sender, EventArgs e)
        {
            startYear = Clock.StartDate.Year;
            plants = new Dictionary<string, IPlant>(StringComparer.OrdinalIgnoreCase)
            {
                { "Wheat", Wheat }, { "RedClover", RedClover },
                { "PlantainForage", PlantainForage }, { "Oats", Oats },
                { "Potato", Potato }, { "Rape", Rape }, { "Mustard", Mustard }
            };
            ValidateArrays();

            int index = IndexForYear(Clock.Today.Year);
            if (Clock.Today == Clock.StartDate && index >= 0 && index < RotationCrops.Length &&
                (IsPurePerennial(index) || IsWinterCrop(index)))
                SowGroup(index, "startup approximation: crop established before available weather record");
        }

        [EventSubscribe("DoManagement")]
        private void OnDoManagement(object sender, EventArgs e)
        {
            int index = IndexForYear(Clock.Today.Year);
            if (index < 0 || index >= RotationCrops.Length)
                return;

            if (!IsWinterCrop(index) && !IsPurePerennial(index) && DateMatches(RotationSowingDates[index]))
            {
                EndPlantsNotIn(index);
                SowGroup(index, "scheduled sowing");
            }

            if (DateMatches(RotationHarvestDates[index]))
            {
                double residueBeforeHarvest = SurfaceOrganicMatter.Wt;
                HarvestGroup(index);
                if (IsCerealToOatsTransition(index) && (Clock.Today.Year == 2022))
                {
                    double residueAfterHarvest = SurfaceOrganicMatter.Wt;
                    double nitrogenBeforeRemoval = SurfaceOrganicMatter.N;
                    DiagnosticResidueRemovedMassKgHa = Math.Max(
                        0.0, residueAfterHarvest - residueBeforeHarvest);
                    if (DiagnosticResidueRemovedMassKgHa > 0.0)
                        SurfaceOrganicMatter.Remove(DiagnosticResidueRemovedMassKgHa);
                    DiagnosticResidueRemovedNKgHa = Math.Max(
                        0.0, nitrogenBeforeRemoval - SurfaceOrganicMatter.N);
                    DiagnosticResidueRemovalCount += 1.0;
                }
            }

            int next = index + 1;
            if (next < RotationCrops.Length && IsWinterCrop(next) && DateMatches(RotationSowingDates[next]))
            {
                EndPlantsNotIn(next);
                SowGroup(next, "autumn sowing for next harvest year");
            }

            if (Clock.Today.Month == 12 && Clock.Today.Day == 31)
            {
                if (next < RotationCrops.Length)
                    EndPlantsNotIn(next);
                else
                    EndAllPlants();
            }
        }

        private int IndexForYear(int year) => year - startYear;

        private void ValidateArrays()
        {
            int n = RotationCrops.Length;
            if (new[] { RotationCultivars.Length, RotationSowingDepths.Length,
                        RotationRowSpacings.Length, RotationPopulations.Length,
                        RotationSowingDates.Length, RotationHarvestDates.Length }.Any(x => x != n))
                throw new Exception("All rotation and calendar arrays must have the same length.");
        }

        private bool DateMatches(string dayMonth)
        {
            if (string.IsNullOrWhiteSpace(dayMonth) || dayMonth == "-")
                return false;
            return DateUtilities.WithinDates(dayMonth, Clock.Today, dayMonth);
        }

        private string[] Parts(string value, char separator) =>
            value.Split(separator).Select(x => x.Trim()).ToArray();

        private bool IsPerennial(string crop) =>
            crop.Equals("RedClover", StringComparison.OrdinalIgnoreCase) ||
            crop.Equals("PlantainForage", StringComparison.OrdinalIgnoreCase);

        private bool IsPurePerennial(int index) => Parts(RotationCrops[index], '+').All(IsPerennial);

        private bool IsWinterCrop(int index) =>
            RotationCrops[index].IndexOf("Wheat", StringComparison.OrdinalIgnoreCase) >= 0 &&
            RotationCultivars[index].IndexOf("Winter_rye", StringComparison.OrdinalIgnoreCase) >= 0;

        private bool IsCerealToOatsTransition(int index)
        {
            int next = index + 1;
            return next < RotationCrops.Length &&
                Parts(RotationCrops[index], '+').Any(crop =>
                    crop.Equals("Wheat", StringComparison.OrdinalIgnoreCase)) &&
                Parts(RotationCrops[next], '+').Any(crop =>
                    crop.Equals("Oats", StringComparison.OrdinalIgnoreCase));
        }

        private void SowGroup(int index, string reason)
        {
            string[] crops = Parts(RotationCrops[index], '+');
            string[] cultivars = Parts(RotationCultivars[index], ';');
            string[] depths = Parts(RotationSowingDepths[index], ';');
            string[] spacings = Parts(RotationRowSpacings[index], ';');
            string[] populations = Parts(RotationPopulations[index], ';');
            for (int i = 0; i < crops.Length; i++)
            {
                IPlant plant = plants[crops[i]];
                if (plant.IsAlive)
                    continue;
                string cultivar = i < cultivars.Length ? cultivars[i] : "Default";
                double depth = double.Parse(i < depths.Length ? depths[i] : "20", CultureInfo.InvariantCulture);
                double spacing = double.Parse(i < spacings.Length ? spacings[i] : "150", CultureInfo.InvariantCulture);
                double population = double.Parse(i < populations.Length ? populations[i] : "200", CultureInfo.InvariantCulture);
                plant.Sow(population: population, cultivar: cultivar, depth: depth, rowSpacing: spacing);
                Summary.WriteMessage(this, $"Sowed {crops[i]} ({cultivar}) on {Clock.Today:d}: {reason}", MessageType.Information);
            }
        }

        private void HarvestGroup(int index)
        {
            foreach (string crop in Parts(RotationCrops[index], '+'))
            {
                IPlant plant = plants[crop];
                if (!plant.IsAlive)
                    continue;
                plant.Harvest();
                if (!IsPerennial(crop))
                    plant.EndCrop();
            }
            Summary.WriteMessage(this, $"Scheduled harvest/cut on {Clock.Today:d}", MessageType.Information);
        }

        private void EndPlantsNotIn(int index)
        {
            HashSet<string> keep = new HashSet<string>(Parts(RotationCrops[index], '+'), StringComparer.OrdinalIgnoreCase);
            foreach (KeyValuePair<string, IPlant> item in plants)
                if (item.Value.IsAlive && !keep.Contains(item.Key))
                    item.Value.EndCrop();
        }

        private void EndAllPlants()
        {
            foreach (IPlant plant in plants.Values)
                if (plant.IsAlive)
                    plant.EndCrop();
        }
    }
}
```
      Manager Fertilise at sowing
        FertiliserType = NO3N
        Amount = 30
        script: same as in Wheat.Field1.Fertilise at sowing
      Manager Harvest
        Crop = [Wheat]
```csharp
using APSIM.Shared.Utilities;
using Models.Utilities;
using Models.Soils;
using Models.PMF;
using Models.Core;
using System;
using System.Linq;

namespace Models
{
    [Serializable] 
    public class Script : Model
    {
        [Link] private Clock Clock;

        [Description("Crop")]
        public IPlant Crop { get; set; }
        
        [EventSubscribe("DoManagement")]
        private void OnDoManagement(object sender, EventArgs e)
        {
            if (Crop.IsReadyForHarvesting && !(Clock.Today.Year == 2022))
            {
                Crop.Harvest();
                Crop.EndCrop();
            }
        }
    }
}
```
      Manager SWIMSetLowerBC: same as Wheat.Field1.SWIMSetLowerBC
      Manager Synchroniser: same as Wheat.Field1.Synchroniser
    Zone Field3: Area=1; Slope=0; AspectAngle=0; Altitude=50; CanopyType=BroadAcre
      Report Report3: same as Wheat.Field1.Report1
      Fertiliser
      Soil: ASCOrder=Vertosol; ASCSubOrder=Black; SoilType=Clay; Site=Norwin; NearestTown=Norwin; Region=Darling Downs and Granite Belt; State=Queensland; Country=Russia; NaturalVegetation=Qld. Bluegrass, possible Qld. Blue gum; ApsoilNumber=900; Latitude=56.77719; Longitude=56.11066; LocationAccuracy=+/- 20m; YearOfSampling=0
        DataSource=CSIRO Sustainable Ecosystems, Toowoomba; Characteriesd as part of the GRDC funded project"Doing it better, doing it smarter, managing soil water in Australian agriculture' 2011
        Comments=Clay - OC, CLL for all crops estimated-based on Bongeen Mywybilla Soil No1
        Organic: same as Wheat.Field1.Soil.Organic
        Chemical: Thickness=[150, 150, 300, 300, 300, 300, 300]; PH=[5.09, 5.09, 5, 5, 5, 5, 5]; PHUnits=Water
        Water: Thickness=[150, 150, 300, 300, 300, 300, 300]; FilledFromTop=false
          InitialValues=[0.297925, 0.274107, 0.30985, 0.3085, 0.307, 0.3052, 0.30505]
        Nutrient
        Solute NO3: same as Wheat.Field1.Soil.NO3
        Solute NH4: same as Wheat.Field1.Soil.NH4
        Solute Urea: same as Wheat.Field1.Soil.Urea
        SoilTemperature: InteractionsPerDay=8
        LayerStructure: Thickness=[150, 150, 300, 300, 300, 300, 300]
        CERESSoilTemperature
        Physical: same as Wheat.Field1.Soil.Physical
        Swim3: same as Wheat.Field1.Soil.Swim3
        CERESSoilTemperature Temperature
      SurfaceOrganicMatter: InitialResidueName=redclover_stubble; InitialResidueType=redclover; InitialResidueMass=500; InitialStandingFraction=0; InitialCPR=0; InitialCNR=100
      Plant RedClover: same as Wheat.Field1.RedClover
      Plant Wheat: same as Wheat.Field1.Wheat
      Plant Oats: same as Wheat.Field1.Oats
      Plant Potato
      Plant PlantainForage: same as Wheat.Field1.PlantainForage
      Plant Mustard: ResourceName=Canola
        Cultivar Mustard_sort
          Command:
            [Phenology].Vegetative.Target.XYPairs.X = 0, 25
            [Phenology].Vegetative.Target.XYPairs.Y = 210, 1
            [Phenology].StemElongation.Target.PPResponse.Amount.FixedValue = 180
            [Leaf].Phyllochron.Base.FixedValue = 55
      Plant Rape: ResourceName=Canola
        Cultivar Rape_sort
          Command:
            [Phenology].Vegetative.Target.XYPairs.X = 0, 25
            [Phenology].Vegetative.Target.XYPairs.Y = 290, 1
            [Phenology].StemElongation.Target.PPResponse.Amount.FixedValue = 240
            [Leaf].Phyllochron.Base.FixedValue = 65
      Manager Sow using a variable rule
        StartDate = 1-may
        EndDate = 30-may
        MinESW = 100
        MinRain = 25
        RainDays = 12
        RotationCrops = Oats+RedClover+PlantainForage, RedClover+PlantainForage, RedClover+PlantainForage, Wheat, Wheat
        RotationCultivars = Yakov;First_RedClover;First_Timothy, First_RedClover;First_Timothy, Second_RedClover;Second_Timothy, Winter_rye_smoke, Zlata
        RotationSowingDepths = 20;10;10, 10;10, 10;10, 20, 28
        RotationRowSpacings = 150;150;150, 150;150, 150;150, 150, 200
        RotationPopulations = 250;150;150, 450;300, 450;300, 200, 480
        RotationSowingDates = 7-May, -, -, 9-Sep, 3-May
        RotationHarvestDates = 31-Aug, 30-Sep, 30-Sep, 31-Aug, 21-Aug
        script: same as in Wheat.Field1.Sow using a variable rule
      Manager Fertilise at sowing: same as Wheat.Field2.Fertilise at sowing
      Manager Harvest: same as Wheat.Field1.Harvest
      Manager SWIMSetLowerBC: same as Wheat.Field1.SWIMSetLowerBC
      Manager Synchroniser: same as Wheat.Field1.Synchroniser
    Zone Field4: Area=1; Slope=0; AspectAngle=0; Altitude=50; CanopyType=BroadAcre
      Report Report4: same as Wheat.Field1.Report1
      Fertiliser
      Soil: ASCOrder=Vertosol; ASCSubOrder=Black; SoilType=Clay; Site=Norwin; NearestTown=Norwin; Region=Darling Downs and Granite Belt; State=Queensland; Country=Russia; NaturalVegetation=Qld. Bluegrass, possible Qld. Blue gum; ApsoilNumber=900; Latitude=56.77719; Longitude=56.11066; LocationAccuracy=+/- 20m; YearOfSampling=0
        DataSource=CSIRO Sustainable Ecosystems, Toowoomba; Characteriesd as part of the GRDC funded project"Doing it better, doing it smarter, managing soil water in Australian agriculture' 2011
        Comments=Clay - OC, CLL for all crops estimated-based on Bongeen Mywybilla Soil No1
        Organic: same as Wheat.Field1.Soil.Organic
        Chemical: Thickness=[150, 150, 300, 300, 300, 300, 300]; PH=[5.09, 5.09, 5, 5, 5, 5, 5]; PHUnits=Water
        Water: Thickness=[150, 150, 300, 300, 300, 300, 300]; InitialValues=[0.28545, 0.265526, 0.2999, 0.299, 0.298, 0.2968, 0.2967]; FilledFromTop=false
        Nutrient
        Solute NO3: InitialValuesUnits=ppm; WaterTableConcentration=0; D0=0; DepthConstant=0; MaxDepthSoluteAccessible=0; RunoffEffectivenessAtMovingSolute=0; MaxEffectiveRunoff=0
          Thickness  InitialValues  Exco  FIP
          150        3.5            0     1
          150        3              0     1
          300        2.5            0     1
          300        2              0     1
          300        1.5            0     1
          300        1              0     1
          300        0.5            0     1
        Solute NH4: same as Wheat.Field1.Soil.NH4
        Solute Urea: same as Wheat.Field1.Soil.Urea
        SoilTemperature: InteractionsPerDay=8
        LayerStructure: Thickness=[150, 150, 300, 300, 300, 300, 300]
        CERESSoilTemperature
        Physical: same as Wheat.Field1.Soil.Physical
        Swim3: same as Wheat.Field1.Soil.Swim3
        CERESSoilTemperature Temperature
      SurfaceOrganicMatter: InitialResidueName=redclover_stubble; InitialResidueType=redclover; InitialResidueMass=500; InitialStandingFraction=0; InitialCPR=0; InitialCNR=100
      Plant RedClover: same as Wheat.Field1.RedClover
      Plant Wheat: same as Wheat.Field1.Wheat
      Plant Oats: same as Wheat.Field1.Oats
      Plant Potato
      Plant PlantainForage: same as Wheat.Field1.PlantainForage
      Plant Mustard: ResourceName=Canola
        Cultivar Mustard_sort
          Command:
            [Phenology].Vegetative.Target.XYPairs.X = 0, 25
            [Phenology].Vegetative.Target.XYPairs.Y = 210, 1
            [Phenology].StemElongation.Target.PPResponse.Amount.FixedValue = 180
            [Leaf].Phyllochron.Base.FixedValue = 55
      Plant Rape: ResourceName=Canola
        Cultivar Rape_sort
          Command:
            [Phenology].Vegetative.Target.XYPairs.X = 0, 25
            [Phenology].Vegetative.Target.XYPairs.Y = 290, 1
            [Phenology].StemElongation.Target.PPResponse.Amount.FixedValue = 240
            [Leaf].Phyllochron.Base.FixedValue = 65
      Manager Sow using a variable rule
        StartDate = 1-may
        EndDate = 30-may
        MinESW = 100
        MinRain = 25
        RainDays = 12
        RotationCrops = RedClover+PlantainForage, RedClover+PlantainForage, Wheat, Oats+RedClover+PlantainForage, RedClover+PlantainForage
        RotationCultivars = First_RedClover;First_Timothy, Second_RedClover;Second_Timothy, Zlata, Yakov;First_RedClover;First_Timothy, First_RedClover;First_Timothy
        RotationSowingDepths = 10;10, 10;10, 20, 20;10;10, 10;10
        RotationRowSpacings = 150;150, 150;150, 150, 150;150;150, 150;150
        RotationPopulations = 450;300, 450;300, 200, 250;150;150, 450;300
        RotationSowingDates = -, -, 18-May, 12-May, -
        RotationHarvestDates = 30-Sep, 30-Sep, 14-Aug, 31-Aug, 30-Sep
        script: same as in Wheat.Field1.Sow using a variable rule
      Manager Fertilise at sowing: same as Wheat.Field1.Fertilise at sowing
      Manager Harvest: same as Wheat.Field1.Harvest
      Manager SWIMSetLowerBC: same as Wheat.Field1.SWIMSetLowerBC
      Manager Synchroniser: same as Wheat.Field1.Synchroniser
    Zone Field5: Area=1; Slope=0; AspectAngle=0; Altitude=50; CanopyType=BroadAcre
      Report Report5: same as Wheat.Field1.Report1
      Fertiliser
      Soil: same as Wheat.Field3.Soil
      SurfaceOrganicMatter: InitialResidueName=redclover_stubble; InitialResidueType=redclover; InitialResidueMass=500; InitialStandingFraction=0; InitialCPR=0; InitialCNR=100
      Plant RedClover: same as Wheat.Field1.RedClover
      Plant Wheat: same as Wheat.Field1.Wheat
      Plant Oats: same as Wheat.Field1.Oats
      Plant Potato
      Plant PlantainForage: same as Wheat.Field1.PlantainForage
      Plant Mustard: ResourceName=Canola
        Cultivar Mustard_sort
          Command:
            [Phenology].Vegetative.Target.XYPairs.X = 0, 25
            [Phenology].Vegetative.Target.XYPairs.Y = 210, 1
            [Phenology].StemElongation.Target.PPResponse.Amount.FixedValue = 180
            [Leaf].Phyllochron.Base.FixedValue = 55
      Plant Rape: ResourceName=Canola
        Cultivar Rape_sort
          Command:
            [Phenology].Vegetative.Target.XYPairs.X = 0, 25
            [Phenology].Vegetative.Target.XYPairs.Y = 290, 1
            [Phenology].StemElongation.Target.PPResponse.Amount.FixedValue = 240
            [Leaf].Phyllochron.Base.FixedValue = 65
      Manager Sow using a variable rule
        StartDate = 1-may
        EndDate = 30-may
        MinESW = 100
        MinRain = 25
        RainDays = 12
        RotationCrops = Wheat, Oats+RedClover+PlantainForage, RedClover+PlantainForage, RedClover+PlantainForage, Wheat
        RotationCultivars = Winter_rye_smoke, Yakov;First_RedClover;First_Timothy, First_RedClover;First_Timothy, Second_RedClover;Second_Timothy, Winter_rye_smoke
        RotationSowingDepths = 20, 20;10;10, 10;10, 10;10, 20
        RotationRowSpacings = 150, 150;150;150, 150;150, 150;150, 150
        RotationPopulations = 200, 250;150;150, 450;300, 450;300, 200
        RotationSowingDates = 4-Sep, 28-Apr, -, -, 5-Sep
        RotationHarvestDates = 31-Aug, 31-Aug, 30-Sep, 30-Sep, 31-Aug
        script: same as in Wheat.Field1.Sow using a variable rule
      Manager Fertilise at sowing: same as Wheat.Field2.Fertilise at sowing
      Manager Harvest: same as Wheat.Field1.Harvest
      Manager SWIMSetLowerBC: same as Wheat.Field1.SWIMSetLowerBC
      Manager Synchroniser: same as Wheat.Field1.Synchroniser
    Zone Field6: Area=1; Slope=0; AspectAngle=0; Altitude=50; CanopyType=BroadAcre
      Report Report6: same as Wheat.Field1.Report1
      Fertiliser
      Soil: ASCOrder=Vertosol; ASCSubOrder=Black; SoilType=Clay; Site=Norwin; NearestTown=Norwin; Region=Darling Downs and Granite Belt; State=Queensland; Country=Russia; NaturalVegetation=Qld. Bluegrass, possible Qld. Blue gum; ApsoilNumber=900; Latitude=56.77719; Longitude=56.11066; LocationAccuracy=+/- 20m; YearOfSampling=0
        DataSource=CSIRO Sustainable Ecosystems, Toowoomba; Characteriesd as part of the GRDC funded project"Doing it better, doing it smarter, managing soil water in Australian agriculture' 2011
        Comments=Clay - OC, CLL for all crops estimated-based on Bongeen Mywybilla Soil No1
        Organic: same as Wheat.Field1.Soil.Organic
        Chemical: Thickness=[150, 150, 300, 300, 300, 300, 300]; PH=[5.09, 5.09, 5, 5, 5, 5, 5]; PHUnits=Water
        Water: Thickness=[150, 150, 300, 300, 300, 300, 300]; InitialValues=[0.33535, 0.299853, 0.3397, 0.337, 0.334, 0.3304, 0.3301]; FilledFromTop=false
        Nutrient
        Solute NO3: same as Wheat.Field1.Soil.NO3
        Solute NH4: same as Wheat.Field1.Soil.NH4
        Solute Urea: same as Wheat.Field1.Soil.Urea
        SoilTemperature: InteractionsPerDay=8
        LayerStructure: Thickness=[150, 150, 300, 300, 300, 300, 300]
        CERESSoilTemperature
        Physical: same as Wheat.Field1.Soil.Physical
        Swim3: same as Wheat.Field1.Soil.Swim3
        CERESSoilTemperature Temperature
      SurfaceOrganicMatter: InitialResidueName=redclover_stubble; InitialResidueType=redclover; InitialResidueMass=500; InitialStandingFraction=0; InitialCPR=0; InitialCNR=100
      Plant RedClover: same as Wheat.Field1.RedClover
      Plant Wheat: same as Wheat.Field1.Wheat
      Plant Oats: same as Wheat.Field1.Oats
      Plant Potato
      Plant PlantainForage: same as Wheat.Field1.PlantainForage
      Plant Mustard: ResourceName=Canola
        Cultivar Mustard_sort
          Command:
            [Phenology].Vegetative.Target.XYPairs.X = 0, 25
            [Phenology].Vegetative.Target.XYPairs.Y = 210, 1
            [Phenology].StemElongation.Target.PPResponse.Amount.FixedValue = 180
            [Leaf].Phyllochron.Base.FixedValue = 55
      Plant Rape: ResourceName=Canola
        Cultivar Rape_sort
          Command:
            [Phenology].Vegetative.Target.XYPairs.X = 0, 25
            [Phenology].Vegetative.Target.XYPairs.Y = 290, 1
            [Phenology].StemElongation.Target.PPResponse.Amount.FixedValue = 240
            [Leaf].Phyllochron.Base.FixedValue = 65
      Manager Sow using a variable rule
        StartDate = 1-may
        EndDate = 30-may
        MinESW = 100
        MinRain = 25
        RainDays = 12
        RotationCrops = RedClover+PlantainForage, Wheat, Oats+RedClover+PlantainForage, RedClover+PlantainForage, RedClover+PlantainForage
        RotationCultivars = Second_RedClover;Second_Timothy, Zlata, Yakov;First_RedClover;First_Timothy, First_RedClover;First_Timothy, Second_RedClover;Second_Timothy
        RotationSowingDepths = 10;10, 20, 20;10;10, 10;10, 10;10
        RotationRowSpacings = 150;150, 150, 150;150;150, 150;150, 150;150
        RotationPopulations = 450;300, 200, 250;150;150, 450;300, 450;300
        RotationSowingDates = -, 11-May, 18-May, -, -
        RotationHarvestDates = 30-Sep, 20-Aug, 31-Aug, 30-Sep, 30-Sep
        script: same as in Wheat.Field1.Sow using a variable rule
      Manager Fertilise at sowing: same as Wheat.Field2.Fertilise at sowing
      Manager Harvest: same as Wheat.Field1.Harvest
      Manager SWIMSetLowerBC: same as Wheat.Field1.SWIMSetLowerBC
      Manager Synchroniser: same as Wheat.Field1.Synchroniser
    Zone Field7: Area=1; Slope=0; AspectAngle=0; Altitude=50; CanopyType=BroadAcre
      Report Report7: same as Wheat.Field2.Report2
      Fertiliser
      Soil: same as Wheat.Field3.Soil
      SurfaceOrganicMatter: InitialResidueName=redclover_stubble; InitialResidueType=redclover; InitialResidueMass=500; InitialStandingFraction=0; InitialCPR=0; InitialCNR=100
      Plant RedClover: same as Wheat.Field1.RedClover
      Plant Wheat: same as Wheat.Field1.Wheat
      Plant Oats: same as Wheat.Field1.Oats
      Plant Potato
      Plant PlantainForage: same as Wheat.Field1.PlantainForage
      Plant Mustard: ResourceName=Canola
        Cultivar Mustard_sort
          Command:
            [Phenology].Vegetative.Target.XYPairs.X = 0, 25
            [Phenology].Vegetative.Target.XYPairs.Y = 210, 1
            [Phenology].StemElongation.Target.PPResponse.Amount.FixedValue = 180
            [Leaf].Phyllochron.Base.FixedValue = 55
      Plant Rape: ResourceName=Canola
        Cultivar Rape_sort
          Command:
            [Phenology].Vegetative.Target.XYPairs.X = 0, 25
            [Phenology].Vegetative.Target.XYPairs.Y = 290, 1
            [Phenology].StemElongation.Target.PPResponse.Amount.FixedValue = 240
            [Leaf].Phyllochron.Base.FixedValue = 65
      Manager Sow using a variable rule
        StartDate = 1-may
        EndDate = 30-may
        MinESW = 100
        MinRain = 25
        RainDays = 12
        RotationCrops = Wheat, Rape, Wheat, Wheat, Oats+RedClover+PlantainForage
        RotationCultivars = Irgina, Rape_sort, Winter_rye_smoke, Zlata, Yakov;First_RedClover;First_Timothy
        RotationSowingDepths = 20, 20, 20, 20, 20;10;10
        RotationRowSpacings = 150, 200, 150, 150, 150;150;150
        RotationPopulations = 200, 45, 200, 200, 250;150;150
        RotationSowingDates = 7-May, 10-May, 8-Sep, 12-May, 4-May
        RotationHarvestDates = 9-Aug, 31-Aug, 31-Aug, 17-Aug, 31-Aug
        script: same as in Wheat.Field2.Sow using a variable rule
      Manager Fertilise at sowing: same as Wheat.Field2.Fertilise at sowing
      Manager Harvest: same as Wheat.Field2.Harvest
      Manager SWIMSetLowerBC: same as Wheat.Field1.SWIMSetLowerBC
      Manager Synchroniser: same as Wheat.Field1.Synchroniser
    Zone Field8: Area=1; Slope=0; AspectAngle=0; Altitude=50; CanopyType=BroadAcre
      Report Report8: same as Wheat.Field1.Report1
      Fertiliser
      Soil: same as Wheat.Field3.Soil
      SurfaceOrganicMatter: InitialResidueName=redclover_stubble; InitialResidueType=redclover; InitialResidueMass=500; InitialStandingFraction=0; InitialCPR=0; InitialCNR=100
      Plant RedClover: same as Wheat.Field1.RedClover
      Plant Wheat: same as Wheat.Field1.Wheat
      Plant Oats: same as Wheat.Field1.Oats
      Plant Potato
      Plant PlantainForage: same as Wheat.Field1.PlantainForage
      Plant Mustard: ResourceName=Canola
        Cultivar Mustard_sort
          Command:
            [Phenology].Vegetative.Target.XYPairs.X = 0, 25
            [Phenology].Vegetative.Target.XYPairs.Y = 210, 1
            [Phenology].StemElongation.Target.PPResponse.Amount.FixedValue = 180
            [Leaf].Phyllochron.Base.FixedValue = 55
      Plant Rape: ResourceName=Canola
        Cultivar Rape_sort
          Command:
            [Phenology].Vegetative.Target.XYPairs.X = 0, 25
            [Phenology].Vegetative.Target.XYPairs.Y = 290, 1
            [Phenology].StemElongation.Target.PPResponse.Amount.FixedValue = 240
            [Leaf].Phyllochron.Base.FixedValue = 65
      Manager Sow using a variable rule
        StartDate = 1-may
        EndDate = 30-may
        MinESW = 100
        MinRain = 25
        RainDays = 12
        RotationCrops = RedClover+PlantainForage, RedClover+PlantainForage, Rape, Wheat, Wheat
        RotationCultivars = Second_RedClover;Second_Timothy, Second_RedClover;Second_Timothy, Rape_sort, Winter_rye_smoke, Zlata
        RotationSowingDepths = 10;10, 10;10, 20, 20, 20
        RotationRowSpacings = 150;150, 150;150, 200, 150, 150
        RotationPopulations = 450;300, 450;300, 45, 200, 200
        RotationSowingDates = -, -, 10-May, 9-Sep, 3-May
        RotationHarvestDates = 30-Sep, 30-Sep, 31-Aug, 31-Aug, 21-Aug
        script: same as in Wheat.Field1.Sow using a variable rule
      Manager Fertilise at sowing: same as Wheat.Field2.Fertilise at sowing
      Manager Harvest: same as Wheat.Field1.Harvest
      Manager SWIMSetLowerBC: same as Wheat.Field1.SWIMSetLowerBC
      Manager Synchroniser: same as Wheat.Field1.Synchroniser
    Zone Field9: Area=1; Slope=0; AspectAngle=0; Altitude=50; CanopyType=BroadAcre
      Report Report9: same as Wheat.Field1.Report1
      Fertiliser
      Soil: ASCOrder=Vertosol; ASCSubOrder=Black; SoilType=Clay; Site=Norwin; NearestTown=Norwin; Region=Darling Downs and Granite Belt; State=Queensland; Country=Russia; NaturalVegetation=Qld. Bluegrass, possible Qld. Blue gum; ApsoilNumber=900; Latitude=56.77719; Longitude=56.11066; LocationAccuracy=+/- 20m; YearOfSampling=0
        DataSource=CSIRO Sustainable Ecosystems, Toowoomba; Characteriesd as part of the GRDC funded project"Doing it better, doing it smarter, managing soil water in Australian agriculture' 2011
        Comments=Clay - OC, CLL for all crops estimated-based on Bongeen Mywybilla Soil No1
        Organic: same as Wheat.Field1.Soil.Organic
        Chemical: Thickness=[150, 150, 300, 300, 300, 300, 300]; PH=[5.09, 5.09, 5, 5, 5, 5, 5]; PHUnits=Water
        Water: Thickness=[150, 150, 300, 300, 300, 300, 300]; FilledFromTop=false
          InitialValues=[0.347825, 0.308435, 0.34965, 0.3465, 0.343, 0.3388, 0.33845]
        Nutrient
        Solute NO3: same as Wheat.Field1.Soil.NO3
        Solute NH4: same as Wheat.Field1.Soil.NH4
        Solute Urea: same as Wheat.Field1.Soil.Urea
        SoilTemperature: InteractionsPerDay=8
        LayerStructure: Thickness=[150, 150, 300, 300, 300, 300, 300]
        CERESSoilTemperature
        Physical: same as Wheat.Field1.Soil.Physical
        Swim3: same as Wheat.Field1.Soil.Swim3
        CERESSoilTemperature Temperature
      SurfaceOrganicMatter: InitialResidueName=redclover_stubble; InitialResidueType=redclover; InitialResidueMass=500; InitialStandingFraction=0; InitialCPR=0; InitialCNR=100
      Plant RedClover: same as Wheat.Field1.RedClover
      Plant Wheat: same as Wheat.Field1.Wheat
      Plant Oats: same as Wheat.Field1.Oats
      Plant Potato
      Plant PlantainForage: same as Wheat.Field1.PlantainForage
      Plant Mustard: ResourceName=Canola
        Cultivar Mustard_sort
          Command:
            [Phenology].Vegetative.Target.XYPairs.X = 0, 25
            [Phenology].Vegetative.Target.XYPairs.Y = 210, 1
            [Phenology].StemElongation.Target.PPResponse.Amount.FixedValue = 180
            [Leaf].Phyllochron.Base.FixedValue = 55
      Plant Rape: ResourceName=Canola
        Cultivar Rape_sort
          Command:
            [Phenology].Vegetative.Target.XYPairs.X = 0, 25
            [Phenology].Vegetative.Target.XYPairs.Y = 290, 1
            [Phenology].StemElongation.Target.PPResponse.Amount.FixedValue = 240
            [Leaf].Phyllochron.Base.FixedValue = 65
      Manager Sow using a variable rule
        StartDate = 1-may
        EndDate = 30-may
        MinESW = 100
        MinRain = 25
        RainDays = 12
        RotationCrops = RedClover+PlantainForage, Mustard, Rape, Mustard, Wheat
        RotationCultivars = Second_RedClover;Second_Timothy, Mustard_sort, Rape_sort, Mustard_sort, Winter_rye_smoke
        RotationSowingDepths = 10;10, 20, 20, 20, 20
        RotationRowSpacings = 150;150, 200, 200, 200, 150
        RotationPopulations = 450;300, 45, 45, 45, 200
        RotationSowingDates = -, 10-May, 10-May, 10-May, 5-Sep
        RotationHarvestDates = 30-Sep, 31-Aug, 31-Aug, 31-Aug, 31-Aug
        script: same as in Wheat.Field1.Sow using a variable rule
      Manager Fertilise at sowing: same as Wheat.Field2.Fertilise at sowing
      Manager Harvest: same as Wheat.Field1.Harvest
      Manager SWIMSetLowerBC: same as Wheat.Field1.SWIMSetLowerBC
      Manager Synchroniser: same as Wheat.Field1.Synchroniser
    Zone Field10: Area=1; Slope=0; AspectAngle=0; Altitude=50; CanopyType=BroadAcre
      Report Report10: same as Wheat.Field1.Report1
      Fertiliser
      Soil: same as Wheat.Field3.Soil
      SurfaceOrganicMatter: InitialResidueName=redclover_stubble; InitialResidueType=redclover; InitialResidueMass=500; InitialStandingFraction=0; InitialCPR=0; InitialCNR=100
      Plant RedClover: same as Wheat.Field1.RedClover
      Plant Wheat: same as Wheat.Field1.Wheat
      Plant Oats: same as Wheat.Field1.Oats
      Plant Potato
      Plant PlantainForage: same as Wheat.Field1.PlantainForage
      Plant Mustard: ResourceName=Canola
        Cultivar Mustard_sort
          Command:
            [Phenology].Vegetative.Target.XYPairs.X = 0, 25
            [Phenology].Vegetative.Target.XYPairs.Y = 210, 1
            [Phenology].StemElongation.Target.PPResponse.Amount.FixedValue = 180
            [Leaf].Phyllochron.Base.FixedValue = 55
      Plant Rape: ResourceName=Canola
        Cultivar Rape_sort
          Command:
            [Phenology].Vegetative.Target.XYPairs.X = 0, 25
            [Phenology].Vegetative.Target.XYPairs.Y = 290, 1
            [Phenology].StemElongation.Target.PPResponse.Amount.FixedValue = 240
            [Leaf].Phyllochron.Base.FixedValue = 65
      Manager Sow using a variable rule
        StartDate = 1-may
        EndDate = 30-may
        MinESW = 100
        MinRain = 25
        RainDays = 12
        RotationCrops = RedClover+PlantainForage, Mustard, Wheat, Oats+RedClover+PlantainForage, RedClover+PlantainForage
        RotationCultivars = Second_RedClover;Second_Timothy, Mustard_sort, Zlata, Yakov;First_RedClover;First_Timothy, First_RedClover;First_Timothy
        RotationSowingDepths = 10;10, 20, 20, 20;10;10, 10;10
        RotationRowSpacings = 150;150, 150, 150, 150;150;150, 150;150
        RotationPopulations = 450;300, 200, 200, 250;150;150, 450;300
        RotationSowingDates = -, 10-May, 18-May, 12-May, -
        RotationHarvestDates = 30-Sep, 31-Aug, 16-Aug, 31-Aug, 30-Sep
        script: same as in Wheat.Field1.Sow using a variable rule
      Manager Fertilise at sowing
        FertiliserType = NH4NO3N
        Amount = 60
        script: same as in Wheat.Field1.Fertilise at sowing
      Manager Harvest: same as Wheat.Field1.Harvest
      Manager SWIMSetLowerBC: same as Wheat.Field1.SWIMSetLowerBC
      Manager Synchroniser: same as Wheat.Field1.Synchroniser
  DataStore
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