Simulations: Version=216
  Simulation Wheat
    Clock: Start=2004-01-01; End=2023-12-31
    Summary
    Weather: FileName=weather.met
    SoilArbitrator
    MicroClimate: a_interception=0; b_interception=1; c_interception=0; d_interception=0; SoilHeatFluxFraction=0.4; MinimumHeightDiffForNewLayer=0; NightInterceptionFraction=0.5; ReferenceHeight=2
    Zone Field1: Area=1; Slope=0; AspectAngle=0; Altitude=50; CanopyType=BroadAcre
      Fertiliser
      Soil: ASCOrder=Vertosol; ASCSubOrder=Black; SoilType=Clay; Site=Norwin; NearestTown=Norwin; Region=Darling Downs and Granite Belt; State=Queensland; Country=Russia; NaturalVegetation=Qld. Bluegrass, possible Qld. Blue gum; ApsoilNumber=900; Latitude=56.77719; Longitude=56.11066; LocationAccuracy=+/- 20m; YearOfSampling=0
        DataSource=CSIRO Sustainable Ecosystems, Toowoomba; Characteriesd as part of the GRDC funded project"Doing it better, doing it smarter, managing soil water in Australian agriculture' 2011
        Comments=Clay - OC, CLL for all crops estimated-based on Bongeen Mywybilla Soil No1
        Organic: FOMCNRatio=30; CarbonUnits=Total
          Thickness  Carbon  SoilCNRatio  FBiom  FInert  FOM
          150        1.44    12           0.06   0.35    347.129
          150        1.16    12           0.04   0.55    270.344
          300        1.04    12           0.03   0.75    163.972
          300        0.93    12           0.02   1       99.4541
          300        0.81    12           0.01   1       60.322
          300        0.73    12           0.01   1       36.5871
          300        0.5     12           0.01   1       22.1912
        Chemical: Thickness=[150, 150, 300, 300, 300, 300, 300]; PH=[5.09, 5.09, 5, 5, 5, 5, 5]; PHUnits=Water
        Water: Thickness=[150, 150, 300, 300, 300, 300, 300]; InitialValues=[0.33535, 0.299853, 0.3397, 0.337, 0.334, 0.3304, 0.3301]; FilledFromTop=false
        Nutrient
        Solute NO3: InitialValuesUnits=ppm; WaterTableConcentration=0; D0=0; DepthConstant=0; MaxDepthSoluteAccessible=0; RunoffEffectivenessAtMovingSolute=0; MaxEffectiveRunoff=0
          Thickness  InitialValues  Exco  FIP
          150        4              0     1
          150        3.5            0     1
          300        3              0     1
          300        2              0     1
          300        1.5            0     1
          300        1              0     1
          300        0.5            0     1
        Solute NH4: InitialValuesUnits=ppm; WaterTableConcentration=0; D0=0.05; DepthConstant=0; MaxDepthSoluteAccessible=0; RunoffEffectivenessAtMovingSolute=0; MaxEffectiveRunoff=0
          Thickness  InitialValues  Exco  FIP
          150        1              0     1
          150        0.8            0     1
          300        0.5            0     1
          300        0.3            0     1
          300        0.2            0     1
          300        0.1            0     1
          300        0.05           0     1
        Solute Urea: InitialValuesUnits=kg/ha; WaterTableConcentration=0; D0=0.05; DepthConstant=0; MaxDepthSoluteAccessible=0; RunoffEffectivenessAtMovingSolute=0; MaxEffectiveRunoff=0
          Thickness  InitialValues  Exco  FIP
          150        0              0     1
          150        0              0     1
          300        0              0     1
          300        0              0     1
          300        0              0     1
          300        0              0     1
          300        0              0     1
        SoilTemperature: InteractionsPerDay=8
        LayerStructure: Thickness=[150, 150, 300, 300, 300, 300, 300]
        Physical
          Thickness  ParticleSizeSand  ParticleSizeSilt  ParticleSizeClay  Rocks  BD    AirDry    LL15      DUL    SAT    KS
          150        52.31             33.03             14.66             0      1.19  0.13025   0.2605    0.51   0.515  20
          150        81.61             10.68             7.71              0      1.25  0.198689  0.248362  0.42   0.487  20
          300        40                30                30                0      1.3   0.28      0.28      0.479  0.48   20
          300        40                30                30                0      1.35  0.28      0.28      0.47   0.472  20
          300        40                30                30                0      1.35  0.28      0.28      0.46   0.464  20
          300        40                30                30                0      1.35  0.28      0.28      0.448  0.449  20
          300        40                30                30                0      1.35  0.28      0.28      0.447  0.452  20
          SoilCrop WheatSoil: LL=[0.261, 0.248, 0.28, 0.28, 0.28, 0.28, 0.28]; KL=[0.06, 0.06, 0.06, 0.04, 0.04, 0.02, 0.01]; XF=[1, 1, 1, 1, 1, 1, 1]
          SoilCrop RedCloverSoil: LL=[0.261, 0.248, 0.28, 0.28, 0.28, 0.28, 0.28]; KL=[0.06, 0.06, 0.06, 0.05, 0.05, 0.03, 0.02]; XF=[1, 1, 1, 1, 1, 1, 1]
          SoilCrop PlantainForageSoil: LL=[0.261, 0.248, 0.28, 0.28, 0.28, 0.28, 0.28]; KL=[0.06, 0.06, 0.06, 0.045, 0.04, 0.02, 0.01]; XF=[1, 1, 1, 1, 0.8, 0.5, 0.2]
          SoilCrop OatsSoil: LL=[0.261, 0.248, 0.28, 0.28, 0.28, 0.28, 0.28]; KL=[0.06, 0.06, 0.06, 0.04, 0.03, 0.015, 0.005]; XF=[1, 1, 1, 1, 0.8, 0.3, 0.1]
          SoilCrop PotatoSoil: LL=[0.261, 0.248, 0.28, 0.28, 0.28, 0.28, 0.28]; KL=[0.09, 0.08, 0.06, 0.04, 0.02, 0.01, 0.005]; XF=[1, 1, 1, 1, 1, 1, 1]
          SoilCrop MustardSoil: LL=[0.261, 0.248, 0.28, 0.28, 0.28, 0.28, 0.28]; KL=[0.09, 0.08, 0.06, 0.04, 0.02, 0.01, 0.005]; XF=[1, 1, 1, 1, 1, 1, 1]
          SoilCrop RapeSoil: LL=[0.261, 0.248, 0.28, 0.28, 0.28, 0.28, 0.28]; KL=[0.09, 0.08, 0.06, 0.04, 0.02, 0.01, 0.005]; XF=[1, 1, 1, 1, 1, 1, 1]
          SoilCrop BarleySoil: LL=[0.261, 0.248, 0.28, 0.28, 0.28, 0.28, 0.28]; KL=[0.06, 0.06, 0.06, 0.04, 0.04, 0.02, 0.01]; XF=[1, 1, 1, 1, 1, 1, 1]
        Swim3: Salb=0.13; CN2Bare=50; CNRed=20; CNCov=0.8; KDul=150; PSIDul=-100; VC=true; DTMin=0; DTMax=60; MaxWaterIncrement=5; SpaceWeightingFactor=0.5; SoluteSpaceWeightingFactor=1; Dis=1; Disp=1; A=2; DTHC=0.1; DTHP=2; vcon1=7.28e-09; vcon2=7.26e-07; eo_time=06:00; eo_durn=720; default_rain_time=00:00; default_rain_duration=720; Diagnostics=false
      SurfaceOrganicMatter: InitialResidueName=redclover_stubble; InitialResidueType=redclover; InitialResidueMass=500; InitialStandingFraction=0; InitialCPR=0; InitialCNR=100
      Plant RedClover
        Cultivar FiveSpeciesLegumeProxy
          Command:
            [Leaf].Photosynthesis.FT.XYPairs.X = 0,4,9,15,18.5,23,27,30,37.5
            [Leaf].Photosynthesis.FT.XYPairs.Y = 0,0,0.1125,0.45,0.75,0.75,0.75,0.375,0
            [Leaf].NRetranslocationFactor.TemperatureFactor.XYPairs.X = 0,4,9,15,18.5,23,27,30,37.5
            [Leaf].NRetranslocationFactor.TemperatureFactor.XYPairs.Y = 0,0,0.15,0.6,1,1,1,0.5,0
            [Phenology].Reproductive.Target.FixedValue = 5000
            [Root].BiomassRemovalDefaults.HarvestFractionLiveToRemove = 0
            [Root].BiomassRemovalDefaults.HarvestFractionDeadToRemove = 0
            [Root].BiomassRemovalDefaults.HarvestFractionLiveToResidue = 0
            [Root].BiomassRemovalDefaults.HarvestFractionDeadToResidue = 0
            [Taproot].BiomassRemovalDefaults.HarvestFractionLiveToRemove = 0
            [Taproot].BiomassRemovalDefaults.HarvestFractionDeadToRemove = 0
            [Taproot].BiomassRemovalDefaults.HarvestFractionLiveToResidue = 0
            [Taproot].BiomassRemovalDefaults.HarvestFractionDeadToResidue = 0
            [Nodule].BiomassRemovalDefaults.HarvestFractionLiveToRemove = 0
            [Nodule].BiomassRemovalDefaults.HarvestFractionDeadToRemove = 0
            [Nodule].BiomassRemovalDefaults.HarvestFractionLiveToResidue = 0
            [Nodule].BiomassRemovalDefaults.HarvestFractionDeadToResidue = 0
            [Leaf].BiomassRemovalDefaults.HarvestFractionLiveToRemove = 0.9
            [Leaf].BiomassRemovalDefaults.HarvestFractionDeadToRemove = 0.9
            [Leaf].BiomassRemovalDefaults.HarvestFractionLiveToResidue = 0
            [Leaf].BiomassRemovalDefaults.HarvestFractionDeadToResidue = 0
            [Petiole].BiomassRemovalDefaults.HarvestFractionLiveToRemove = 0.9
            [Petiole].BiomassRemovalDefaults.HarvestFractionDeadToRemove = 0.9
            [Petiole].BiomassRemovalDefaults.HarvestFractionLiveToResidue = 0
            [Petiole].BiomassRemovalDefaults.HarvestFractionDeadToResidue = 0
            [Stem].BiomassRemovalDefaults.HarvestFractionLiveToRemove = 0.9
            [Stem].BiomassRemovalDefaults.HarvestFractionDeadToRemove = 0.9
            [Stem].BiomassRemovalDefaults.HarvestFractionLiveToResidue = 0
            [Stem].BiomassRemovalDefaults.HarvestFractionDeadToResidue = 0
            [Inflorescence].BiomassRemovalDefaults.HarvestFractionLiveToRemove = 0.9
            [Inflorescence].BiomassRemovalDefaults.HarvestFractionDeadToRemove = 0.9
            [Inflorescence].BiomassRemovalDefaults.HarvestFractionLiveToResidue = 0
            [Inflorescence].BiomassRemovalDefaults.HarvestFractionDeadToResidue = 0
            [Leaf].Photosynthesis.RUE.FixedValue = 0.9865401318
            [Phenology].Inductive.Target.FixedValue = 22.8935291863
        Cultivar FourSpeciesLegumeProxy
          Command:
            [Leaf].Photosynthesis.FT.XYPairs.X = 0,4,9,15,18.5,23,27,30,37.5
            [Leaf].Photosynthesis.FT.XYPairs.Y = 0,0,0.1125,0.45,0.75,0.75,0.75,0.375,0
            [Leaf].NRetranslocationFactor.TemperatureFactor.XYPairs.X = 0,4,9,15,18.5,23,27,30,37.5
            [Leaf].NRetranslocationFactor.TemperatureFactor.XYPairs.Y = 0,0,0.15,0.6,1,1,1,0.5,0
            [Phenology].Reproductive.Target.FixedValue = 5000
            [Root].BiomassRemovalDefaults.HarvestFractionLiveToRemove = 0
            [Root].BiomassRemovalDefaults.HarvestFractionDeadToRemove = 0
            [Root].BiomassRemovalDefaults.HarvestFractionLiveToResidue = 0
            [Root].BiomassRemovalDefaults.HarvestFractionDeadToResidue = 0
            [Taproot].BiomassRemovalDefaults.HarvestFractionLiveToRemove = 0
            [Taproot].BiomassRemovalDefaults.HarvestFractionDeadToRemove = 0
            [Taproot].BiomassRemovalDefaults.HarvestFractionLiveToResidue = 0
            [Taproot].BiomassRemovalDefaults.HarvestFractionDeadToResidue = 0
            [Nodule].BiomassRemovalDefaults.HarvestFractionLiveToRemove = 0
            [Nodule].BiomassRemovalDefaults.HarvestFractionDeadToRemove = 0
            [Nodule].BiomassRemovalDefaults.HarvestFractionLiveToResidue = 0
            [Nodule].BiomassRemovalDefaults.HarvestFractionDeadToResidue = 0
            [Leaf].BiomassRemovalDefaults.HarvestFractionLiveToRemove = 0.9
            [Leaf].BiomassRemovalDefaults.HarvestFractionDeadToRemove = 0.9
            [Leaf].BiomassRemovalDefaults.HarvestFractionLiveToResidue = 0
            [Leaf].BiomassRemovalDefaults.HarvestFractionDeadToResidue = 0
            [Petiole].BiomassRemovalDefaults.HarvestFractionLiveToRemove = 0.9
            [Petiole].BiomassRemovalDefaults.HarvestFractionDeadToRemove = 0.9
            [Petiole].BiomassRemovalDefaults.HarvestFractionLiveToResidue = 0
            [Petiole].BiomassRemovalDefaults.HarvestFractionDeadToResidue = 0
            [Stem].BiomassRemovalDefaults.HarvestFractionLiveToRemove = 0.9
            [Stem].BiomassRemovalDefaults.HarvestFractionDeadToRemove = 0.9
            [Stem].BiomassRemovalDefaults.HarvestFractionLiveToResidue = 0
            [Stem].BiomassRemovalDefaults.HarvestFractionDeadToResidue = 0
            [Inflorescence].BiomassRemovalDefaults.HarvestFractionLiveToRemove = 0.9
            [Inflorescence].BiomassRemovalDefaults.HarvestFractionDeadToRemove = 0.9
            [Inflorescence].BiomassRemovalDefaults.HarvestFractionLiveToResidue = 0
            [Inflorescence].BiomassRemovalDefaults.HarvestFractionDeadToResidue = 0
            [Leaf].Photosynthesis.RUE.FixedValue = 1.5
            [Phenology].Inductive.Target.FixedValue = 15
        Cultivar GalegaProxy
          Command:
            [Leaf].Photosynthesis.FT.XYPairs.X = 0,4,9,15,18.5,23,27,30,37.5
            [Leaf].Photosynthesis.FT.XYPairs.Y = 0,0,0.1125,0.45,0.75,0.75,0.75,0.375,0
            [Leaf].NRetranslocationFactor.TemperatureFactor.XYPairs.X = 0,4,9,15,18.5,23,27,30,37.5
            [Leaf].NRetranslocationFactor.TemperatureFactor.XYPairs.Y = 0,0,0.15,0.6,1,1,1,0.5,0
            [Phenology].Reproductive.Target.FixedValue = 5000
            [Root].BiomassRemovalDefaults.HarvestFractionLiveToRemove = 0
            [Root].BiomassRemovalDefaults.HarvestFractionDeadToRemove = 0
            [Root].BiomassRemovalDefaults.HarvestFractionLiveToResidue = 0
            [Root].BiomassRemovalDefaults.HarvestFractionDeadToResidue = 0
            [Taproot].BiomassRemovalDefaults.HarvestFractionLiveToRemove = 0
            [Taproot].BiomassRemovalDefaults.HarvestFractionDeadToRemove = 0
            [Taproot].BiomassRemovalDefaults.HarvestFractionLiveToResidue = 0
            [Taproot].BiomassRemovalDefaults.HarvestFractionDeadToResidue = 0
            [Nodule].BiomassRemovalDefaults.HarvestFractionLiveToRemove = 0
            [Nodule].BiomassRemovalDefaults.HarvestFractionDeadToRemove = 0
            [Nodule].BiomassRemovalDefaults.HarvestFractionLiveToResidue = 0
            [Nodule].BiomassRemovalDefaults.HarvestFractionDeadToResidue = 0
            [Leaf].BiomassRemovalDefaults.HarvestFractionLiveToRemove = 0.9
            [Leaf].BiomassRemovalDefaults.HarvestFractionDeadToRemove = 0.9
            [Leaf].BiomassRemovalDefaults.HarvestFractionLiveToResidue = 0
            [Leaf].BiomassRemovalDefaults.HarvestFractionDeadToResidue = 0
            [Petiole].BiomassRemovalDefaults.HarvestFractionLiveToRemove = 0.9
            [Petiole].BiomassRemovalDefaults.HarvestFractionDeadToRemove = 0.9
            [Petiole].BiomassRemovalDefaults.HarvestFractionLiveToResidue = 0
            [Petiole].BiomassRemovalDefaults.HarvestFractionDeadToResidue = 0
            [Stem].BiomassRemovalDefaults.HarvestFractionLiveToRemove = 0.9
            [Stem].BiomassRemovalDefaults.HarvestFractionDeadToRemove = 0.9
            [Stem].BiomassRemovalDefaults.HarvestFractionLiveToResidue = 0
            [Stem].BiomassRemovalDefaults.HarvestFractionDeadToResidue = 0
            [Inflorescence].BiomassRemovalDefaults.HarvestFractionLiveToRemove = 0.9
            [Inflorescence].BiomassRemovalDefaults.HarvestFractionDeadToRemove = 0.9
            [Inflorescence].BiomassRemovalDefaults.HarvestFractionLiveToResidue = 0
            [Inflorescence].BiomassRemovalDefaults.HarvestFractionDeadToResidue = 0
            [Leaf].Photosynthesis.RUE.FixedValue = 2.0272275602
            [Phenology].Inductive.Target.FixedValue = 8
        Cultivar VetchProxy
          Command:
            [Leaf].Photosynthesis.FT.XYPairs.X = 0,4,9,15,18.5,23,27,30,37.5
            [Leaf].Photosynthesis.FT.XYPairs.Y = 0,0,0.1125,0.45,0.75,0.75,0.75,0.375,0
            [Leaf].NRetranslocationFactor.TemperatureFactor.XYPairs.X = 0,4,9,15,18.5,23,27,30,37.5
            [Leaf].NRetranslocationFactor.TemperatureFactor.XYPairs.Y = 0,0,0.15,0.6,1,1,1,0.5,0
            [Phenology].Reproductive.Target.FixedValue = 5000
            [Root].BiomassRemovalDefaults.HarvestFractionLiveToRemove = 0
            [Root].BiomassRemovalDefaults.HarvestFractionDeadToRemove = 0
            [Root].BiomassRemovalDefaults.HarvestFractionLiveToResidue = 0
            [Root].BiomassRemovalDefaults.HarvestFractionDeadToResidue = 0
            [Taproot].BiomassRemovalDefaults.HarvestFractionLiveToRemove = 0
            [Taproot].BiomassRemovalDefaults.HarvestFractionDeadToRemove = 0
            [Taproot].BiomassRemovalDefaults.HarvestFractionLiveToResidue = 0
            [Taproot].BiomassRemovalDefaults.HarvestFractionDeadToResidue = 0
            [Nodule].BiomassRemovalDefaults.HarvestFractionLiveToRemove = 0
            [Nodule].BiomassRemovalDefaults.HarvestFractionDeadToRemove = 0
            [Nodule].BiomassRemovalDefaults.HarvestFractionLiveToResidue = 0
            [Nodule].BiomassRemovalDefaults.HarvestFractionDeadToResidue = 0
            [Leaf].BiomassRemovalDefaults.HarvestFractionLiveToRemove = 0.9
            [Leaf].BiomassRemovalDefaults.HarvestFractionDeadToRemove = 0.9
            [Leaf].BiomassRemovalDefaults.HarvestFractionLiveToResidue = 0
            [Leaf].BiomassRemovalDefaults.HarvestFractionDeadToResidue = 0
            [Petiole].BiomassRemovalDefaults.HarvestFractionLiveToRemove = 0.9
            [Petiole].BiomassRemovalDefaults.HarvestFractionDeadToRemove = 0.9
            [Petiole].BiomassRemovalDefaults.HarvestFractionLiveToResidue = 0
            [Petiole].BiomassRemovalDefaults.HarvestFractionDeadToResidue = 0
            [Stem].BiomassRemovalDefaults.HarvestFractionLiveToRemove = 0.9
            [Stem].BiomassRemovalDefaults.HarvestFractionDeadToRemove = 0.9
            [Stem].BiomassRemovalDefaults.HarvestFractionLiveToResidue = 0
            [Stem].BiomassRemovalDefaults.HarvestFractionDeadToResidue = 0
            [Inflorescence].BiomassRemovalDefaults.HarvestFractionLiveToRemove = 0.9
            [Inflorescence].BiomassRemovalDefaults.HarvestFractionDeadToRemove = 0.9
            [Inflorescence].BiomassRemovalDefaults.HarvestFractionLiveToResidue = 0
            [Inflorescence].BiomassRemovalDefaults.HarvestFractionDeadToResidue = 0
            [Leaf].Photosynthesis.RUE.FixedValue = 1.7877710177
            [Phenology].Inductive.Target.FixedValue = 14.3562738116
        Cultivar Vik7
          Command:
            [Leaf].Photosynthesis.FT.XYPairs.X = 0,4,9,15,18.5,23,27,30,37.5
            [Leaf].Photosynthesis.FT.XYPairs.Y = 0,0,0.1125,0.45,0.75,0.75,0.75,0.375,0
            [Leaf].NRetranslocationFactor.TemperatureFactor.XYPairs.X = 0,4,9,15,18.5,23,27,30,37.5
            [Leaf].NRetranslocationFactor.TemperatureFactor.XYPairs.Y = 0,0,0.15,0.6,1,1,1,0.5,0
            [Phenology].Reproductive.Target.FixedValue = 5000
            [Root].BiomassRemovalDefaults.HarvestFractionLiveToRemove = 0
            [Root].BiomassRemovalDefaults.HarvestFractionDeadToRemove = 0
            [Root].BiomassRemovalDefaults.HarvestFractionLiveToResidue = 0
            [Root].BiomassRemovalDefaults.HarvestFractionDeadToResidue = 0
            [Taproot].BiomassRemovalDefaults.HarvestFractionLiveToRemove = 0
            [Taproot].BiomassRemovalDefaults.HarvestFractionDeadToRemove = 0
            [Taproot].BiomassRemovalDefaults.HarvestFractionLiveToResidue = 0
            [Taproot].BiomassRemovalDefaults.HarvestFractionDeadToResidue = 0
            [Nodule].BiomassRemovalDefaults.HarvestFractionLiveToRemove = 0
            [Nodule].BiomassRemovalDefaults.HarvestFractionDeadToRemove = 0
            [Nodule].BiomassRemovalDefaults.HarvestFractionLiveToResidue = 0
            [Nodule].BiomassRemovalDefaults.HarvestFractionDeadToResidue = 0
            [Leaf].BiomassRemovalDefaults.HarvestFractionLiveToRemove = 0.9
            [Leaf].BiomassRemovalDefaults.HarvestFractionDeadToRemove = 0.9
            [Leaf].BiomassRemovalDefaults.HarvestFractionLiveToResidue = 0
            [Leaf].BiomassRemovalDefaults.HarvestFractionDeadToResidue = 0
            [Petiole].BiomassRemovalDefaults.HarvestFractionLiveToRemove = 0.9
            [Petiole].BiomassRemovalDefaults.HarvestFractionDeadToRemove = 0.9
            [Petiole].BiomassRemovalDefaults.HarvestFractionLiveToResidue = 0
            [Petiole].BiomassRemovalDefaults.HarvestFractionDeadToResidue = 0
            [Stem].BiomassRemovalDefaults.HarvestFractionLiveToRemove = 0.9
            [Stem].BiomassRemovalDefaults.HarvestFractionDeadToRemove = 0.9
            [Stem].BiomassRemovalDefaults.HarvestFractionLiveToResidue = 0
            [Stem].BiomassRemovalDefaults.HarvestFractionDeadToResidue = 0
            [Inflorescence].BiomassRemovalDefaults.HarvestFractionLiveToRemove = 0.9
            [Inflorescence].BiomassRemovalDefaults.HarvestFractionDeadToRemove = 0.9
            [Inflorescence].BiomassRemovalDefaults.HarvestFractionLiveToResidue = 0
            [Inflorescence].BiomassRemovalDefaults.HarvestFractionDeadToResidue = 0
            [Leaf].Photosynthesis.RUE.FixedValue = 0.9258483053
            [Phenology].Inductive.Target.FixedValue = 8
      Plant Wheat
        Cultivar Irgina
          Command:
            [Phenology].PhyllochronPpSensitivity.FixedValue = 0.4
            [Phenology].CAMP.FLNparams.VxPLN = 0.0
            [Phenology].Phyllochron.BasePhyllochron.FixedValue = 54.2986887865
            [Phenology].CAMP.FLNparams.MinLN = 5.7494558518
            [Phenology].CAMP.FLNparams.PpLN = 5
            [Phenology].CAMP.FLNparams.VrnLN = 5.440695092
            [Phenology].HeadEmergencePpSensitivity.FixedValue = 0
            [Phenology].GrainFilling.Target.FixedValue = 270.029417477
            [Phenology].GrainRipening.Target.FixedValue = 100.388601837
            [Leaf].Photosynthesis.RUE.FixedValue = 1.668920927
            [Leaf].ExtinctionCoeff.VegetativePhase.FixedValue = 0.8215125749
            [Grain].MaximumPotentialGrainSize.FixedValue = 0.047572678
            [Grain].NumberFunction.GrainNumber.GrainsPerGramOfStem.FixedValue = 26.2493014671
        Cultivar Lada
          Command:
            [Phenology].PhyllochronPpSensitivity.FixedValue = 0.4
            [Phenology].CAMP.FLNparams.VxPLN = 0.0
            [Phenology].Phyllochron.BasePhyllochron.FixedValue = 50.2435103427
            [Phenology].CAMP.FLNparams.MinLN = 5.6381459789
            [Phenology].CAMP.FLNparams.PpLN = 2.0276337654
            [Phenology].CAMP.FLNparams.VrnLN = 4.62303776
            [Phenology].HeadEmergencePpSensitivity.FixedValue = 0.3215794845
            [Phenology].GrainFilling.Target.FixedValue = 150
            [Phenology].GrainRipening.Target.FixedValue = 99.2812055208
            [Leaf].Photosynthesis.RUE.FixedValue = 1.7091355529
            [Leaf].ExtinctionCoeff.VegetativePhase.FixedValue = 0.868357637
            [Grain].MaximumPotentialGrainSize.FixedValue = 0.041873702
            [Grain].NumberFunction.GrainNumber.GrainsPerGramOfStem.FixedValue = 21.4048987698
        Cultivar WheatUnspecified
          Command:
            [Phenology].PhyllochronPpSensitivity.FixedValue = 0.4
            [Phenology].CAMP.FLNparams.VxPLN = 0.0
            [Phenology].Phyllochron.BasePhyllochron.FixedValue = 48
            [Phenology].CAMP.FLNparams.MinLN = 5.4711343781
            [Phenology].CAMP.FLNparams.PpLN = 1.7578366769
            [Phenology].CAMP.FLNparams.VrnLN = 6.3372025731
            [Phenology].HeadEmergencePpSensitivity.FixedValue = 3.5957092562
            [Phenology].GrainFilling.Target.FixedValue = 197.283892986
            [Phenology].GrainRipening.Target.FixedValue = 75.9170119447
            [Leaf].Photosynthesis.RUE.FixedValue = 1.3305297426
            [Leaf].ExtinctionCoeff.VegetativePhase.FixedValue = 0.682352733
            [Grain].MaximumPotentialGrainSize.FixedValue = 0.0327031499
            [Grain].NumberFunction.GrainNumber.GrainsPerGramOfStem.FixedValue = 30.258655515
        Cultivar Winter_rye_smoke
          Command:
            [Phenology].PhyllochronPpSensitivity.FixedValue = 0.2
            [Phenology].CAMP.FLNparams.VxPLN = 5.5
            [Phenology].CAMP.EnvData.VrnTreatTemp = 5.8
            [Phenology].CAMP.EnvData.VrnTreatDuration = 60
            [Phenology].HeadEmergenceLongDayBase.FixedValue = 50
            [Phenology].Phyllochron.BasePhyllochron.FixedValue = 103.084720868
            [Phenology].CAMP.FLNparams.MinLN = 6.5535605548
            [Phenology].CAMP.FLNparams.PpLN = 2.2147587178
            [Phenology].CAMP.FLNparams.VrnLN = 7.2646303434
            [Phenology].HeadEmergencePpSensitivity.FixedValue = 2.3400983693
            [Phenology].GrainFilling.Target.FixedValue = 321.172163606
            [Phenology].GrainRipening.Target.FixedValue = 102.075454949
            [Leaf].Photosynthesis.RUE.FixedValue = 1.6226307161
            [Leaf].ExtinctionCoeff.VegetativePhase.FixedValue = 0.7584358325
            [Grain].MaximumPotentialGrainSize.FixedValue = 0.065
            [Grain].NumberFunction.GrainNumber.GrainsPerGramOfStem.FixedValue = 26.2492294738
        Cultivar Zlata
          Command:
            [Phenology].PhyllochronPpSensitivity.FixedValue = 0.4
            [Phenology].CAMP.FLNparams.VxPLN = 0.0
            [Phenology].Phyllochron.BasePhyllochron.FixedValue = 75
            [Phenology].CAMP.FLNparams.MinLN = 5
            [Phenology].CAMP.FLNparams.PpLN = 2.5
            [Phenology].CAMP.FLNparams.VrnLN = 7
            [Phenology].HeadEmergencePpSensitivity.FixedValue = 2
            [Phenology].GrainFilling.Target.FixedValue = 250
            [Phenology].GrainRipening.Target.FixedValue = 100
            [Leaf].Photosynthesis.RUE.FixedValue = 1.5
            [Leaf].ExtinctionCoeff.VegetativePhase.FixedValue = 0.8
            [Grain].MaximumPotentialGrainSize.FixedValue = 0.045
            [Grain].NumberFunction.GrainNumber.GrainsPerGramOfStem.FixedValue = 13
      Plant Oats
        Cultivar Argamak
          Command:
            [Phenology].VrnSensitivity.FixedValue = 0
            [Leaf].CohortParameters.SenescenceDuration.Multiplier.FixedValue = 2.3
            [Leaf].CohortParameters.GrowthDuration.AgeFactor.XYPairs.Y = 1,1,0.1
            [Leaf].BiomassRemovalDefaults.HarvestFractionLiveToRemove = 0.9
            [Leaf].BiomassRemovalDefaults.HarvestFractionDeadToRemove = 0.9
            [Leaf].BiomassRemovalDefaults.HarvestFractionLiveToResidue = 0
            [Leaf].BiomassRemovalDefaults.HarvestFractionDeadToResidue = 0
            [Stem].BiomassRemovalDefaults.HarvestFractionLiveToRemove = 0.9
            [Stem].BiomassRemovalDefaults.HarvestFractionDeadToRemove = 0.9
            [Stem].BiomassRemovalDefaults.HarvestFractionLiveToResidue = 0
            [Stem].BiomassRemovalDefaults.HarvestFractionDeadToResidue = 0
            [Panicle].BiomassRemovalDefaults.HarvestFractionLiveToRemove = 0.9
            [Panicle].BiomassRemovalDefaults.HarvestFractionDeadToRemove = 0.9
            [Panicle].BiomassRemovalDefaults.HarvestFractionLiveToResidue = 0
            [Panicle].BiomassRemovalDefaults.HarvestFractionDeadToResidue = 0
            [Phenology].MinimumLeafNumber.FixedValue = 5.4976981114
            [Phenology].PpSensitivity.FixedValue = 4.4190343321
            [Phenology].EarlyReproductiveLongDayBase.FixedValue = 3.3312724455
            [Phenology].EarlyReproductivePpSensitivity.FixedValue = 0.6551590932
            [Structure].Phyllochron.BasePhyllochron.FixedValue = 86.20489582
            [Phenology].GrainFilling.Target.FixedValue = 540.081690023
            [Leaf].Photosynthesis.RUE.FixedValue = 1.4015710767
            [Leaf].ExtinctionCoeff.FixedValue = 0.649586804
            [Leaf].CohortParameters.MaxArea.AreaLargestLeaves.FixedValue = 2613.99796479
            [Grain].MaximumPotentialGrainSize.FixedValue = 0.0299466218
            [Grain].NumberFunction.GrainNumber.GrainsPerGramOfStem.FixedValue = 40.6580473836
        Cultivar OatsUnspecified
          Command:
            [Phenology].VrnSensitivity.FixedValue = 0
            [Leaf].CohortParameters.SenescenceDuration.Multiplier.FixedValue = 2.2
            [Leaf].CohortParameters.GrowthDuration.AgeFactor.XYPairs.Y = 1,1,0.1
            [Leaf].BiomassRemovalDefaults.HarvestFractionLiveToRemove = 0.9
            [Leaf].BiomassRemovalDefaults.HarvestFractionDeadToRemove = 0.9
            [Leaf].BiomassRemovalDefaults.HarvestFractionLiveToResidue = 0
            [Leaf].BiomassRemovalDefaults.HarvestFractionDeadToResidue = 0
            [Stem].BiomassRemovalDefaults.HarvestFractionLiveToRemove = 0.9
            [Stem].BiomassRemovalDefaults.HarvestFractionDeadToRemove = 0.9
            [Stem].BiomassRemovalDefaults.HarvestFractionLiveToResidue = 0
            [Stem].BiomassRemovalDefaults.HarvestFractionDeadToResidue = 0
            [Panicle].BiomassRemovalDefaults.HarvestFractionLiveToRemove = 0.9
            [Panicle].BiomassRemovalDefaults.HarvestFractionDeadToRemove = 0.9
            [Panicle].BiomassRemovalDefaults.HarvestFractionLiveToResidue = 0
            [Panicle].BiomassRemovalDefaults.HarvestFractionDeadToResidue = 0
            [Phenology].MinimumLeafNumber.FixedValue = 8.4494530836
            [Phenology].PpSensitivity.FixedValue = 0.9805930141
            [Phenology].EarlyReproductiveLongDayBase.FixedValue = 3
            [Phenology].EarlyReproductivePpSensitivity.FixedValue = 0.7083430431
            [Structure].Phyllochron.BasePhyllochron.FixedValue = 95.0044911214
            [Phenology].GrainFilling.Target.FixedValue = 410.689807364
            [Leaf].Photosynthesis.RUE.FixedValue = 1.6164119976
            [Leaf].ExtinctionCoeff.FixedValue = 0.6311373579
            [Leaf].CohortParameters.MaxArea.AreaLargestLeaves.FixedValue = 2359.18810127
            [Grain].MaximumPotentialGrainSize.FixedValue = 0.048468933
            [Grain].NumberFunction.GrainNumber.GrainsPerGramOfStem.FixedValue = 40.1668517936
        Cultivar Sang
          Command:
            [Phenology].VrnSensitivity.FixedValue = 0
            [Leaf].CohortParameters.SenescenceDuration.Multiplier.FixedValue = 2.2
            [Leaf].CohortParameters.GrowthDuration.AgeFactor.XYPairs.Y = 1,1,0.1
            [Leaf].BiomassRemovalDefaults.HarvestFractionLiveToRemove = 0.9
            [Leaf].BiomassRemovalDefaults.HarvestFractionDeadToRemove = 0.9
            [Leaf].BiomassRemovalDefaults.HarvestFractionLiveToResidue = 0
            [Leaf].BiomassRemovalDefaults.HarvestFractionDeadToResidue = 0
            [Stem].BiomassRemovalDefaults.HarvestFractionLiveToRemove = 0.9
            [Stem].BiomassRemovalDefaults.HarvestFractionDeadToRemove = 0.9
            [Stem].BiomassRemovalDefaults.HarvestFractionLiveToResidue = 0
            [Stem].BiomassRemovalDefaults.HarvestFractionDeadToResidue = 0
            [Panicle].BiomassRemovalDefaults.HarvestFractionLiveToRemove = 0.9
            [Panicle].BiomassRemovalDefaults.HarvestFractionDeadToRemove = 0.9
            [Panicle].BiomassRemovalDefaults.HarvestFractionLiveToResidue = 0
            [Panicle].BiomassRemovalDefaults.HarvestFractionDeadToResidue = 0
            [Phenology].MinimumLeafNumber.FixedValue = 5.7057372956
            [Phenology].PpSensitivity.FixedValue = 3.6398178365
            [Phenology].EarlyReproductiveLongDayBase.FixedValue = 13.460267723
            [Phenology].EarlyReproductivePpSensitivity.FixedValue = 0
            [Structure].Phyllochron.BasePhyllochron.FixedValue = 52.5568213667
            [Phenology].GrainFilling.Target.FixedValue = 396.692484416
            [Leaf].Photosynthesis.RUE.FixedValue = 1.339030398
            [Leaf].ExtinctionCoeff.FixedValue = 0.6625337751
            [Leaf].CohortParameters.MaxArea.AreaLargestLeaves.FixedValue = 4062.88293625
            [Grain].MaximumPotentialGrainSize.FixedValue = 0.0220539914
            [Grain].NumberFunction.GrainNumber.GrainsPerGramOfStem.FixedValue = 49.8094521358
        Cultivar Yakov
          Command:
            [Phenology].VrnSensitivity.FixedValue = 0
            [Leaf].CohortParameters.SenescenceDuration.Multiplier.FixedValue = 1.8
            [Leaf].InitialLeaves[1].Area = 150
            [Leaf].CohortParameters.GrowthDuration.AgeFactor.XYPairs.Y = 1,1,0.1
            [Leaf].CohortParameters.MaxArea.AgeFactor.XYPairs.X = 3,3.5,4.0,4.5,4.9
            [Leaf].CohortParameters.MaxArea.AgeFactor.XYPairs.Y = 0.1,0.1,0.4,1,0.55
            [Structure].HeightModel.PotentialHeight.XYPairs.Y = 10,150,550,750
            [Structure].BranchingRate.PotentialBranchingRate.Vegetative.PotentialBranchingRate.XYPairs.X = 1,2,3,4,5,6,7,8
            [Structure].BranchingRate.PotentialBranchingRate.Vegetative.PotentialBranchingRate.XYPairs.Y = 0,1,1,1,0.5,0,0,0
            [Oats].Structure.BranchingRate.StressFactors.CoverEffect.XYPairs.X = 1,1,1
            [Oats].Leaf.CohortParameters.SpecificLeafAreaMax.XYPairs.X = 3,4.3,4.5,4.8
            [Oats].Leaf.CohortParameters.SpecificLeafAreaMax.XYPairs.Y = 22000,25000,27000,28000
            [Stem].MaximumNConc.XYPairs.X = 3.0, 4.2, 5
            [Stem].MaximumNConc.XYPairs.Y = 0.05,0.045,0.02
            [Oats].Structure.BranchMortality.MortalityPhase.Mortality.MortalityPerDegDay.XYPairs.Y[1] = 0.0008
            [Leaf].BiomassRemovalDefaults.HarvestFractionLiveToRemove = 0.9
            [Leaf].BiomassRemovalDefaults.HarvestFractionDeadToRemove = 0.9
            [Leaf].BiomassRemovalDefaults.HarvestFractionLiveToResidue = 0
            [Leaf].BiomassRemovalDefaults.HarvestFractionDeadToResidue = 0
            [Stem].BiomassRemovalDefaults.HarvestFractionLiveToRemove = 0.9
            [Stem].BiomassRemovalDefaults.HarvestFractionDeadToRemove = 0.9
            [Stem].BiomassRemovalDefaults.HarvestFractionLiveToResidue = 0
            [Stem].BiomassRemovalDefaults.HarvestFractionDeadToResidue = 0
            [Panicle].BiomassRemovalDefaults.HarvestFractionLiveToRemove = 0.9
            [Panicle].BiomassRemovalDefaults.HarvestFractionDeadToRemove = 0.9
            [Panicle].BiomassRemovalDefaults.HarvestFractionLiveToResidue = 0
            [Panicle].BiomassRemovalDefaults.HarvestFractionDeadToResidue = 0
            [Phenology].MinimumLeafNumber.FixedValue = 7.4113346578
            [Phenology].PpSensitivity.FixedValue = 2.1828475332
            [Phenology].EarlyReproductiveLongDayBase.FixedValue = 11.1393360067
            [Phenology].EarlyReproductivePpSensitivity.FixedValue = 3.8113592145
            [Structure].Phyllochron.BasePhyllochron.FixedValue = 63.3259197131
            [Phenology].GrainFilling.Target.FixedValue = 443.644629979
            [Leaf].Photosynthesis.RUE.FixedValue = 1.5
            [Leaf].ExtinctionCoeff.FixedValue = 0.4
            [Leaf].CohortParameters.MaxArea.AreaLargestLeaves.FixedValue = 4000
            [Grain].MaximumPotentialGrainSize.FixedValue = 0.045
            [Grain].NumberFunction.GrainNumber.GrainsPerGramOfStem.FixedValue = 18
      Plant Potato
      Plant PlantainForage
        Cultivar FallowVegetationProxy
          Command:
            [Phenology].ThermalTime.Response.Y = 0.0, 20.0, 0.0
            [Leaf].Photosynthesis.FT.XYPairs.Y = 0, 0.0375, 0.225, 0.75, 0.75, 0.075, 0
            [Root].BiomassRemovalDefaults.HarvestFractionLiveToRemove = 0
            [Root].BiomassRemovalDefaults.HarvestFractionDeadToRemove = 0
            [Root].BiomassRemovalDefaults.HarvestFractionLiveToResidue = 0
            [Root].BiomassRemovalDefaults.HarvestFractionDeadToResidue = 0
            [Taproot].BiomassRemovalDefaults.HarvestFractionLiveToRemove = 0
            [Taproot].BiomassRemovalDefaults.HarvestFractionDeadToRemove = 0
            [Taproot].BiomassRemovalDefaults.HarvestFractionLiveToResidue = 0
            [Taproot].BiomassRemovalDefaults.HarvestFractionDeadToResidue = 0
            [Phenology].ThermalTime.Response.X = 0, 20, 35
            [Leaf].Photosynthesis.FT.XYPairs.X = 0, 4, 9, 15, 20, 28, 35
            [Leaf].BiomassRemovalDefaults.HarvestFractionLiveToRemove = 0.9
            [Leaf].BiomassRemovalDefaults.HarvestFractionDeadToRemove = 0.9
            [Leaf].BiomassRemovalDefaults.HarvestFractionLiveToResidue = 0
            [Leaf].BiomassRemovalDefaults.HarvestFractionDeadToResidue = 0
            [Stem].BiomassRemovalDefaults.HarvestFractionLiveToRemove = 0.9
            [Stem].BiomassRemovalDefaults.HarvestFractionDeadToRemove = 0.9
            [Stem].BiomassRemovalDefaults.HarvestFractionLiveToResidue = 0
            [Stem].BiomassRemovalDefaults.HarvestFractionDeadToResidue = 0
            [Inflorescence].BiomassRemovalDefaults.HarvestFractionLiveToRemove = 0.9
            [Inflorescence].BiomassRemovalDefaults.HarvestFractionDeadToRemove = 0.9
            [Inflorescence].BiomassRemovalDefaults.HarvestFractionLiveToResidue = 0
            [Inflorescence].BiomassRemovalDefaults.HarvestFractionDeadToResidue = 0
            [Leaf].Photosynthesis.RUE.FixedValue = 2
            [Phenology].Vegetative.Target.FixedValue = 45
        Cultivar FiveSpeciesGrassProxy
          Command:
            [Phenology].ThermalTime.Response.Y = 0.0, 20.0, 0.0
            [Leaf].Photosynthesis.FT.XYPairs.Y = 0, 0.0375, 0.225, 0.75, 0.75, 0.075, 0
            [Root].BiomassRemovalDefaults.HarvestFractionLiveToRemove = 0
            [Root].BiomassRemovalDefaults.HarvestFractionDeadToRemove = 0
            [Root].BiomassRemovalDefaults.HarvestFractionLiveToResidue = 0
            [Root].BiomassRemovalDefaults.HarvestFractionDeadToResidue = 0
            [Taproot].BiomassRemovalDefaults.HarvestFractionLiveToRemove = 0
            [Taproot].BiomassRemovalDefaults.HarvestFractionDeadToRemove = 0
            [Taproot].BiomassRemovalDefaults.HarvestFractionLiveToResidue = 0
            [Taproot].BiomassRemovalDefaults.HarvestFractionDeadToResidue = 0
            [Phenology].ThermalTime.Response.X = 0, 20, 35
            [Leaf].Photosynthesis.FT.XYPairs.X = 0, 4, 9, 15, 20, 28, 35
            [Leaf].BiomassRemovalDefaults.HarvestFractionLiveToRemove = 0.9
            [Leaf].BiomassRemovalDefaults.HarvestFractionDeadToRemove = 0.9
            [Leaf].BiomassRemovalDefaults.HarvestFractionLiveToResidue = 0
            [Leaf].BiomassRemovalDefaults.HarvestFractionDeadToResidue = 0
            [Stem].BiomassRemovalDefaults.HarvestFractionLiveToRemove = 0.9
            [Stem].BiomassRemovalDefaults.HarvestFractionDeadToRemove = 0.9
            [Stem].BiomassRemovalDefaults.HarvestFractionLiveToResidue = 0
            [Stem].BiomassRemovalDefaults.HarvestFractionDeadToResidue = 0
            [Inflorescence].BiomassRemovalDefaults.HarvestFractionLiveToRemove = 0.9
            [Inflorescence].BiomassRemovalDefaults.HarvestFractionDeadToRemove = 0.9
            [Inflorescence].BiomassRemovalDefaults.HarvestFractionLiveToResidue = 0
            [Inflorescence].BiomassRemovalDefaults.HarvestFractionDeadToResidue = 0
            [Leaf].Photosynthesis.RUE.FixedValue = 2.1556590517
            [Phenology].Vegetative.Target.FixedValue = 53.4348401291
        Cultivar FourSpeciesGrassProxy: same as Wheat.Field1.PlantainForage.FallowVegetationProxy
        Cultivar Vik9Proxy
          Command:
            [Phenology].ThermalTime.Response.Y = 0.0, 20.0, 0.0
            [Leaf].Photosynthesis.FT.XYPairs.Y = 0, 0.0375, 0.225, 0.75, 0.75, 0.075, 0
            [Root].BiomassRemovalDefaults.HarvestFractionLiveToRemove = 0
            [Root].BiomassRemovalDefaults.HarvestFractionDeadToRemove = 0
            [Root].BiomassRemovalDefaults.HarvestFractionLiveToResidue = 0
            [Root].BiomassRemovalDefaults.HarvestFractionDeadToResidue = 0
            [Taproot].BiomassRemovalDefaults.HarvestFractionLiveToRemove = 0
            [Taproot].BiomassRemovalDefaults.HarvestFractionDeadToRemove = 0
            [Taproot].BiomassRemovalDefaults.HarvestFractionLiveToResidue = 0
            [Taproot].BiomassRemovalDefaults.HarvestFractionDeadToResidue = 0
            [Phenology].ThermalTime.Response.X = 0, 20, 35
            [Leaf].Photosynthesis.FT.XYPairs.X = 0, 4, 9, 15, 20, 28, 35
            [Leaf].BiomassRemovalDefaults.HarvestFractionLiveToRemove = 0.9
            [Leaf].BiomassRemovalDefaults.HarvestFractionDeadToRemove = 0.9
            [Leaf].BiomassRemovalDefaults.HarvestFractionLiveToResidue = 0
            [Leaf].BiomassRemovalDefaults.HarvestFractionDeadToResidue = 0
            [Stem].BiomassRemovalDefaults.HarvestFractionLiveToRemove = 0.9
            [Stem].BiomassRemovalDefaults.HarvestFractionDeadToRemove = 0.9
            [Stem].BiomassRemovalDefaults.HarvestFractionLiveToResidue = 0
            [Stem].BiomassRemovalDefaults.HarvestFractionDeadToResidue = 0
            [Inflorescence].BiomassRemovalDefaults.HarvestFractionLiveToRemove = 0.9
            [Inflorescence].BiomassRemovalDefaults.HarvestFractionDeadToRemove = 0.9
            [Inflorescence].BiomassRemovalDefaults.HarvestFractionLiveToResidue = 0
            [Inflorescence].BiomassRemovalDefaults.HarvestFractionDeadToResidue = 0
            [Leaf].Photosynthesis.RUE.FixedValue = 1.0292082694
            [Phenology].Vegetative.Target.FixedValue = 100.207242661
      Plant Mustard: ResourceName=Canola
        Cultivar FlaxBiomassProxy
          Command:
            [Phenology].Vegetative.Target.XYPairs.X = 0, 25
            [Phenology].Vegetative.Target.XYPairs.Y = 210, 1
            [Phenology].StemElongation.Target.PPResponse.Amount.FixedValue = 180
            [Leaf].Phyllochron.Base.FixedValue = 55
        Cultivar Mustard_sort
          Command:
            [Phenology].Vegetative.Target.XYPairs.X = 0, 25
            [Phenology].Vegetative.Target.XYPairs.Y = 210, 1
            [Phenology].StemElongation.Target.PPResponse.Amount.FixedValue = 180
            [Leaf].Phyllochron.Base.FixedValue = 55
      Plant Rape: ResourceName=Canola
        Cultivar Rape_sort
          Command:
            [Phenology].Vegetative.Target.XYPairs.X = 0, 25
            [Phenology].Vegetative.Target.XYPairs.Y = 290, 1
            [Phenology].StemElongation.Target.PPResponse.Amount.FixedValue = 240
            [Leaf].Phyllochron.Base.FixedValue = 65
      Manager RotationManager
        RotationCrops = RedClover, RedClover, RedClover, RedClover, RedClover, RedClover, RedClover, RedClover, RedClover, RedClover, RedClover, RedClover, RedClover, -, RedClover+PlantainForage, RedClover+PlantainForage, RedClover+PlantainForage, Oats+RedClover+PlantainForage, RedClover+PlantainForage, RedClover+PlantainForage
        RotationCultivars = GalegaProxy, GalegaProxy, GalegaProxy, GalegaProxy, GalegaProxy, GalegaProxy, GalegaProxy, GalegaProxy, GalegaProxy, GalegaProxy, GalegaProxy, GalegaProxy, GalegaProxy, -, FourSpeciesLegumeProxy;FourSpeciesGrassProxy, Vik7;Vik9Proxy, Vik7;Vik9Proxy, Yakov;Vik7;Vik9Proxy, Vik7;Vik9Proxy, Vik7;Vik9Proxy
        RotationSowingDepths = 10, 10, 10, 10, 10, 10, 10, 10, 10, 10, 10, 10, 10, -, 10;10, 10;10, 10;10, 20;10;10, 10;10, 10;10
        RotationRowSpacings = 150, 150, 150, 150, 150, 150, 150, 150, 150, 150, 150, 150, 150, -, 150;150, 150;150, 150;150, 150;150;150, 150;150, 150;150
        RotationPopulations = 150, 150, 150, 150, 150, 150, 150, 150, 150, 150, 150, 150, 150, -, 150;150, 150;150, 150;150, 250;150;150, 150;150, 150;150
        RotationSowingDates = 15-May, 15-May, 15-May, 15-May, 15-May, 15-May, 15-May, 15-May, 15-May, 15-May, 15-May, 15-May, 15-May, 10-May, 15-May, 15-May, 15-May, 18-May, 15-May, 15-May
        RotationHarvestDates = 15-Jul, 15-Jul, 15-Jul, 15-Jul, 15-Jul, 15-Jul, 15-Jul, 15-Jul, 15-Jul, 15-Jul, 15-Jul, 15-Jul, 15-Jul, 31-Aug, 15-Jul, 15-Jul, 15-Jul, 31-Aug, 15-Jul, 15-Jul
        RotationHarvestCrops = RedClover, RedClover, RedClover, RedClover, RedClover, RedClover, RedClover, RedClover, RedClover, RedClover, RedClover, RedClover, RedClover, -, RedClover+PlantainForage, RedClover+PlantainForage, RedClover+PlantainForage, Oats, RedClover+PlantainForage, RedClover+PlantainForage
        RotationUses = hay, hay, hay, hay, hay, hay, hay, hay, hay, hay, hay, hay, hay, fallow, hay, hay, hay, grain, hay, hay
        PastureAges = 0, 0, 0, 0, 0, 0, 0, 0, 0, 0, 0, 0, 0, 0, 0, 1, 2, 0, 1, 2
        TerminationDate = 20-Aug
        WinterDiebackDate = 01-Dec
```csharp
using System;
using System.Linq;
using System.Globalization;
using System.Collections.Generic;
using APSIM.Core;
using APSIM.Shared.Utilities;
using Models.Core;
using Models.PMF;
using Models.PMF.Phen;
using Models.PMF.Interfaces;

namespace Models
{
    [Serializable]
    public class Script : Model, IStructureDependency
    {
        public IStructure Structure { private get; set; }
        [Link] private Clock Clock;
        [Link] private Summary Summary;
        [Link(ByName = true)] private Plant Wheat;
        [Link(ByName = true)] private Plant Oats;
        [Link(ByName = true)] private Plant Barley;
        [Link(ByName = true)] private Plant RedClover;
        [Link(ByName = true)] private Plant PlantainForage;
        [Link(ByName = true)] private Plant Rape;
        [Link(ByName = true)] private Plant Mustard;
        [Description("Crop names per harvest year, '+' separates species, '-' means bare fallow")]
        public string[] RotationCrops { get; set; }
        [Description("Cultivars per year; ';' separates mixture components")]
        public string[] RotationCultivars { get; set; }
        [Description("Rotation setting retained by the APSIM editor")]
        public string[] RotationSowingDepths { get; set; }
        [Description("Rotation setting retained by the APSIM editor")]
        public string[] RotationRowSpacings { get; set; }
        [Description("Rotation setting retained by the APSIM editor")]
        public string[] RotationPopulations { get; set; }
        [Description("Rotation setting retained by the APSIM editor")]
        public string[] RotationSowingDates { get; set; }
        [Description("Rotation setting retained by the APSIM editor")]
        public string[] RotationHarvestDates { get; set; }
        [Description("Rotation setting retained by the APSIM editor")]
        public string[] RotationHarvestCrops { get; set; }
        [Description("grain, hay, green, unmanaged, fallow")]
        public string[] RotationUses { get; set; }
        [Description("Rotation setting retained by the APSIM editor")]
        public string[] PastureAges { get; set; }
        [Description("Rotation setting retained by the APSIM editor")]
        public string TerminationDate { get; set; } = "20-Aug";
        [Description("Rotation setting retained by the APSIM editor")]
        public string WinterDiebackDate { get; set; } = "01-Dec";
        public double HarvestDMKgHa { get; private set; }
        public double HarvestDMTHa { get { return HarvestDMKgHa / 1000; } }
        public double BiomassBeforeKgHa { get; private set; }
        public double BiomassAfterKgHa { get; private set; }
        public string HarvestCrop { get; private set; }
        public string HarvestUse { get; private set; }
        public int HarvestYear { get; private set; }
        public event EventHandler HarvestRecorded;
        private Dictionary<string, Plant> plants;
        private DateTime? undersowDate;
        private int firstYear;
        private Phenology Pheno(Plant p) { return Structure.FindChild<Phenology>(relativeTo:p); }
        private double Stage(Plant p) { return p.IsAlive ? Pheno(p).Stage : 0; }
        private double Zadok(Plant p) { return p.IsAlive ? Pheno(p).Zadok : 0; }
        public double WheatStage { get { return Stage(Wheat); } }
        public double WheatZadok { get { return Zadok(Wheat); } }
        public double OatsStage { get { return Stage(Oats); } }
        public double OatsZadok { get { return Zadok(Oats); } }
        public double BarleyStage { get { return Stage(Barley); } }
        public double BarleyZadok { get { return Zadok(Barley); } }
        public double RedCloverStage { get { return Stage(RedClover); } }
        public double PlantainForageStage { get { return Stage(PlantainForage); } }
        public double MustardStage { get { return Stage(Mustard); } }
        public double RapeStage { get { return Stage(Rape); } }

        [EventSubscribe("StartOfSimulation")]
        private void Start(object sender, EventArgs e)
        {
            firstYear = Clock.StartDate.Year;
            plants = new Dictionary<string, Plant> { {"Wheat",Wheat}, {"Oats",Oats}, {"Barley",Barley},
                {"RedClover",RedClover}, {"PlantainForage",PlantainForage}, {"Rape",Rape}, {"Mustard",Mustard} };
            if (new [] {RotationCrops,RotationCultivars,RotationSowingDepths,RotationRowSpacings,
                RotationPopulations,RotationSowingDates,RotationHarvestDates,RotationHarvestCrops,
                RotationUses,PastureAges}.Any(a=>a==null))
                throw new Exception("Missing rotation settings. Restore all rotation arrays before running.");
            int n=RotationCrops.Length;
            if (new [] {RotationCultivars.Length,RotationSowingDepths.Length,RotationRowSpacings.Length,
                RotationPopulations.Length,RotationSowingDates.Length,RotationHarvestDates.Length,
                RotationHarvestCrops.Length,RotationUses.Length,PastureAges.Length}.Any(v=>v!=n))
                throw new Exception("History rotation arrays have unequal lengths");
            for(int i=0;i<n;i++)
            {
                int count=Parts(RotationCrops[i],'+').Length;
                foreach(string spec in new [] {RotationCultivars[i],RotationSowingDepths[i],RotationRowSpacings[i],RotationPopulations[i]})
                    if(Parts(spec,';').Length!=count) throw new Exception("History mixture lengths differ, year "+(firstYear+i));
            }
            if (Persistent(0) || Winter(0))
            {
                Sow(0,false,false);
                Summary.WriteMessage(this,"INITIAL STATE APPROXIMATION: existing sward/winter cereal is sown on simulation start; mature roots and pre-start reserves are unavailable.",MessageType.Warning);
            }
        }

        [EventSubscribe("DoManagement")]
        private void Manage(object sender, EventArgs e)
        {
            int i=Clock.Today.Year-firstYear;
            if(i<0 || i>=RotationCrops.Length) return;
            if(undersowDate.HasValue && Clock.Today==undersowDate.Value)
            { Sow(i,true,true); undersowDate=null; }

            // Regrowth phenology is a documented approximation, not a winter survival model.
            if(Persistent(i) && Match("01-Mar"))
                foreach(Plant p in plants.Values.Where(p=>Perennial(p.Name) && p.IsAlive))
                    if(Pheno(p).Stage>3) Pheno(p).SetToStage(3);

            if(RotationUses[i]=="fallow" && Match("01-May")) EndAll();
            if(Persistent(i) && Match(RotationSowingDates[i]))
            {
                var names=Parts(RotationCrops[i],'+');
                var cvs=Parts(RotationCultivars[i],';');
                bool compatible=names.Select((name,c)=>plants[name].IsAlive && plants[name].SowingData.Cultivar==cvs[c]).All(v=>v)
                    && plants.Values.Where(p=>p.IsAlive).All(p=>names.Contains(p.Name));
                // An age reset without an undersown predecessor represents a new establishment.
                if(i>0 && PastureAges[i]=="1" && Persistent(i-1) && PastureAges[i-1]!="0") compatible=false;
                if(!compatible)
                {
                    EndAll(); Sow(i,false,false);
                    Summary.WriteMessage(this,"ASSUMED ESTABLISHMENT: pasture missing or composition changed; sown on "+Clock.Today.ToString("yyyy-MM-dd"),MessageType.Warning);
                }
            }
            if(!Persistent(i) && RotationUses[i]!="fallow" && !Winter(i) && Match(RotationSowingDates[i]))
            {
                EndAll(); Sow(i,false,true);
                if(Parts(RotationCrops[i],'+').Any(Perennial)) undersowDate=Clock.Today.AddDays(1);
            }
            if(Match(RotationHarvestDates[i])) Harvest(i);
            int next=i+1;
            if(Persistent(i) && next<RotationCrops.Length && !Persistent(next) && Match(TerminationDate)) EndAll();
            if(next<RotationCrops.Length && Winter(next) && Match(RotationSowingDates[next]))
            { EndAll(); Sow(next,false,false); }
            if(RotationUses[i]=="hay" && next<RotationCrops.Length && Persistent(next) && Match(WinterDiebackDate))
                foreach(Plant p in plants.Values.Where(p=>Perennial(p.Name) && p.IsAlive))
                    foreach(var organ in Aboveground(p)) organ.RemoveBiomass(0,0,1,1);
        }

        private static string[] Parts(string value,char sep)
        { return value=="-" ? new string[0] : value.Split(sep).Select(s=>s.Trim()).ToArray(); }
        private bool Match(string date) { return date!="-" && DateUtilities.WithinDates(date,Clock.Today,date); }
        private bool Persistent(int i) { return RotationUses[i]=="hay" || RotationUses[i]=="unmanaged"; }
        private bool Winter(int i) { return RotationCultivars[i].Contains("Winter_rye"); }
        private static bool Perennial(string name) { return name=="RedClover" || name=="PlantainForage"; }
        private IEnumerable<IHasDamageableBiomass> Aboveground(Plant p)
        { return Structure.FindChildren<IHasDamageableBiomass>(relativeTo:p).Where(o=>new [] {"Leaf","Petiole","Stem","Inflorescence","Panicle","Grain"}.Contains(((IModel)o).Name)); }
        private void Sow(int i,bool perennialsOnly,bool split)
        {
            var names=Parts(RotationCrops[i],'+'); var cvs=Parts(RotationCultivars[i],';');
            var depths=Parts(RotationSowingDepths[i],';'); var rows=Parts(RotationRowSpacings[i],';'); var pops=Parts(RotationPopulations[i],';');
            for(int c=0;c<names.Length;c++)
            {
                if(split && Perennial(names[c])!=perennialsOnly) continue;
                Plant p=plants[names[c]];
                if(p.IsAlive) throw new Exception("Attempt to resow living crop "+p.Name);
                p.Sow(cultivar:cvs[c],population:double.Parse(pops[c],CultureInfo.InvariantCulture),
                    depth:double.Parse(depths[c],CultureInfo.InvariantCulture),rowSpacing:double.Parse(rows[c],CultureInfo.InvariantCulture));
                Summary.WriteMessage(this,"SOW "+p.Name+" "+cvs[c]+" "+Clock.Today.ToString("yyyy-MM-dd"),MessageType.Information);
            }
        }
        private void Harvest(int i)
        {
            HarvestDMKgHa=BiomassBeforeKgHa=BiomassAfterKgHa=0;
            HarvestYear=Clock.Today.Year; HarvestCrop=RotationHarvestCrops[i]; HarvestUse=RotationUses[i];
            if(HarvestUse!="fallow" && HarvestUse!="unmanaged")
                foreach(string name in Parts(HarvestCrop,'+'))
                {
                    Plant p=plants[name];
                    if(!p.IsAlive) throw new Exception("Scheduled harvest of absent crop "+name+" "+HarvestYear);
                    double before=p.AboveGround.Wt*10; BiomassBeforeKgHa+=before;
                    if(HarvestUse=="grain") HarvestDMKgHa+=Convert.ToDouble(Structure.Get("Grain.Total.Wt",relativeTo:p))*10;
                    p.Harvest();
                    double after=p.AboveGround.Wt*10; BiomassAfterKgHa+=after;
                    if(HarvestUse!="grain") HarvestDMKgHa+=Math.Max(0,before-after);
                    if(!Perennial(name) || HarvestUse=="green") p.EndCrop();
                }
            Summary.WriteMessage(this,"ANNUAL RECORD "+HarvestCrop+" "+Clock.Today.ToString("yyyy-MM-dd")+" DM kg/ha="+HarvestDMKgHa.ToString("F2",CultureInfo.InvariantCulture),MessageType.Information);
            HarvestRecorded?.Invoke(this,EventArgs.Empty);
        }
        private void EndAll() { foreach(Plant p in plants.Values.Where(p=>p.IsAlive)) p.EndCrop(); }
    }
}
```
      Manager Fertilise at sowing
        FertiliserTypes = NO3N, NO3N, NO3N, NO3N, NO3N, NO3N, NO3N, NO3N, NO3N, NO3N, NO3N, NO3N, NO3N, NO3N, NO3N, NO3N, NO3N, NO3N, NO3N, NO3N
        FertiliserAmounts = 0, 0, 0, 0, 0, 0, 0, 0, 0, 0, 0, 0, 0, 0, 0, 0, 0, 30.0, 0, 0
        ApplyAtCrops = Wheat, Oats, Barley, Mustard, Rape
```csharp
using System;
using System.Collections.Generic;
using Models.Core;
using Models.PMF;
using Models.Soils.Nutrients;

namespace Models
{
    [Serializable]
    public class Script : Model
    {
        [Link] private Clock Clock;
        [Link] private Fertiliser Fertiliser;
        [Link] private Summary Summary;

        [Description("Fertiliser type for each year of rotation (same order as rotation years)")]
        public string[] FertiliserTypes { get; set; }

        [Description("Amount of fertiliser for each year of rotation (kg/ha), same order")]
        public double[] FertiliserAmounts { get; set; }

        [Description("Apply fertiliser only at sowing of these crops (leave empty = all sowings)")]
        public string[] ApplyAtCrops { get; set; }

        private int startYear;
        private HashSet<string> fertilisedToday = new HashSet<string>();

        [EventSubscribe("StartOfSimulation")]
        private void OnStart(object sender, EventArgs e)
        {
            startYear = Clock.StartDate.Year;
        }

        [EventSubscribe("Sowing")]
        private void OnSowing(object sender, EventArgs e)
        {
            int yearIndex = Clock.Today.Year - Clock.StartDate.Year;
            Plant crop = sender as Plant;
            // Arrays refer to the harvest year. Autumn-sown rye belongs to next year.
            if (crop != null && crop.SowingData.Cultivar != null &&
                crop.SowingData.Cultivar.Contains("Winter_rye") && Clock.Today.Month >= 7)
                yearIndex++;
            if (yearIndex < 0 || yearIndex >= FertiliserAmounts.Length)
                return;

            // If ApplyAtCrops specified, only fertilise at sowing of those crops
            if (ApplyAtCrops != null && ApplyAtCrops.Length > 0)
            {
                string sownCrop = (sender as Plant)?.Name ?? "";
                bool match = false;
                foreach (string c in ApplyAtCrops)
                    if (string.Equals(c, sownCrop, StringComparison.OrdinalIgnoreCase))
                    { match = true; break; }
                if (!match)
                    return;
            }

            // Prevent double application on the same day (e.g. when sowing a mixture)
            string key = Clock.Today.ToString("yyyy-MM-dd");
            if (fertilisedToday.Contains(key))
                return;

            double amount = FertiliserAmounts[yearIndex];
            if (amount <= 0)
                return;

            string type = FertiliserTypes != null && yearIndex < FertiliserTypes.Length
                ? FertiliserTypes[yearIndex]
                : "Urea";

            Fertiliser.Apply(amount: amount, type: type);
            fertilisedToday.Add(key);
            Summary.WriteMessage(this, $"Applied {amount} kg/ha of {type} on {Clock.Today:d}", MessageType.Information);
        }
    }
}
```
      Manager Harvest (disabled)
        Crop = [Wheat]
```csharp
using APSIM.Shared.Utilities;
using Models.Utilities;
using Models.Soils;
using Models.PMF;
using Models.Core;
using System;
using System.Linq;

namespace Models
{
    [Serializable] 
    public class Script : Model
    {
        [Description("Crop")]
        public IPlant Crop { get; set; }
        
        [EventSubscribe("DoManagement")]
        private void OnDoManagement(object sender, EventArgs e)
        {
            if (Crop.IsReadyForHarvesting)
            {
                Crop.Harvest();
                Crop.EndCrop();
            }
        }
    }
}
```
      Manager SWIMSetLowerBC
        LowerBCType = seepage
        LowerBCValue = -500
```csharp
using Models.Climate;
using APSIM.Shared.Utilities;
using Models.Soils.Nutrients;
using Models.Soils;
using Models.PMF;
using Models.Core;
using System.Xml.Serialization;
using System;
using System.Linq;
using Models.AgPasture;
using Models.Interfaces;

namespace Models
{
    [Serializable] 
    [System.Xml.Serialization.XmlInclude(typeof(Model))]
    public class Script : Model
    {
        [Link] Clock clock;
        [Link] ISummary summary;
        [Link] private Swim3 swim;
        //[Link] private PastureSpecies ryegrass;
        //[Link] private SimpleGrazing grazing;
        
        public enum LowerBCTypeOptions {gradient,seepage,potential};

        [Separator("Sets the lower boundary condition type (and value if set to 'potential' for SWIM3. The change is applied at the beginning of the first day of the simulation.")]
        [Description("[Get a dropdown] What lower boundary condition is wanted?")] public LowerBCTypeOptions LowerBCType { get; set; }
        [Description("If 'potential', then what potential? (mm) ")] public double LowerBCValue { get; set; }

        public double SoilWaterStart  { get; set; }
        public double SoilWaterEnd  { get; set; }

        [EventSubscribe("DoDailyInitialisation")]
        private void DoDailyInitialisation(object sender, EventArgs e)
        {
        }

        [EventSubscribe("DoReportCalculations")]
        private void DoReportCalculations(object sender, EventArgs e)
        {
        }

        [EventSubscribe("DoManagement")]
        private void DoDailyCalculations(object sender, EventArgs e)
        {
            if (clock.Today == clock.StartDate)
            {
                summary.WriteMessage(this, "Script is setting lower boundary condition to " + LowerBCType, MessageType.Diagnostic);
                if (LowerBCType == LowerBCTypeOptions.gradient)
                    swim.SetLowerBCForGradient(bbcGradient: 0.0);   // in cm/cm (ibbc=0) Note that this is the default setting
                else if (LowerBCType == LowerBCTypeOptions.potential)
                    swim.SetLowerBCForGivenPotential(bbcPotential: LowerBCValue /10.0 );    //  convert to cm (ibbc=1), DUL is -100 cm so values more positive will often result in inflow to the bottom of the soil profile. Input in mm so divide here.
                else if (LowerBCType == LowerBCTypeOptions.seepage)
                    swim.SetLowerBCForSeepage(bbcPotentialSeepage: 0.0);  // in cm (ibbc=3). This is for zero-tension lysimeters
                else
                    throw new Exception("Wrong lower boundary condition type");
            }
        }
    }
}
```
      Plant Barley
        Cultivar Barley_sort
          Command:
            [Phenology].VrnSensitivity.FixedValue = 0.33
            [Structure].BranchMortality.MortalityPhase.Mortality.MortalityPerDegDay.XYPairs.Y = 0.001,0
            [Leaf].BiomassRemovalDefaults.HarvestFractionLiveToRemove = 0.9
            [Leaf].BiomassRemovalDefaults.HarvestFractionDeadToRemove = 0.9
            [Leaf].BiomassRemovalDefaults.HarvestFractionLiveToResidue = 0
            [Leaf].BiomassRemovalDefaults.HarvestFractionDeadToResidue = 0
            [Stem].BiomassRemovalDefaults.HarvestFractionLiveToRemove = 0.9
            [Stem].BiomassRemovalDefaults.HarvestFractionDeadToRemove = 0.9
            [Stem].BiomassRemovalDefaults.HarvestFractionLiveToResidue = 0
            [Stem].BiomassRemovalDefaults.HarvestFractionDeadToResidue = 0
            [Spike].BiomassRemovalDefaults.HarvestFractionLiveToRemove = 0.9
            [Spike].BiomassRemovalDefaults.HarvestFractionDeadToRemove = 0.9
            [Spike].BiomassRemovalDefaults.HarvestFractionLiveToResidue = 0
            [Spike].BiomassRemovalDefaults.HarvestFractionDeadToResidue = 0
            [Phenology].MinimumLeafNumber.FixedValue = 8.3663655723
            [Phenology].PpSensitivity.FixedValue = 0.9124644349
            [Phenology].EarlyReproductiveLongDayBase.FixedValue = 4.7291375453
            [Phenology].EarlyReproductivePpSensitivity.FixedValue = 1.6793287662
            [Structure].Phyllochron.BasePhyllochron.FixedValue = 120
            [Phenology].GrainFilling.Target.FixedValue = 538.924232678
            [Leaf].Photosynthesis.RUE.FixedValue = 2.2132604333
            [Leaf].ExtinctionCoeff.FixedValue = 0.7362468895
            [Leaf].CohortParameters.MaxArea.AreaLargestLeaves.FixedValue = 5000
            [Grain].MaximumPotentialGrainSize.FixedValue = 0.0214560568
            [Grain].NumberFunction.GrainNumber.GrainsPerGramOfStem.FixedValue = 15.4060482153
      Report HarvestReport_Field1: EventNames=[RotationManager].Script.HarvestRecorded
        VariableNames:
          [Clock].Today as Date
          [RotationManager].Script.HarvestYear as Year
          [RotationManager].Script.HarvestCrop as Crop
          [RotationManager].Script.HarvestUse as Use
          [RotationManager].Script.HarvestDMTHa as YieldDMTHa
          [RotationManager].Script.BiomassBeforeKgHa as BeforeKgHa
          [RotationManager].Script.BiomassAfterKgHa as AfterKgHa
      Report PhenologyReport_Field1: EventNames=[Clock].EndOfDay
        VariableNames:
          [Clock].Today as Date
          [RotationManager].Script.WheatStage as WheatStage
          [RotationManager].Script.WheatZadok as WheatZadok
          [RotationManager].Script.OatsStage as OatsStage
          [RotationManager].Script.OatsZadok as OatsZadok
          [RotationManager].Script.BarleyStage as BarleyStage
          [RotationManager].Script.BarleyZadok as BarleyZadok
          [RotationManager].Script.RedCloverStage as RedCloverStage
          [RotationManager].Script.PlantainForageStage as PlantainForageStage
          [RotationManager].Script.MustardStage as MustardStage
          [RotationManager].Script.RapeStage as RapeStage
      Report Report_Field1: EventNames=[Clock].EndOfDay
        VariableNames:
          [Clock].Today as Date
          [RotationManager].Script.WheatStage as WheatStage
          [RotationManager].Script.WheatZadok as WheatZadok
          [RotationManager].Script.OatsStage as OatsStage
          [RotationManager].Script.OatsZadok as OatsZadok
          [RotationManager].Script.BarleyStage as BarleyStage
          [RotationManager].Script.BarleyZadok as BarleyZadok
          [RotationManager].Script.RedCloverStage as RedCloverStage
          [RotationManager].Script.PlantainForageStage as PlantainForageStage
          [RotationManager].Script.MustardStage as MustardStage
          [RotationManager].Script.RapeStage as RapeStage
          [Wheat].AboveGround.Wt as WheatAboveGround_g_m2
          [Oats].AboveGround.Wt as OatsAboveGround_g_m2
          [Barley].AboveGround.Wt as BarleyAboveGround_g_m2
          [RedClover].AboveGround.Wt as RedCloverAboveGround_g_m2
          [PlantainForage].AboveGround.Wt as PlantainForageAboveGround_g_m2
          [Mustard].AboveGround.Wt as MustardAboveGround_g_m2
          [Rape].AboveGround.Wt as RapeAboveGround_g_m2
          [Weather].Rain as Rain_mm
          [Weather].MaxT as MaxTemperature_C
          [Weather].MinT as MinTemperature_C
    Zone Field2: Area=1; Slope=0; AspectAngle=0; Altitude=50; CanopyType=BroadAcre
      Fertiliser
      Soil: ASCOrder=Vertosol; ASCSubOrder=Black; SoilType=Clay; Site=Norwin; NearestTown=Norwin; Region=Darling Downs and Granite Belt; State=Queensland; Country=Russia; NaturalVegetation=Qld. Bluegrass, possible Qld. Blue gum; ApsoilNumber=900; Latitude=56.77719; Longitude=56.11066; LocationAccuracy=+/- 20m; YearOfSampling=0
        DataSource=CSIRO Sustainable Ecosystems, Toowoomba; Characteriesd as part of the GRDC funded project"Doing it better, doing it smarter, managing soil water in Australian agriculture' 2011
        Comments=Clay - OC, CLL for all crops estimated-based on Bongeen Mywybilla Soil No1
        Organic: same as Wheat.Field1.Soil.Organic
        Chemical: Thickness=[150, 150, 300, 300, 300, 300, 300]; PH=[5.09, 5.09, 5, 5, 5, 5, 5]; PHUnits=Water
        Water: Thickness=[150, 150, 300, 300, 300, 300, 300]; FilledFromTop=false
          InitialValues=[0.297925, 0.274107, 0.30985, 0.3085, 0.307, 0.3052, 0.30505]
        Nutrient
        Solute NO3: InitialValuesUnits=ppm; WaterTableConcentration=0; D0=0; DepthConstant=0; MaxDepthSoluteAccessible=0; RunoffEffectivenessAtMovingSolute=0; MaxEffectiveRunoff=0
          Thickness  InitialValues  Exco  FIP
          150        5              0     1
          150        4.5            0     1
          300        3              0     1
          300        2              0     1
          300        1.5            0     1
          300        1              0     1
          300        0.5            0     1
        Solute NH4: same as Wheat.Field1.Soil.NH4
        Solute Urea: same as Wheat.Field1.Soil.Urea
        SoilTemperature: InteractionsPerDay=8
        LayerStructure: Thickness=[150, 150, 300, 300, 300, 300, 300]
        Physical: same as Wheat.Field1.Soil.Physical
        Swim3: same as Wheat.Field1.Soil.Swim3
      SurfaceOrganicMatter: InitialResidueName=redclover_stubble; InitialResidueType=redclover; InitialResidueMass=500; InitialStandingFraction=0; InitialCPR=0; InitialCNR=100
      Plant RedClover: same as Wheat.Field1.RedClover
      Plant Wheat: same as Wheat.Field1.Wheat
      Plant Oats: same as Wheat.Field1.Oats
      Plant Potato
      Plant PlantainForage: same as Wheat.Field1.PlantainForage
      Plant Mustard: same as Wheat.Field1.Mustard
      Plant Rape: ResourceName=Canola
        Cultivar Rape_sort
          Command:
            [Phenology].Vegetative.Target.XYPairs.X = 0, 25
            [Phenology].Vegetative.Target.XYPairs.Y = 290, 1
            [Phenology].StemElongation.Target.PPResponse.Amount.FixedValue = 240
            [Leaf].Phyllochron.Base.FixedValue = 65
      Manager RotationManager
        RotationCrops = RedClover+PlantainForage, Oats+RedClover, Barley+RedClover+PlantainForage, RedClover+PlantainForage, Oats+RedClover+PlantainForage, RedClover+PlantainForage, RedClover+PlantainForage, RedClover+PlantainForage, Barley, Rape, Oats+RedClover+PlantainForage, RedClover+PlantainForage, RedClover+PlantainForage, RedClover+PlantainForage, Wheat, Mustard, Wheat, Rape, Wheat, Oats+RedClover+PlantainForage
        RotationCultivars = Vik7;Vik9Proxy, OatsUnspecified;VetchProxy, Barley_sort;Vik7;Vik9Proxy, Vik7;Vik9Proxy, Argamak;Vik7;Vik9Proxy, Vik7;Vik9Proxy, Vik7;Vik9Proxy, Vik7;Vik9Proxy, Barley_sort, Rape_sort, Argamak;Vik7;Vik9Proxy, Vik7;Vik9Proxy, Vik7;Vik9Proxy, Vik7;Vik9Proxy, Irgina, Mustard_sort, Winter_rye_smoke, Rape_sort, Zlata, Yakov;Vik7;Vik9Proxy
        RotationSowingDepths = 10;10, 20;10, 20;10;10, 10;10, 20;10;10, 10;10, 10;10, 10;10, 20, 20, 20;10;10, 10;10, 10;10, 10;10, 30, 20, 30, 20, 30, 20;10;10
        RotationRowSpacings = 150;150, 150;150, 200;150;150, 150;150, 150;150;150, 150;150, 150;150, 150;150, 200, 200, 150;150;150, 150;150, 150;150, 150;150, 200, 200, 200, 200, 200, 150;150;150
        RotationPopulations = 150;150, 250;150, 450;150;150, 150;150, 250;150;150, 150;150, 150;150, 150;150, 450, 45, 250;150;150, 150;150, 150;150, 150;150, 418.54999999999995, 45, 230, 45, 517.8, 250;150;150
        RotationSowingDates = 15-May, 10-May, 10-May, 15-May, 15-May, 15-May, 15-May, 15-May, 10-May, 10-May, 29-Apr, 15-May, 15-May, 15-May, 14-May, 10-May, 05-Sep, 10-May, 12-May, 04-May
        RotationHarvestDates = 15-Jul, 15-Jul, 31-Aug, 15-Jul, 31-Aug, 15-Jul, 15-Jul, 15-Jul, 31-Aug, 31-Aug, 31-Aug, 15-Jul, 15-Jul, 15-Jul, 17-Aug, 31-Aug, 31-Aug, 31-Aug, 17-Aug, 31-Aug
        RotationHarvestCrops = RedClover+PlantainForage, Oats+RedClover, Barley, RedClover+PlantainForage, Oats, RedClover+PlantainForage, RedClover+PlantainForage, RedClover+PlantainForage, Barley, Rape, Oats, RedClover+PlantainForage, RedClover+PlantainForage, RedClover+PlantainForage, Wheat, Mustard, Wheat, Rape, Wheat, Oats
        RotationUses = hay, green, grain, hay, grain, hay, hay, hay, grain, grain, grain, hay, hay, hay, grain, grain, grain, grain, grain, grain
        PastureAges = 2, 0, 0, 1, 0, 1, 2, 3, 0, 0, 0, 1, 2, 3, 0, 0, 0, 0, 0, 0
        TerminationDate = 20-Aug
        WinterDiebackDate = 01-Dec
        script: same as in Wheat.Field1.RotationManager
      Manager Fertilise at sowing
        FertiliserTypes = NO3N, NO3N, NO3N, NO3N, NO3N, NO3N, NO3N, NO3N, NO3N, NO3N, NO3N, NO3N, NO3N, NO3N, NO3N, NO3N, NO3N, NO3N, NO3N, NO3N
        FertiliserAmounts = 0, 30, 30, 0, 30.0, 0, 0, 0, 30, 30, 30.0, 0, 0, 0, 30.0, 30, 30.0, 30, 30.0, 30.0
        ApplyAtCrops = Wheat, Oats, Barley, Mustard, Rape
        script: same as in Wheat.Field1.Fertilise at sowing
      Manager Harvest (disabled): same as Wheat.Field1.Harvest
      Manager SWIMSetLowerBC: same as Wheat.Field1.SWIMSetLowerBC
      Plant Barley: same as Wheat.Field1.Barley
      Report HarvestReport_Field2: same as Wheat.Field1.HarvestReport_Field1
      Report PhenologyReport_Field2: same as Wheat.Field1.PhenologyReport_Field1
      Report Report_Field2: same as Wheat.Field1.Report_Field1
    Zone Field3: Area=1; Slope=0; AspectAngle=0; Altitude=50; CanopyType=BroadAcre
      Fertiliser
      Soil: ASCOrder=Vertosol; ASCSubOrder=Black; SoilType=Clay; Site=Norwin; NearestTown=Norwin; Region=Darling Downs and Granite Belt; State=Queensland; Country=Russia; NaturalVegetation=Qld. Bluegrass, possible Qld. Blue gum; ApsoilNumber=900; Latitude=56.77719; Longitude=56.11066; LocationAccuracy=+/- 20m; YearOfSampling=0
        DataSource=CSIRO Sustainable Ecosystems, Toowoomba; Characteriesd as part of the GRDC funded project"Doing it better, doing it smarter, managing soil water in Australian agriculture' 2011
        Comments=Clay - OC, CLL for all crops estimated-based on Bongeen Mywybilla Soil No1
        Organic: same as Wheat.Field1.Soil.Organic
        Chemical: Thickness=[150, 150, 300, 300, 300, 300, 300]; PH=[5.1, 5.1, 5, 5, 5, 5, 5]; PHUnits=Water
        Water: Thickness=[150, 150, 300, 300, 300, 300, 300]; FilledFromTop=false
          InitialValues=[0.422675, 0.359927, 0.40935, 0.4035, 0.397, 0.3892, 0.38855]
        Nutrient
        Solute NO3: same as Wheat.Field1.Soil.NO3
        Solute NH4: same as Wheat.Field1.Soil.NH4
        Solute Urea: same as Wheat.Field1.Soil.Urea
        SoilTemperature: InteractionsPerDay=8
        LayerStructure: Thickness=[150, 150, 300, 300, 300, 300, 300]
        Physical: same as Wheat.Field1.Soil.Physical
        Swim3: same as Wheat.Field1.Soil.Swim3
      SurfaceOrganicMatter: InitialResidueName=redclover_stubble; InitialResidueType=redclover; InitialResidueMass=500; InitialStandingFraction=0; InitialCPR=0; InitialCNR=100
      Plant RedClover: same as Wheat.Field1.RedClover
      Plant Wheat: same as Wheat.Field1.Wheat
      Plant Oats: same as Wheat.Field1.Oats
      Plant Potato
      Plant PlantainForage: same as Wheat.Field1.PlantainForage
      Plant Mustard: same as Wheat.Field1.Mustard
      Plant Rape: ResourceName=Canola
        Cultivar Rape_sort
          Command:
            [Phenology].Vegetative.Target.XYPairs.X = 0, 25
            [Phenology].Vegetative.Target.XYPairs.Y = 290, 1
            [Phenology].StemElongation.Target.PPResponse.Amount.FixedValue = 240
            [Leaf].Phyllochron.Base.FixedValue = 65
      Manager RotationManager
        RotationCrops = Wheat, Barley+RedClover+PlantainForage, RedClover+PlantainForage, RedClover+PlantainForage, RedClover+PlantainForage, Barley, Wheat, Mustard, Oats+RedClover+PlantainForage, RedClover+PlantainForage, RedClover+PlantainForage, RedClover+PlantainForage, Wheat, Mustard, Wheat, Oats+RedClover+PlantainForage, RedClover+PlantainForage, RedClover+PlantainForage, Wheat, Wheat
        RotationCultivars = Lada, Barley_sort;Vik7;Vik9Proxy, Vik7;Vik9Proxy, Vik7;Vik9Proxy, Vik7;Vik9Proxy, Barley_sort, Irgina, FlaxBiomassProxy, Argamak;Vik7;Vik9Proxy, Vik7;Vik9Proxy, Vik7;Vik9Proxy, Vik7;Vik9Proxy, Irgina, Mustard_sort, Winter_rye_smoke, Argamak;Vik7;Vik9Proxy, Vik7;Vik9Proxy, Vik7;Vik9Proxy, Winter_rye_smoke, Zlata
        RotationSowingDepths = 30, 20;10;10, 10;10, 10;10, 10;10, 20, 30, 20, 20;10;10, 10;10, 10;10, 10;10, 30, 20, 30, 20;10;10, 10;10, 10;10, 30, 30
        RotationRowSpacings = 200, 200;150;150, 150;150, 150;150, 150;150, 200, 200, 200, 150;150;150, 150;150, 150;150, 150;150, 200, 200, 200, 150;150;150, 150;150, 150;150, 200, 200
        RotationPopulations = 427.90000000000003, 450;150;150, 150;150, 150;150, 150;150, 450, 382.95, 45, 250;150;150, 150;150, 150;150, 150;150, 478.5, 45, 230, 250;150;150, 150;150, 150;150, 230, 403.99999999999994
        RotationSowingDates = 18-May, 10-May, 15-May, 15-May, 15-May, 10-May, 11-May, 10-May, 22-May, 15-May, 15-May, 15-May, 13-May, 10-May, 31-Aug, 07-May, 15-May, 15-May, 09-Sep, 03-May
        RotationHarvestDates = 28-Aug, 31-Aug, 15-Jul, 15-Jul, 15-Jul, 31-Aug, 09-Aug, 15-Jul, 31-Aug, 15-Jul, 15-Jul, 15-Jul, 19-Aug, 31-Aug, 31-Aug, 31-Aug, 15-Jul, 15-Jul, 31-Aug, 21-Aug
        RotationHarvestCrops = Wheat, Barley, RedClover+PlantainForage, RedClover+PlantainForage, RedClover+PlantainForage, Barley, Wheat, Mustard, Oats, RedClover+PlantainForage, RedClover+PlantainForage, RedClover+PlantainForage, Wheat, Mustard, Wheat, Oats, RedClover+PlantainForage, RedClover+PlantainForage, Wheat, Wheat
        RotationUses = grain, grain, hay, hay, hay, grain, grain, green, grain, hay, hay, hay, grain, grain, grain, grain, hay, hay, grain, grain
        PastureAges = 0, 0, 1, 2, 3, 0, 0, 0, 0, 1, 2, 3, 0, 0, 0, 0, 1, 2, 0, 0
        TerminationDate = 20-Aug
        WinterDiebackDate = 01-Dec
        script: same as in Wheat.Field1.RotationManager
      Manager Fertilise at sowing
        FertiliserTypes = NO3N, NO3N, NO3N, NO3N, NO3N, NO3N, NO3N, NO3N, NO3N, NO3N, NO3N, NO3N, NO3N, NO3N, NO3N, NO3N, NO3N, NO3N, NO3N, NO3N
        FertiliserAmounts = 30.0, 30, 0, 0, 0, 30, 30.0, 30, 30.0, 0, 0, 0, 30.0, 30, 30.0, 30.0, 0, 0, 30.0, 30.0
        ApplyAtCrops = Wheat, Oats, Barley, Mustard, Rape
        script: same as in Wheat.Field1.Fertilise at sowing
      Manager Harvest (disabled): same as Wheat.Field1.Harvest
      Manager SWIMSetLowerBC: same as Wheat.Field1.SWIMSetLowerBC
      Plant Barley: same as Wheat.Field1.Barley
      Report HarvestReport_Field3: same as Wheat.Field1.HarvestReport_Field1
      Report PhenologyReport_Field3: same as Wheat.Field1.PhenologyReport_Field1
      Report Report_Field3: same as Wheat.Field1.Report_Field1
    Zone Field4: Area=1; Slope=0; AspectAngle=0; Altitude=50; CanopyType=BroadAcre
      Fertiliser
      Soil: ASCOrder=Vertosol; ASCSubOrder=Black; SoilType=Clay; Site=Norwin; NearestTown=Norwin; Region=Darling Downs and Granite Belt; State=Queensland; Country=Russia; NaturalVegetation=Qld. Bluegrass, possible Qld. Blue gum; ApsoilNumber=900; Latitude=56.77719; Longitude=56.11066; LocationAccuracy=+/- 20m; YearOfSampling=0
        DataSource=CSIRO Sustainable Ecosystems, Toowoomba; Characteriesd as part of the GRDC funded project"Doing it better, doing it smarter, managing soil water in Australian agriculture' 2011
        Comments=Clay - OC, CLL for all crops estimated-based on Bongeen Mywybilla Soil No1
        Organic: same as Wheat.Field1.Soil.Organic
        Chemical: Thickness=[150, 150, 300, 300, 300, 300, 300]; PH=[5.09, 5.09, 5, 5, 5, 5, 5]; PHUnits=Water
        Water: Thickness=[150, 150, 300, 300, 300, 300, 300]; InitialValues=[0.3104, 0.282689, 0.3198, 0.318, 0.316, 0.3136, 0.3134]; FilledFromTop=false
        Nutrient
        Solute NO3: InitialValuesUnits=ppm; WaterTableConcentration=0; D0=0; DepthConstant=0; MaxDepthSoluteAccessible=0; RunoffEffectivenessAtMovingSolute=0; MaxEffectiveRunoff=0
          Thickness  InitialValues  Exco  FIP
          150        5.5            0     1
          150        4              0     1
          300        3.5            0     1
          300        2.5            0     1
          300        1.5            0     1
          300        1              0     1
          300        0.5            0     1
        Solute NH4: same as Wheat.Field1.Soil.NH4
        Solute Urea: same as Wheat.Field1.Soil.Urea
        SoilTemperature: InteractionsPerDay=8
        LayerStructure: Thickness=[150, 150, 300, 300, 300, 300, 300]
        Physical: same as Wheat.Field1.Soil.Physical
        Swim3: same as Wheat.Field1.Soil.Swim3
      SurfaceOrganicMatter: InitialResidueName=redclover_stubble; InitialResidueType=redclover; InitialResidueMass=500; InitialStandingFraction=0; InitialCPR=0; InitialCNR=100
      Plant RedClover: same as Wheat.Field1.RedClover
      Plant Wheat: same as Wheat.Field1.Wheat
      Plant Oats: same as Wheat.Field1.Oats
      Plant Potato
      Plant PlantainForage: same as Wheat.Field1.PlantainForage
      Plant Mustard: same as Wheat.Field1.Mustard
      Plant Rape: ResourceName=Canola
        Cultivar Rape_sort
          Command:
            [Phenology].Vegetative.Target.XYPairs.X = 0, 25
            [Phenology].Vegetative.Target.XYPairs.Y = 290, 1
            [Phenology].StemElongation.Target.PPResponse.Amount.FixedValue = 240
            [Leaf].Phyllochron.Base.FixedValue = 65
      Manager RotationManager
        RotationCrops = Barley+RedClover+PlantainForage, RedClover+PlantainForage, RedClover+PlantainForage, RedClover+PlantainForage, Barley, Wheat, Mustard, Oats+RedClover+PlantainForage, RedClover+PlantainForage, RedClover+PlantainForage, RedClover+PlantainForage, Wheat, Rape, Wheat, Oats+RedClover+PlantainForage, RedClover+PlantainForage, RedClover+PlantainForage, Wheat, Oats+RedClover+PlantainForage, RedClover+PlantainForage
        RotationCultivars = Barley_sort;Vik7;Vik9Proxy, Vik7;Vik9Proxy, Vik7;Vik9Proxy, Vik7;Vik9Proxy, Barley_sort, Irgina, FlaxBiomassProxy, Argamak;Vik7;Vik9Proxy, Vik7;Vik9Proxy, Vik7;Vik9Proxy, Vik7;Vik9Proxy, Irgina, Rape_sort, Winter_rye_smoke, Argamak;Vik7;Vik9Proxy, Vik7;Vik9Proxy, Vik7;Vik9Proxy, Zlata, Yakov;Vik7;Vik9Proxy, Vik7;Vik9Proxy
        RotationSowingDepths = 20;10;10, 10;10, 10;10, 10;10, 20, 30, 20, 20;10;10, 10;10, 10;10, 10;10, 30, 20, 30, 20;10;10, 10;10, 10;10, 30, 20;10;10, 10;10
        RotationRowSpacings = 200;150;150, 150;150, 150;150, 150;150, 200, 200, 200, 150;150;150, 150;150, 150;150, 150;150, 200, 200, 200, 150;150;150, 150;150, 150;150, 200, 150;150;150, 150;150
        RotationPopulations = 450;150;150, 150;150, 150;150, 150;150, 450, 366.75, 45, 250;150;150, 150;150, 150;150, 150;150, 432.85, 45, 230, 250;150;150, 150;150, 150;150, 495.59999999999997, 250;150;150, 150;150
        RotationSowingDates = 10-May, 15-May, 15-May, 15-May, 10-May, 07-May, 10-May, 12-May, 15-May, 15-May, 15-May, 12-May, 10-May, 05-Sep, 14-May, 15-May, 15-May, 18-May, 12-May, 15-May
        RotationHarvestDates = 31-Aug, 15-Jul, 15-Jul, 15-Jul, 31-Aug, 15-Aug, 15-Jul, 31-Aug, 15-Jul, 15-Jul, 15-Jul, 23-Aug, 31-Aug, 31-Aug, 31-Aug, 15-Jul, 15-Jul, 14-Aug, 31-Aug, 15-Jul
        RotationHarvestCrops = Barley, RedClover+PlantainForage, RedClover+PlantainForage, RedClover+PlantainForage, Barley, Wheat, Mustard, Oats, RedClover+PlantainForage, RedClover+PlantainForage, RedClover+PlantainForage, Wheat, Rape, Wheat, Oats, RedClover+PlantainForage, RedClover+PlantainForage, Wheat, Oats, RedClover+PlantainForage
        RotationUses = grain, hay, hay, hay, grain, grain, green, grain, hay, hay, hay, grain, grain, grain, grain, hay, hay, grain, grain, hay
        PastureAges = 0, 1, 2, 3, 0, 0, 0, 0, 1, 2, 3, 0, 0, 0, 0, 1, 2, 0, 0, 1
        TerminationDate = 20-Aug
        WinterDiebackDate = 01-Dec
        script: same as in Wheat.Field1.RotationManager
      Manager Fertilise at sowing
        FertiliserTypes = NO3N, NO3N, NO3N, NO3N, NO3N, NO3N, NO3N, NO3N, NO3N, NO3N, NO3N, NO3N, NO3N, NO3N, NO3N, NO3N, NO3N, NO3N, NO3N, NO3N
        FertiliserAmounts = 30, 0, 0, 0, 30, 30.0, 30, 30.0, 0, 0, 0, 30.0, 30, 30.0, 30.0, 0, 0, 30.0, 30.0, 0
        ApplyAtCrops = Wheat, Oats, Barley, Mustard, Rape
        script: same as in Wheat.Field1.Fertilise at sowing
      Manager Harvest (disabled): same as Wheat.Field1.Harvest
      Manager SWIMSetLowerBC: same as Wheat.Field1.SWIMSetLowerBC
      Plant Barley: same as Wheat.Field1.Barley
      Report HarvestReport_Field4: same as Wheat.Field1.HarvestReport_Field1
      Report PhenologyReport_Field4: same as Wheat.Field1.PhenologyReport_Field1
      Report Report_Field4: same as Wheat.Field1.Report_Field1
    Zone Field5: Area=1; Slope=0; AspectAngle=0; Altitude=50; CanopyType=BroadAcre
      Fertiliser
      Soil: ASCOrder=Vertosol; ASCSubOrder=Black; SoilType=Clay; Site=Norwin; NearestTown=Norwin; Region=Darling Downs and Granite Belt; State=Queensland; Country=Russia; NaturalVegetation=Qld. Bluegrass, possible Qld. Blue gum; ApsoilNumber=900; Latitude=56.77719; Longitude=56.11066; LocationAccuracy=+/- 20m; YearOfSampling=0
        DataSource=CSIRO Sustainable Ecosystems, Toowoomba; Characteriesd as part of the GRDC funded project"Doing it better, doing it smarter, managing soil water in Australian agriculture' 2011
        Comments=Clay - OC, CLL for all crops estimated-based on Bongeen Mywybilla Soil No1
        Organic: same as Wheat.Field1.Soil.Organic
        Chemical: Thickness=[150, 150, 300, 300, 300, 300, 300]; PH=[5.3, 5.1, 5, 5, 5, 5, 5]; PHUnits=Water
        Water: Thickness=[150, 150, 300, 300, 300, 300, 300]; InitialValues=[0.4102, 0.351345, 0.3994, 0.394, 0.388, 0.3808, 0.3802]; FilledFromTop=false
        Nutrient
        Solute NO3: InitialValuesUnits=ppm; WaterTableConcentration=0; D0=0; DepthConstant=0; MaxDepthSoluteAccessible=0; RunoffEffectivenessAtMovingSolute=0; MaxEffectiveRunoff=0
          Thickness  InitialValues  Exco  FIP
          150        6              0     1
          150        5.5            0     1
          300        4              0     1
          300        3              0     1
          300        2              0     1
          300        1              0     1
          300        0.5            0     1
        Solute NH4: same as Wheat.Field1.Soil.NH4
        Solute Urea: same as Wheat.Field1.Soil.Urea
        SoilTemperature: InteractionsPerDay=8
        LayerStructure: Thickness=[150, 150, 300, 300, 300, 300, 300]
        Physical: same as Wheat.Field1.Soil.Physical
        Swim3: same as Wheat.Field1.Soil.Swim3
      SurfaceOrganicMatter: InitialResidueName=redclover_stubble; InitialResidueType=redclover; InitialResidueMass=500; InitialStandingFraction=0; InitialCPR=0; InitialCNR=100
      Plant RedClover: same as Wheat.Field1.RedClover
      Plant Wheat: same as Wheat.Field1.Wheat
      Plant Oats: same as Wheat.Field1.Oats
      Plant Potato
      Plant PlantainForage: same as Wheat.Field1.PlantainForage
      Plant Mustard: same as Wheat.Field1.Mustard
      Plant Rape: ResourceName=Canola
        Cultivar Rape_sort
          Command:
            [Phenology].Vegetative.Target.XYPairs.X = 0, 25
            [Phenology].Vegetative.Target.XYPairs.Y = 290, 1
            [Phenology].StemElongation.Target.PPResponse.Amount.FixedValue = 240
            [Leaf].Phyllochron.Base.FixedValue = 65
      Manager RotationManager
        RotationCrops = Oats, Wheat, Barley+RedClover+PlantainForage, RedClover+PlantainForage, RedClover+PlantainForage, RedClover+PlantainForage, Barley, Wheat, Mustard, Oats+RedClover+PlantainForage, RedClover+PlantainForage, RedClover+PlantainForage, RedClover+PlantainForage, Wheat, Mustard, Wheat, Oats+RedClover+PlantainForage, RedClover+PlantainForage, RedClover+PlantainForage, Wheat
        RotationCultivars = Sang, Lada, Barley_sort;Vik7;Vik9Proxy, Vik7;Vik9Proxy, Vik7;Vik9Proxy, Vik7;Vik9Proxy, Barley_sort, Irgina, FlaxBiomassProxy, Argamak;Vik7;Vik9Proxy, Vik7;Vik9Proxy, Vik7;Vik9Proxy, Vik7;Vik9Proxy, Irgina, Mustard_sort, Winter_rye_smoke, Yakov;Vik7;Vik9Proxy, Vik7;Vik9Proxy, Vik7;Vik9Proxy, Winter_rye_smoke
        RotationSowingDepths = 20, 30, 20;10;10, 10;10, 10;10, 10;10, 20, 30, 20, 20;10;10, 10;10, 10;10, 10;10, 30, 20, 30, 20;10;10, 10;10, 10;10, 30
        RotationRowSpacings = 150, 200, 200;150;150, 150;150, 150;150, 150;150, 200, 200, 200, 150;150;150, 150;150, 150;150, 150;150, 200, 200, 200, 150;150;150, 150;150, 150;150, 200
        RotationPopulations = 250, 382.99999999999994, 450;150;150, 150;150, 150;150, 150;150, 450, 516.0, 45, 250;150;150, 150;150, 150;150, 150;150, 453.75, 45, 230, 250;150;150, 150;150, 150;150, 230
        RotationSowingDates = 18-May, 18-May, 10-May, 15-May, 15-May, 15-May, 10-May, 12-May, 10-May, 18-May, 15-May, 15-May, 15-May, 15-May, 10-May, 04-Sep, 28-Apr, 15-May, 15-May, 05-Sep
        RotationHarvestDates = 31-Aug, 25-Aug, 31-Aug, 15-Jul, 15-Jul, 15-Jul, 31-Aug, 10-Aug, 15-Jul, 31-Aug, 15-Jul, 15-Jul, 15-Jul, 12-Aug, 31-Aug, 31-Aug, 31-Aug, 15-Jul, 15-Jul, 31-Aug
        RotationHarvestCrops = Oats, Wheat, Barley, RedClover+PlantainForage, RedClover+PlantainForage, RedClover+PlantainForage, Barley, Wheat, Mustard, Oats, RedClover+PlantainForage, RedClover+PlantainForage, RedClover+PlantainForage, Wheat, Mustard, Wheat, Oats, RedClover+PlantainForage, RedClover+PlantainForage, Wheat
        RotationUses = grain, grain, grain, hay, hay, hay, grain, grain, green, grain, hay, hay, hay, grain, grain, grain, grain, hay, hay, grain
        PastureAges = 0, 0, 0, 1, 2, 3, 0, 0, 0, 0, 1, 2, 3, 0, 0, 0, 0, 1, 2, 0
        TerminationDate = 20-Aug
        WinterDiebackDate = 01-Dec
        script: same as in Wheat.Field1.RotationManager
      Manager Fertilise at sowing
        FertiliserTypes = NO3N, NO3N, NO3N, NO3N, NO3N, NO3N, NO3N, NO3N, NO3N, NO3N, NO3N, NO3N, NO3N, NO3N, NO3N, NO3N, NO3N, NO3N, NO3N, NO3N
        FertiliserAmounts = 30.0, 30.0, 30, 0, 0, 0, 30, 30.0, 30, 30.0, 0, 0, 0, 30.0, 30, 30.0, 30.0, 0, 0, 30.0
        ApplyAtCrops = Wheat, Oats, Barley, Mustard, Rape
        script: same as in Wheat.Field1.Fertilise at sowing
      Manager Harvest (disabled): same as Wheat.Field1.Harvest
      Manager SWIMSetLowerBC: same as Wheat.Field1.SWIMSetLowerBC
      Plant Barley: same as Wheat.Field1.Barley
      Report HarvestReport_Field5: same as Wheat.Field1.HarvestReport_Field1
      Report PhenologyReport_Field5: same as Wheat.Field1.PhenologyReport_Field1
      Report Report_Field5: same as Wheat.Field1.Report_Field1
    Zone Field6: Area=1; Slope=0; AspectAngle=0; Altitude=50; CanopyType=BroadAcre
      Fertiliser
      Soil: same as Wheat.Field1.Soil
      SurfaceOrganicMatter: InitialResidueName=redclover_stubble; InitialResidueType=redclover; InitialResidueMass=500; InitialStandingFraction=0; InitialCPR=0; InitialCNR=100
      Plant RedClover: same as Wheat.Field1.RedClover
      Plant Wheat: same as Wheat.Field1.Wheat
      Plant Oats: same as Wheat.Field1.Oats
      Plant Potato
      Plant PlantainForage: same as Wheat.Field1.PlantainForage
      Plant Mustard: same as Wheat.Field1.Mustard
      Plant Rape: ResourceName=Canola
        Cultivar Rape_sort
          Command:
            [Phenology].Vegetative.Target.XYPairs.X = 0, 25
            [Phenology].Vegetative.Target.XYPairs.Y = 290, 1
            [Phenology].StemElongation.Target.PPResponse.Amount.FixedValue = 240
            [Leaf].Phyllochron.Base.FixedValue = 65
      Manager RotationManager
        RotationCrops = RedClover+PlantainForage, RedClover+PlantainForage, Oats, Wheat, Mustard, Oats+RedClover+PlantainForage, RedClover+PlantainForage, RedClover+PlantainForage, RedClover+PlantainForage, Wheat, Rape, Wheat, Oats+RedClover+PlantainForage, RedClover+PlantainForage, RedClover+PlantainForage, RedClover+PlantainForage, Wheat, Oats+RedClover+PlantainForage, RedClover+PlantainForage, RedClover+PlantainForage
        RotationCultivars = Vik7;Vik9Proxy, Vik7;Vik9Proxy, Argamak, Irgina, FlaxBiomassProxy, Argamak;Vik7;Vik9Proxy, Vik7;Vik9Proxy, Vik7;Vik9Proxy, Vik7;Vik9Proxy, Irgina, Rape_sort, Winter_rye_smoke, Argamak;Vik7;Vik9Proxy, Vik7;Vik9Proxy, Vik7;Vik9Proxy, Vik7;Vik9Proxy, Zlata, Yakov;Vik7;Vik9Proxy, Vik7;Vik9Proxy, Vik7;Vik9Proxy
        RotationSowingDepths = 10;10, 10;10, 20, 30, 20, 20;10;10, 10;10, 10;10, 10;10, 30, 20, 30, 20;10;10, 10;10, 10;10, 10;10, 30, 20;10;10, 10;10, 10;10
        RotationRowSpacings = 150;150, 150;150, 150, 200, 200, 150;150;150, 150;150, 150;150, 150;150, 200, 200, 200, 150;150;150, 150;150, 150;150, 150;150, 200, 150;150;150, 150;150, 150;150
        RotationPopulations = 150;150, 150;150, 250, 328.0, 45, 250;150;150, 150;150, 150;150, 150;150, 392.0, 45, 230, 250;150;150, 150;150, 150;150, 150;150, 486.00000000000006, 250;150;150, 150;150, 150;150
        RotationSowingDates = 15-May, 15-May, 10-May, 05-May, 10-May, 11-May, 15-May, 15-May, 15-May, 13-May, 10-May, 31-Aug, 07-May, 15-May, 15-May, 15-May, 11-May, 18-May, 15-May, 15-May
        RotationHarvestDates = 15-Jul, 15-Jul, 31-Aug, 24-Aug, 15-Jul, 31-Aug, 15-Jul, 15-Jul, 15-Jul, 09-Aug, 31-Aug, 31-Aug, 31-Aug, 15-Jul, 15-Jul, 15-Jul, 20-Aug, 31-Aug, 15-Jul, 15-Jul
        RotationHarvestCrops = RedClover+PlantainForage, RedClover+PlantainForage, Oats, Wheat, Mustard, Oats, RedClover+PlantainForage, RedClover+PlantainForage, RedClover+PlantainForage, Wheat, Rape, Wheat, Oats, RedClover+PlantainForage, RedClover+PlantainForage, RedClover+PlantainForage, Wheat, Oats, RedClover+PlantainForage, RedClover+PlantainForage
        RotationUses = hay, hay, grain, grain, green, grain, hay, hay, hay, grain, grain, grain, grain, hay, hay, hay, grain, grain, hay, hay
        PastureAges = 2, 3, 0, 0, 0, 0, 1, 2, 3, 0, 0, 0, 0, 1, 2, 3, 0, 0, 1, 2
        TerminationDate = 20-Aug
        WinterDiebackDate = 01-Dec
        script: same as in Wheat.Field1.RotationManager
      Manager Fertilise at sowing
        FertiliserTypes = NO3N, NO3N, NO3N, NO3N, NO3N, NO3N, NO3N, NO3N, NO3N, NO3N, NO3N, NO3N, NO3N, NO3N, NO3N, NO3N, NO3N, NO3N, NO3N, NO3N
        FertiliserAmounts = 0, 0, 30.0, 30.0, 30, 30.0, 0, 0, 0, 30.0, 30, 30.0, 30.0, 0, 0, 0, 30.0, 60.0, 0, 0
        ApplyAtCrops = Wheat, Oats, Barley, Mustard, Rape
        script: same as in Wheat.Field1.Fertilise at sowing
      Manager Harvest (disabled): same as Wheat.Field1.Harvest
      Manager SWIMSetLowerBC: same as Wheat.Field1.SWIMSetLowerBC
      Plant Barley: same as Wheat.Field1.Barley
      Report HarvestReport_Field6: same as Wheat.Field1.HarvestReport_Field1
      Report PhenologyReport_Field6: same as Wheat.Field1.PhenologyReport_Field1
      Report Report_Field6: same as Wheat.Field1.Report_Field1
    Zone Field7: Area=1; Slope=0; AspectAngle=0; Altitude=50; CanopyType=BroadAcre
      Fertiliser
      Soil: ASCOrder=Vertosol; ASCSubOrder=Black; SoilType=Clay; Site=Norwin; NearestTown=Norwin; Region=Darling Downs and Granite Belt; State=Queensland; Country=Russia; NaturalVegetation=Qld. Bluegrass, possible Qld. Blue gum; ApsoilNumber=900; Latitude=56.77719; Longitude=56.11066; LocationAccuracy=+/- 20m; YearOfSampling=0
        DataSource=CSIRO Sustainable Ecosystems, Toowoomba; Characteriesd as part of the GRDC funded project"Doing it better, doing it smarter, managing soil water in Australian agriculture' 2011
        Comments=Clay - OC, CLL for all crops estimated-based on Bongeen Mywybilla Soil No1
        Organic: same as Wheat.Field1.Soil.Organic
        Chemical: Thickness=[150, 150, 300, 300, 300, 300, 300]; PH=[5.09, 5.09, 5, 5, 5, 5, 5]; PHUnits=Water
        Water: Thickness=[150, 150, 300, 300, 300, 300, 300]; FilledFromTop=false
          InitialValues=[0.297925, 0.274107, 0.30985, 0.3085, 0.307, 0.3052, 0.30505]
        Nutrient
        Solute NO3: same as Wheat.Field1.Soil.NO3
        Solute NH4: same as Wheat.Field1.Soil.NH4
        Solute Urea: same as Wheat.Field1.Soil.Urea
        SoilTemperature: InteractionsPerDay=8
        LayerStructure: Thickness=[150, 150, 300, 300, 300, 300, 300]
        Physical: same as Wheat.Field1.Soil.Physical
        Swim3: same as Wheat.Field1.Soil.Swim3
      SurfaceOrganicMatter: InitialResidueName=redclover_stubble; InitialResidueType=redclover; InitialResidueMass=500; InitialStandingFraction=0; InitialCPR=0; InitialCNR=100
      Plant RedClover: same as Wheat.Field1.RedClover
      Plant Wheat: same as Wheat.Field1.Wheat
      Plant Oats: same as Wheat.Field1.Oats
      Plant Potato
      Plant PlantainForage: same as Wheat.Field1.PlantainForage
      Plant Mustard: same as Wheat.Field1.Mustard
      Plant Rape: ResourceName=Canola
        Cultivar Rape_sort
          Command:
            [Phenology].Vegetative.Target.XYPairs.X = 0, 25
            [Phenology].Vegetative.Target.XYPairs.Y = 290, 1
            [Phenology].StemElongation.Target.PPResponse.Amount.FixedValue = 240
            [Leaf].Phyllochron.Base.FixedValue = 65
      Manager RotationManager
        RotationCrops = RedClover+PlantainForage, Oats, Wheat, Oats+RedClover+PlantainForage, RedClover+PlantainForage, RedClover+PlantainForage, RedClover+PlantainForage, Barley, Wheat, Rape, Wheat, Oats+RedClover+PlantainForage, RedClover+PlantainForage, RedClover+PlantainForage, RedClover+PlantainForage, Wheat, Rape, Wheat, Wheat, Oats+RedClover+PlantainForage
        RotationCultivars = Vik7;Vik9Proxy, Argamak, Lada, Argamak;Vik7;Vik9Proxy, Vik7;Vik9Proxy, Vik7;Vik9Proxy, Vik7;Vik9Proxy, Barley_sort, Irgina, Rape_sort, Winter_rye_smoke, Argamak;Vik7;Vik9Proxy, Vik7;Vik9Proxy, Vik7;Vik9Proxy, Vik7;Vik9Proxy, Irgina, Rape_sort, Winter_rye_smoke, Zlata, Yakov;Vik7;Vik9Proxy
        RotationSowingDepths = 10;10, 20, 30, 20;10;10, 10;10, 10;10, 10;10, 20, 30, 20, 30, 20;10;10, 10;10, 10;10, 10;10, 30, 20, 30, 30, 20;10;10
        RotationRowSpacings = 150;150, 150, 200, 150;150;150, 150;150, 150;150, 150;150, 200, 200, 200, 200, 150;150;150, 150;150, 150;150, 150;150, 200, 200, 200, 200, 150;150;150
        RotationPopulations = 150;150, 250, 540.0, 250;150;150, 150;150, 150;150, 150;150, 450, 507.59999999999997, 45, 230, 250;150;150, 150;150, 150;150, 150;150, 447.70000000000005, 45, 230, 517.8, 250;150;150
        RotationSowingDates = 15-May, 19-May, 10-May, 06-May, 15-May, 15-May, 15-May, 10-May, 22-May, 10-May, 04-Sep, 12-May, 15-May, 15-May, 15-May, 07-May, 10-May, 08-Sep, 12-May, 04-May
        RotationHarvestDates = 15-Jul, 31-Aug, 26-Aug, 31-Aug, 15-Jul, 15-Jul, 15-Jul, 31-Aug, 24-Aug, 31-Aug, 31-Aug, 31-Aug, 15-Jul, 15-Jul, 15-Jul, 09-Aug, 31-Aug, 31-Aug, 17-Aug, 31-Aug
        RotationHarvestCrops = RedClover+PlantainForage, Oats, Wheat, Oats, RedClover+PlantainForage, RedClover+PlantainForage, RedClover+PlantainForage, Barley, Wheat, Rape, Wheat, Oats, RedClover+PlantainForage, RedClover+PlantainForage, RedClover+PlantainForage, Wheat, Rape, Wheat, Wheat, Oats
        RotationUses = hay, grain, grain, grain, hay, hay, hay, grain, grain, grain, grain, grain, hay, hay, hay, grain, grain, grain, grain, grain
        PastureAges = 3, 0, 0, 0, 1, 2, 3, 0, 0, 0, 0, 0, 1, 2, 3, 0, 0, 0, 0, 0
        TerminationDate = 20-Aug
        WinterDiebackDate = 01-Dec
        script: same as in Wheat.Field1.RotationManager
      Manager Fertilise at sowing
        FertiliserTypes = NO3N, NO3N, NO3N, NO3N, NO3N, NO3N, NO3N, NO3N, NO3N, NO3N, NO3N, NO3N, NO3N, NO3N, NO3N, NO3N, NO3N, NO3N, NO3N, NO3N
        FertiliserAmounts = 0, 30.0, 30.0, 30.0, 0, 0, 0, 30, 30.0, 30, 30.0, 30.0, 0, 0, 0, 30.0, 30, 30.0, 60.0, 60.0
        ApplyAtCrops = Wheat, Oats, Barley, Mustard, Rape
        script: same as in Wheat.Field1.Fertilise at sowing
      Manager Harvest (disabled): same as Wheat.Field1.Harvest
      Manager SWIMSetLowerBC: same as Wheat.Field1.SWIMSetLowerBC
      Plant Barley: same as Wheat.Field1.Barley
      Report HarvestReport_Field7: same as Wheat.Field1.HarvestReport_Field1
      Report PhenologyReport_Field7: same as Wheat.Field1.PhenologyReport_Field1
      Report Report_Field7: same as Wheat.Field1.Report_Field1
    Zone Field8: Area=1; Slope=0; AspectAngle=0; Altitude=50; CanopyType=BroadAcre
      Fertiliser
      Soil: same as Wheat.Field7.Soil
      SurfaceOrganicMatter: InitialResidueName=redclover_stubble; InitialResidueType=redclover; InitialResidueMass=500; InitialStandingFraction=0; InitialCPR=0; InitialCNR=100
      Plant RedClover: same as Wheat.Field1.RedClover
      Plant Wheat: same as Wheat.Field1.Wheat
      Plant Oats: same as Wheat.Field1.Oats
      Plant Potato
      Plant PlantainForage: same as Wheat.Field1.PlantainForage
      Plant Mustard: same as Wheat.Field1.Mustard
      Plant Rape: ResourceName=Canola
        Cultivar Rape_sort
          Command:
            [Phenology].Vegetative.Target.XYPairs.X = 0, 25
            [Phenology].Vegetative.Target.XYPairs.Y = 290, 1
            [Phenology].StemElongation.Target.PPResponse.Amount.FixedValue = 240
            [Leaf].Phyllochron.Base.FixedValue = 65
      Manager RotationManager
        RotationCrops = RedClover+PlantainForage, RedClover+PlantainForage, RedClover+PlantainForage, Barley, Wheat, Mustard, Oats+RedClover+PlantainForage, RedClover+PlantainForage, RedClover+PlantainForage, RedClover+PlantainForage, Wheat, Rape, Wheat, Oats+RedClover+PlantainForage, RedClover+PlantainForage, RedClover+PlantainForage, RedClover+PlantainForage, Rape, Wheat, Wheat
        RotationCultivars = Vik7;Vik9Proxy, Vik7;Vik9Proxy, Vik7;Vik9Proxy, Barley_sort, Irgina, FlaxBiomassProxy, Argamak;Vik7;Vik9Proxy, Vik7;Vik9Proxy, Vik7;Vik9Proxy, Vik7;Vik9Proxy, Irgina, Rape_sort, Winter_rye_smoke, Argamak;Vik7;Vik9Proxy, Vik7;Vik9Proxy, Vik7;Vik9Proxy, Vik7;Vik9Proxy, Rape_sort, Winter_rye_smoke, Zlata
        RotationSowingDepths = 10;10, 10;10, 10;10, 20, 30, 20, 20;10;10, 10;10, 10;10, 10;10, 30, 20, 30, 20;10;10, 10;10, 10;10, 10;10, 20, 30, 30
        RotationRowSpacings = 150;150, 150;150, 150;150, 200, 200, 200, 150;150;150, 150;150, 150;150, 150;150, 200, 200, 200, 150;150;150, 150;150, 150;150, 150;150, 200, 200, 200
        RotationPopulations = 150;150, 150;150, 150;150, 450, 447.0, 45, 250;150;150, 150;150, 150;150, 150;150, 441.65, 45, 230, 250;150;150, 150;150, 150;150, 150;150, 45, 230, 392.99999999999994
        RotationSowingDates = 15-May, 15-May, 15-May, 10-May, 05-May, 10-May, 12-May, 15-May, 15-May, 15-May, 28-Apr, 10-May, 31-Aug, 06-May, 15-May, 15-May, 15-May, 10-May, 09-Sep, 03-May
        RotationHarvestDates = 15-Jul, 15-Jul, 15-Jul, 31-Aug, 23-Aug, 15-Jul, 31-Aug, 15-Jul, 15-Jul, 15-Jul, 11-Aug, 31-Aug, 31-Aug, 31-Aug, 15-Jul, 15-Jul, 15-Jul, 31-Aug, 31-Aug, 21-Aug
        RotationHarvestCrops = RedClover+PlantainForage, RedClover+PlantainForage, RedClover+PlantainForage, Barley, Wheat, Mustard, Oats, RedClover+PlantainForage, RedClover+PlantainForage, RedClover+PlantainForage, Wheat, Rape, Wheat, Oats, RedClover+PlantainForage, RedClover+PlantainForage, RedClover+PlantainForage, Rape, Wheat, Wheat
        RotationUses = hay, hay, hay, grain, grain, green, grain, hay, hay, hay, grain, grain, grain, grain, hay, hay, hay, grain, grain, grain
        PastureAges = 1, 2, 3, 0, 0, 0, 0, 1, 2, 3, 0, 0, 0, 0, 1, 2, 3, 0, 0, 0
        TerminationDate = 20-Aug
        WinterDiebackDate = 01-Dec
        script: same as in Wheat.Field1.RotationManager
      Manager Fertilise at sowing
        FertiliserTypes = NO3N, NO3N, NO3N, NO3N, NO3N, NO3N, NO3N, NO3N, NO3N, NO3N, NO3N, NO3N, NO3N, NO3N, NO3N, NO3N, NO3N, NO3N, NO3N, NO3N
        FertiliserAmounts = 0, 0, 0, 30, 30.0, 30, 30.0, 0, 0, 0, 30.0, 30, 30.0, 30.0, 0, 0, 0, 30, 60.0, 60.0
        ApplyAtCrops = Wheat, Oats, Barley, Mustard, Rape
        script: same as in Wheat.Field1.Fertilise at sowing
      Manager Harvest (disabled): same as Wheat.Field1.Harvest
      Manager SWIMSetLowerBC: same as Wheat.Field1.SWIMSetLowerBC
      Plant Barley: same as Wheat.Field1.Barley
      Report HarvestReport_Field8: same as Wheat.Field1.HarvestReport_Field1
      Report PhenologyReport_Field8: same as Wheat.Field1.PhenologyReport_Field1
      Report Report_Field8: same as Wheat.Field1.Report_Field1
    Zone Field9: Area=1; Slope=0; AspectAngle=0; Altitude=50; CanopyType=BroadAcre
      Fertiliser
      Soil: ASCOrder=Vertosol; ASCSubOrder=Black; SoilType=Clay; Site=Norwin; NearestTown=Norwin; Region=Darling Downs and Granite Belt; State=Queensland; Country=Russia; NaturalVegetation=Qld. Bluegrass, possible Qld. Blue gum; ApsoilNumber=900; Latitude=56.77719; Longitude=56.11066; LocationAccuracy=+/- 20m; YearOfSampling=0
        DataSource=CSIRO Sustainable Ecosystems, Toowoomba; Characteriesd as part of the GRDC funded project"Doing it better, doing it smarter, managing soil water in Australian agriculture' 2011
        Comments=Clay - OC, CLL for all crops estimated-based on Bongeen Mywybilla Soil No1
        Organic: same as Wheat.Field1.Soil.Organic
        Chemical: Thickness=[150, 150, 300, 300, 300, 300, 300]; PH=[5.09, 5.09, 5, 5, 5, 5, 5]; PHUnits=Water
        Water: Thickness=[150, 150, 300, 300, 300, 300, 300]; FilledFromTop=false
          InitialValues=[0.347825, 0.308435, 0.34965, 0.3465, 0.343, 0.3388, 0.33845]
        Nutrient
        Solute NO3: same as Wheat.Field1.Soil.NO3
        Solute NH4: same as Wheat.Field1.Soil.NH4
        Solute Urea: same as Wheat.Field1.Soil.Urea
        SoilTemperature: InteractionsPerDay=8
        LayerStructure: Thickness=[150, 150, 300, 300, 300, 300, 300]
        Physical: same as Wheat.Field1.Soil.Physical
        Swim3: same as Wheat.Field1.Soil.Swim3
      SurfaceOrganicMatter: InitialResidueName=redclover_stubble; InitialResidueType=redclover; InitialResidueMass=500; InitialStandingFraction=0; InitialCPR=0; InitialCNR=100
      Plant RedClover: same as Wheat.Field1.RedClover
      Plant Wheat: same as Wheat.Field1.Wheat
      Plant Oats: same as Wheat.Field1.Oats
      Plant Potato
      Plant PlantainForage: same as Wheat.Field1.PlantainForage
      Plant Mustard: same as Wheat.Field1.Mustard
      Plant Rape: ResourceName=Canola
        Cultivar Rape_sort
          Command:
            [Phenology].Vegetative.Target.XYPairs.X = 0, 25
            [Phenology].Vegetative.Target.XYPairs.Y = 290, 1
            [Phenology].StemElongation.Target.PPResponse.Amount.FixedValue = 240
            [Leaf].Phyllochron.Base.FixedValue = 65
      Manager RotationManager
        RotationCrops = RedClover+PlantainForage, RedClover+PlantainForage, RedClover+PlantainForage, RedClover+PlantainForage, RedClover+PlantainForage, RedClover+PlantainForage, RedClover+PlantainForage, RedClover+PlantainForage, RedClover+PlantainForage, RedClover+PlantainForage, RedClover+PlantainForage, Rape, Mustard, Mustard, Wheat, Oats+RedClover, Mustard, Rape, Mustard, Wheat
        RotationCultivars = FiveSpeciesLegumeProxy;FiveSpeciesGrassProxy, FiveSpeciesLegumeProxy;FiveSpeciesGrassProxy, FiveSpeciesLegumeProxy;FiveSpeciesGrassProxy, FiveSpeciesLegumeProxy;FiveSpeciesGrassProxy, FiveSpeciesLegumeProxy;FiveSpeciesGrassProxy, FiveSpeciesLegumeProxy;FiveSpeciesGrassProxy, FiveSpeciesLegumeProxy;FiveSpeciesGrassProxy, FiveSpeciesLegumeProxy;FiveSpeciesGrassProxy, FiveSpeciesLegumeProxy;FiveSpeciesGrassProxy, FiveSpeciesLegumeProxy;FiveSpeciesGrassProxy, FiveSpeciesLegumeProxy;FiveSpeciesGrassProxy, Rape_sort, Mustard_sort, Mustard_sort, Winter_rye_smoke, OatsUnspecified;VetchProxy, Mustard_sort, Rape_sort, Mustard_sort, Winter_rye_smoke
        RotationSowingDepths = 10;10, 10;10, 10;10, 10;10, 10;10, 10;10, 10;10, 10;10, 10;10, 10;10, 10;10, 20, 20, 20, 30, 20;10, 20, 20, 20, 30
        RotationRowSpacings = 150;150, 150;150, 150;150, 150;150, 150;150, 150;150, 150;150, 150;150, 150;150, 150;150, 150;150, 200, 200, 200, 200, 150;150, 200, 200, 200, 200
        RotationPopulations = 150;150, 150;150, 150;150, 150;150, 150;150, 150;150, 150;150, 150;150, 150;150, 150;150, 150;150, 45, 45, 45, 230, 250;150, 45, 45, 45, 230
        RotationSowingDates = 15-May, 15-May, 15-May, 15-May, 15-May, 15-May, 15-May, 15-May, 15-May, 15-May, 15-May, 10-May, 10-May, 10-May, 31-Aug, 10-May, 10-May, 10-May, 10-May, 05-Sep
        RotationHarvestDates = 15-Jul, 15-Jul, 15-Jul, 15-Jul, 15-Jul, 15-Jul, 15-Jul, 15-Jul, 15-Jul, 15-Jul, 15-Jul, 31-Aug, 31-Aug, 31-Aug, 31-Aug, 15-Jul, 31-Aug, 31-Aug, 31-Aug, 31-Aug
        RotationHarvestCrops = RedClover+PlantainForage, RedClover+PlantainForage, RedClover+PlantainForage, RedClover+PlantainForage, RedClover+PlantainForage, RedClover+PlantainForage, RedClover+PlantainForage, RedClover+PlantainForage, RedClover+PlantainForage, RedClover+PlantainForage, RedClover+PlantainForage, Rape, Mustard, Mustard, Wheat, Oats+RedClover, Mustard, Rape, Mustard, Wheat
        RotationUses = hay, hay, hay, hay, hay, hay, hay, hay, hay, hay, hay, grain, grain, grain, grain, green, grain, grain, grain, grain
        PastureAges = 0, 0, 0, 0, 0, 0, 0, 0, 0, 0, 0, 0, 0, 0, 0, 0, 0, 0, 0, 0
        TerminationDate = 20-Aug
        WinterDiebackDate = 01-Dec
        script: same as in Wheat.Field1.RotationManager
      Manager Fertilise at sowing
        FertiliserTypes = NO3N, NO3N, NO3N, NO3N, NO3N, NO3N, NO3N, NO3N, NO3N, NO3N, NO3N, NO3N, NO3N, NO3N, NO3N, NO3N, NO3N, NO3N, NO3N, NO3N
        FertiliserAmounts = 0, 0, 0, 0, 0, 0, 0, 0, 0, 0, 0, 30, 30, 30, 30.0, 30, 30, 30, 30, 60.0
        ApplyAtCrops = Wheat, Oats, Barley, Mustard, Rape
        script: same as in Wheat.Field1.Fertilise at sowing
      Manager Harvest (disabled): same as Wheat.Field1.Harvest
      Manager SWIMSetLowerBC: same as Wheat.Field1.SWIMSetLowerBC
      Plant Barley: same as Wheat.Field1.Barley
      Report HarvestReport_Field9: same as Wheat.Field1.HarvestReport_Field1
      Report PhenologyReport_Field9: same as Wheat.Field1.PhenologyReport_Field1
      Report Report_Field9: same as Wheat.Field1.Report_Field1
    Zone Field10: Area=1; Slope=0; AspectAngle=0; Altitude=50; CanopyType=BroadAcre
      Fertiliser
      Soil: same as Wheat.Field7.Soil
      SurfaceOrganicMatter: InitialResidueName=redclover_stubble; InitialResidueType=redclover; InitialResidueMass=500; InitialStandingFraction=0; InitialCPR=0; InitialCNR=100
      Plant RedClover: same as Wheat.Field1.RedClover
      Plant Wheat: same as Wheat.Field1.Wheat
      Plant Oats: same as Wheat.Field1.Oats
      Plant Potato
      Plant PlantainForage: same as Wheat.Field1.PlantainForage
      Plant Mustard: same as Wheat.Field1.Mustard
      Plant Rape: ResourceName=Canola
        Cultivar Rape_sort
          Command:
            [Phenology].Vegetative.Target.XYPairs.X = 0, 25
            [Phenology].Vegetative.Target.XYPairs.Y = 290, 1
            [Phenology].StemElongation.Target.PPResponse.Amount.FixedValue = 240
            [Leaf].Phyllochron.Base.FixedValue = 65
      Manager RotationManager
        RotationCrops = PlantainForage, PlantainForage, PlantainForage, PlantainForage, PlantainForage, PlantainForage, PlantainForage, PlantainForage, PlantainForage, Wheat, Rape, Wheat, Oats+RedClover+PlantainForage, RedClover+PlantainForage, RedClover+PlantainForage, RedClover+PlantainForage, Mustard, Wheat, Oats+RedClover+PlantainForage, RedClover+PlantainForage
        RotationCultivars = FallowVegetationProxy, FallowVegetationProxy, FallowVegetationProxy, FallowVegetationProxy, FallowVegetationProxy, FallowVegetationProxy, FallowVegetationProxy, FallowVegetationProxy, FallowVegetationProxy, WheatUnspecified, Rape_sort, Winter_rye_smoke, Argamak;Vik7;Vik9Proxy, Vik7;Vik9Proxy, Vik7;Vik9Proxy, Vik7;Vik9Proxy, Mustard_sort, Zlata, Yakov;Vik7;Vik9Proxy, Vik7;Vik9Proxy
        RotationSowingDepths = 10, 10, 10, 10, 10, 10, 10, 10, 10, 30, 20, 30, 20;10;10, 10;10, 10;10, 10;10, 20, 30, 20;10;10, 10;10
        RotationRowSpacings = 150, 150, 150, 150, 150, 150, 150, 150, 150, 200, 200, 200, 150;150;150, 150;150, 150;150, 150;150, 200, 200, 150;150;150, 150;150
        RotationPopulations = 150, 150, 150, 150, 150, 150, 150, 150, 150, 450, 45, 230, 250;150;150, 150;150, 150;150, 150;150, 45, 483.00000000000006, 250;150;150, 150;150
        RotationSowingDates = 15-May, 15-May, 15-May, 15-May, 15-May, 15-May, 15-May, 15-May, 15-May, 10-May, 10-May, 31-Aug, 07-May, 15-May, 15-May, 15-May, 10-May, 18-May, 12-May, 15-May
        RotationHarvestDates = 31-Aug, 31-Aug, 31-Aug, 31-Aug, 31-Aug, 31-Aug, 31-Aug, 31-Aug, 31-Aug, 31-Aug, 31-Aug, 31-Aug, 31-Aug, 15-Jul, 15-Jul, 15-Jul, 31-Aug, 16-Aug, 31-Aug, 15-Jul
        RotationHarvestCrops = -, -, -, -, -, -, -, -, -, Wheat, Rape, Wheat, Oats, RedClover+PlantainForage, RedClover+PlantainForage, RedClover+PlantainForage, Mustard, Wheat, Oats, RedClover+PlantainForage
        RotationUses = unmanaged, unmanaged, unmanaged, unmanaged, unmanaged, unmanaged, unmanaged, unmanaged, unmanaged, grain, grain, grain, grain, hay, hay, hay, grain, grain, grain, hay
        PastureAges = 0, 0, 0, 0, 0, 0, 0, 0, 0, 0, 0, 0, 0, 1, 2, 3, 0, 0, 0, 1
        TerminationDate = 20-Aug
        WinterDiebackDate = 01-Dec
        script: same as in Wheat.Field1.RotationManager
      Manager Fertilise at sowing
        FertiliserTypes = NO3N, NO3N, NO3N, NO3N, NO3N, NO3N, NO3N, NO3N, NO3N, NO3N, NO3N, NO3N, NO3N, NO3N, NO3N, NO3N, NO3N, NO3N, NO3N, NO3N
        FertiliserAmounts = 0, 0, 0, 0, 0, 0, 0, 0, 0, 30, 30, 30.0, 30.0, 0, 0, 0, 30, 60.0, 60.0, 0
        ApplyAtCrops = Wheat, Oats, Barley, Mustard, Rape
        script: same as in Wheat.Field1.Fertilise at sowing
      Manager Harvest (disabled): same as Wheat.Field1.Harvest
      Manager SWIMSetLowerBC: same as Wheat.Field1.SWIMSetLowerBC
      Plant Barley: same as Wheat.Field1.Barley
      Report HarvestReport_Field10: same as Wheat.Field1.HarvestReport_Field1
      Report PhenologyReport_Field10: same as Wheat.Field1.PhenologyReport_Field1
      Report Report_Field10: same as Wheat.Field1.Report_Field1
  DataStore
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