Simulations: Version=216
  Simulation Wheat
    Clock: Start=2019-01-01; End=2023-12-31
    Summary
    Weather: FileName=weather_rotation.met
    SoilArbitrator
    MicroClimate: a_interception=0; b_interception=1; c_interception=0; d_interception=0; SoilHeatFluxFraction=0.4; MinimumHeightDiffForNewLayer=0; NightInterceptionFraction=0.5; ReferenceHeight=2
    Zone Field1: Area=1; Slope=0; AspectAngle=0; Altitude=50; CanopyType=BroadAcre
      Report Report1: EventNames=[Clock].EndOfDay
        VariableNames:
          [Clock].Today
          [Wheat].LAI as WheatLAI
          [Wheat].Phenology.Zadok.Stage as WheatZadok
          [Wheat].Phenology.CurrentStageName as WheatStage
          [Wheat].AboveGround.Wt as WheatAGWt
          [Wheat].AboveGround.N as WheatAGN
          [Wheat].Grain.Total.Wt*10 as WheatYield
          [Wheat].Grain.Protein as WheatProtein
          [Wheat].Grain.Size as WheatSize
          [Wheat].Grain.Number as WheatNumber
          [Wheat].Grain.Total.Wt as WheatGrainWt
          [Wheat].Grain.Total.N as WheatGrainN
          [Wheat].Total.Wt as WheatTotalWt
          [RedClover].LAI as CloverLAI
          [RedClover].Phenology.CurrentStageName as CloverStage
          [RedClover].AboveGround.Wt as CloverAGWt
          [RedClover].AboveGround.N as CloverAGN
          [RedClover].Total.Wt as CloverTotalWt
          [RedClover].AboveGround.Wt*10 as CloverYield
          [PlantainForage].LAI as PlantainLAI
          [PlantainForage].AboveGround.Wt as PlantainAGWt
          [PlantainForage].AboveGround.N as PlantainAGN
          [PlantainForage].Total.Wt as PlantainTotalWt
          [PlantainForage].AboveGround.Wt*10 as PlantainYield
          [RedClover].AboveGround.Wt + [PlantainForage].AboveGround.Wt as MixAGWt
          ([RedClover].AboveGround.Wt + [PlantainForage].AboveGround.Wt)*10 as MixYield
          [RedClover].AboveGround.N + [PlantainForage].AboveGround.N as MixAGN
          [Oats].LAI as OatsLAI
          [Oats].Phenology.Zadok.Stage as OatsZadok
          [Oats].Phenology.CurrentStageName as OatsStage
          [Oats].AboveGround.Wt as OatsAGWt
          [Oats].AboveGround.N as OatsAGN
          [Oats].Grain.Total.Wt*10 as OatsYield
          [Oats].Grain.Total.Wt as OatsGrainWt
          [Oats].Total.Wt as OatsTotalWt
          [Potato].LAI as PotatoLAI
          [Potato].Phenology.CurrentStageName as PotatoStage
          [Potato].AboveGround.Wt as PotatoAGWt
          [Potato].AboveGround.N as PotatoAGN
          [Potato].Total.Wt as PotatoTotalWt
          [Potato].Tuber.Total.Wt*10 as PotatoYield
          [Potato].Tuber.Total.Wt as PotatoTuberWt
          [Rape].LAI as RapeLAI
          [Rape].Phenology.CurrentStageName as RapeStage
          [Rape].AboveGround.Wt as RapeAGWt
          [Rape].AboveGround.N as RapeAGN
          [Rape].Total.Wt as RapeTotalWt
          [Rape].Grain.Total.Wt*10 as RapeYield
          [Rape].Grain.Total.Wt as RapeGrainWt
          [Mustard].LAI as MustardLAI
          [Mustard].Phenology.CurrentStageName as MustardStage
          [Mustard].AboveGround.Wt as MustardAGWt
          [Mustard].AboveGround.N as MustardAGN
          [Mustard].Total.Wt as MustardTotalWt
          [Mustard].Grain.Total.Wt*10 as MustardYield
          [Mustard].Grain.Total.Wt as MustardGrainWt
          [Soil].Swim3.Drainage as Drainage
          [Soil].Swim3.Runoff as Runoff
          [Soil].Swim3.Pond as PondDepth
          [Soil].Swim3.PAW as PAW
          sum([Soil].Water.MM) as WaterStored
          [Soil].Water.Volumetric as SW
          sum([NO3].kgha + [NH4].kgha + [Urea].kgha) as MineralN
          [Denitrification].Value + [Denitrification].Natm as Denitrification
          [Soil].Nutrient.Nitrification.Natm as NitrificationNatm
          sum([Nutrient].Organic.C) as OrganicC
      Fertiliser
      Soil: ASCOrder=Vertosol; ASCSubOrder=Black; SoilType=Clay; Site=Norwin; NearestTown=Norwin; Region=Darling Downs and Granite Belt; State=Queensland; Country=Russia; NaturalVegetation=Qld. Bluegrass, possible Qld. Blue gum; ApsoilNumber=900; Latitude=56.77719; Longitude=56.11066; LocationAccuracy=+/- 20m; YearOfSampling=0
        DataSource=CSIRO Sustainable Ecosystems, Toowoomba; Characteriesd as part of the GRDC funded project"Doing it better, doing it smarter, managing soil water in Australian agriculture' 2011
        Comments=Clay - OC, CLL for all crops estimated-based on Bongeen Mywybilla Soil No1
        Organic: FOMCNRatio=30; CarbonUnits=Total
          Thickness  Carbon  SoilCNRatio  FBiom  FInert  FOM
          150        1.44    12           0.06   0.35    347.129
          150        1.16    12           0.04   0.55    270.344
          300        1.04    12           0.03   0.75    163.972
          300        0.93    12           0.02   1       99.4541
          300        0.81    12           0.01   1       60.322
          300        0.73    12           0.01   1       36.5871
          300        0.5     12           0.01   1       22.1912
        Chemical: Thickness=[150, 150, 300, 300, 300, 300, 300]; PH=[5.09, 5.09, 5, 5, 5, 5, 5]; PHUnits=Water
        Water: Thickness=[150, 150, 300, 300, 300, 300, 300]; InitialValues=[0.33535, 0.299853, 0.3397, 0.337, 0.334, 0.3304, 0.3301]; FilledFromTop=false
        Nutrient
        Solute NO3: InitialValuesUnits=ppm; WaterTableConcentration=0; D0=0; DepthConstant=0; MaxDepthSoluteAccessible=0; RunoffEffectivenessAtMovingSolute=0; MaxEffectiveRunoff=0
          Thickness  InitialValues  Exco  FIP
          150        4              0     1
          150        3.5            0     1
          300        3              0     1
          300        2              0     1
          300        1.5            0     1
          300        1              0     1
          300        0.5            0     1
        Solute NH4: InitialValuesUnits=ppm; WaterTableConcentration=0; D0=0.05; DepthConstant=0; MaxDepthSoluteAccessible=0; RunoffEffectivenessAtMovingSolute=0; MaxEffectiveRunoff=0
          Thickness  InitialValues  Exco  FIP
          150        1              0     1
          150        0.8            0     1
          300        0.5            0     1
          300        0.3            0     1
          300        0.2            0     1
          300        0.1            0     1
          300        0.05           0     1
        Solute Urea: InitialValuesUnits=kg/ha; WaterTableConcentration=0; D0=0.05; DepthConstant=0; MaxDepthSoluteAccessible=0; RunoffEffectivenessAtMovingSolute=0; MaxEffectiveRunoff=0
          Thickness  InitialValues  Exco  FIP
          150        0              0     1
          150        0              0     1
          300        0              0     1
          300        0              0     1
          300        0              0     1
          300        0              0     1
          300        0              0     1
        SoilTemperature: InteractionsPerDay=8
        LayerStructure: Thickness=[150, 150, 300, 300, 300, 300, 300]
        Physical
          Thickness  ParticleSizeSand  ParticleSizeSilt  ParticleSizeClay  Rocks  BD    AirDry    LL15      DUL    SAT    KS
          150        52.31             33.03             14.66             0      1.19  0.13025   0.2605    0.51   0.515  20
          150        81.61             10.68             7.71              0      1.25  0.198689  0.248362  0.42   0.487  20
          300        40                30                30                0      1.3   0.28      0.28      0.479  0.48   20
          300        40                30                30                0      1.35  0.28      0.28      0.47   0.472  20
          300        40                30                30                0      1.35  0.28      0.28      0.46   0.464  20
          300        40                30                30                0      1.35  0.28      0.28      0.448  0.449  20
          300        40                30                30                0      1.35  0.28      0.28      0.447  0.452  20
          SoilCrop WheatSoil: LL=[0.261, 0.248, 0.28, 0.28, 0.28, 0.28, 0.28]; KL=[0.06, 0.06, 0.06, 0.04, 0.04, 0.02, 0.01]; XF=[1, 1, 1, 1, 1, 1, 1]
          SoilCrop RedCloverSoil: LL=[0.261, 0.248, 0.28, 0.28, 0.28, 0.28, 0.28]; KL=[0.06, 0.06, 0.06, 0.05, 0.05, 0.03, 0.02]; XF=[1, 1, 1, 1, 1, 1, 1]
          SoilCrop PlantainForageSoil: LL=[0.261, 0.248, 0.28, 0.28, 0.28, 0.28, 0.28]; KL=[0.06, 0.06, 0.06, 0.045, 0.04, 0.02, 0.01]; XF=[1, 1, 1, 1, 0.8, 0.5, 0.2]
          SoilCrop OatsSoil: LL=[0.261, 0.248, 0.28, 0.28, 0.28, 0.28, 0.28]; KL=[0.06, 0.06, 0.06, 0.04, 0.03, 0.015, 0.005]; XF=[1, 1, 1, 1, 0.8, 0.3, 0.1]
          SoilCrop PotatoSoil: LL=[0.261, 0.248, 0.28, 0.28, 0.28, 0.28, 0.28]; KL=[0.09, 0.08, 0.06, 0.04, 0.02, 0.01, 0.005]; XF=[1, 1, 1, 1, 1, 1, 1]
          SoilCrop MustardSoil: LL=[0.261, 0.248, 0.28, 0.28, 0.28, 0.28, 0.28]; KL=[0.09, 0.08, 0.06, 0.04, 0.02, 0.01, 0.005]; XF=[1, 1, 1, 1, 1, 1, 1]
          SoilCrop RapeSoil: LL=[0.261, 0.248, 0.28, 0.28, 0.28, 0.28, 0.28]; KL=[0.09, 0.08, 0.06, 0.04, 0.02, 0.01, 0.005]; XF=[1, 1, 1, 1, 1, 1, 1]
        Swim3: Salb=0.13; CN2Bare=50; CNRed=20; CNCov=0.8; KDul=150; PSIDul=-100; VC=true; DTMin=0; DTMax=60; MaxWaterIncrement=5; SpaceWeightingFactor=0.5; SoluteSpaceWeightingFactor=1; Dis=1; Disp=1; A=2; DTHC=0.1; DTHP=2; vcon1=7.28e-09; vcon2=7.26e-07; eo_time=06:00; eo_durn=720; default_rain_time=00:00; default_rain_duration=720; Diagnostics=false
      SurfaceOrganicMatter: InitialResidueName=redclover_stubble; InitialResidueType=redclover; InitialResidueMass=500; InitialStandingFraction=0; InitialCPR=0; InitialCNR=100
      Plant RedClover
        Cultivar LocalClover
          Command:
            [Leaf].Photosynthesis.FT.XYPairs.X = 0,4,9,15,18.5,23,27,30,37.5
            [Leaf].Photosynthesis.FT.XYPairs.Y = 0,0,0.1125,0.45,0.75,0.75,0.75,0.375,0
            [Leaf].NRetranslocationFactor.TemperatureFactor.XYPairs.X = 0,4,9,15,18.5,23,27,30,37.5
            [Leaf].NRetranslocationFactor.TemperatureFactor.XYPairs.Y = 0,0,0.15,0.6,1,1,1,0.5,0
            [Phenology].Inductive.Target.FixedValue = 15
            [Phenology].Reproductive.Target.FixedValue = 5000
            [Leaf].BiomassRemovalDefaults.HarvestFractionLiveToRemove = 0.9
            [Leaf].BiomassRemovalDefaults.HarvestFractionDeadToRemove = 0.9
            [Leaf].BiomassRemovalDefaults.HarvestFractionLiveToResidue = 0
            [Leaf].BiomassRemovalDefaults.HarvestFractionDeadToResidue = 0
            [Petiole].BiomassRemovalDefaults.HarvestFractionLiveToRemove = 0.9
            [Petiole].BiomassRemovalDefaults.HarvestFractionDeadToRemove = 0.9
            [Petiole].BiomassRemovalDefaults.HarvestFractionLiveToResidue = 0
            [Petiole].BiomassRemovalDefaults.HarvestFractionDeadToResidue = 0
            [Stem].BiomassRemovalDefaults.HarvestFractionLiveToRemove = 0.9
            [Stem].BiomassRemovalDefaults.HarvestFractionDeadToRemove = 0.9
            [Stem].BiomassRemovalDefaults.HarvestFractionLiveToResidue = 0
            [Stem].BiomassRemovalDefaults.HarvestFractionDeadToResidue = 0
            [Inflorescence].BiomassRemovalDefaults.HarvestFractionLiveToRemove = 0.9
            [Inflorescence].BiomassRemovalDefaults.HarvestFractionDeadToRemove = 0.9
            [Inflorescence].BiomassRemovalDefaults.HarvestFractionLiveToResidue = 0
            [Inflorescence].BiomassRemovalDefaults.HarvestFractionDeadToResidue = 0
            [Root].BiomassRemovalDefaults.HarvestFractionLiveToRemove = 0
            [Root].BiomassRemovalDefaults.HarvestFractionDeadToRemove = 0
            [Root].BiomassRemovalDefaults.HarvestFractionLiveToResidue = 0
            [Root].BiomassRemovalDefaults.HarvestFractionDeadToResidue = 0
            [Taproot].BiomassRemovalDefaults.HarvestFractionLiveToRemove = 0
            [Taproot].BiomassRemovalDefaults.HarvestFractionDeadToRemove = 0
            [Taproot].BiomassRemovalDefaults.HarvestFractionLiveToResidue = 0
            [Taproot].BiomassRemovalDefaults.HarvestFractionDeadToResidue = 0
            [Nodule].BiomassRemovalDefaults.HarvestFractionLiveToRemove = 0
            [Nodule].BiomassRemovalDefaults.HarvestFractionDeadToRemove = 0
            [Nodule].BiomassRemovalDefaults.HarvestFractionLiveToResidue = 0
            [Nodule].BiomassRemovalDefaults.HarvestFractionDeadToResidue = 0
      Plant Wheat
        Cultivar Zlata
          Command:
            [Phenology].HeadEmergencePpSensitivity.FixedValue = 2.0
            [Phenology].Phyllochron.BasePhyllochron.FixedValue = 75.0
            [Leaf].ExtinctionCoeff.VegetativePhase.FixedValue = 0.8
            [Phenology].PhyllochronPpSensitivity.FixedValue = 0.4
            [Phenology].CAMP.FLNparams.MinLN = 5.0
            [Phenology].CAMP.FLNparams.PpLN = 2.5
            [Phenology].CAMP.FLNparams.VrnLN = 7
            [Phenology].CAMP.FLNparams.VxPLN = 0.0
            [Phenology].GrainFilling.Target.FixedValue = 250
            [Phenology].GrainRipening.Target.FixedValue = 100
            [Grain].NumberFunction.GrainNumber.GrainsPerGramOfStem.FixedValue = 13
        Cultivar Irgina
          Command:
            [Phenology].HeadEmergencePpSensitivity.FixedValue = 2.0
            [Phenology].Phyllochron.BasePhyllochron.FixedValue = 50
            [Leaf].ExtinctionCoeff.VegetativePhase.FixedValue = 0.8
            [Phenology].PhyllochronPpSensitivity.FixedValue = 0.4
            [Phenology].CAMP.FLNparams.MinLN = 5
            [Phenology].CAMP.FLNparams.PpLN = 2.5
            [Phenology].CAMP.FLNparams.VrnLN = 7
            [Phenology].CAMP.FLNparams.VxPLN = 0.0
            [Phenology].GrainFilling.Target.FixedValue = 225
            [Phenology].GrainRipening.Target.FixedValue = 100
        Cultivar Winter_rye_smoke
          Command:
            [Phenology].HeadEmergencePpSensitivity.FixedValue = 2.8
            [Phenology].Phyllochron.BasePhyllochron.FixedValue = 98
            [Leaf].ExtinctionCoeff.VegetativePhase.FixedValue = 0.85
            [Phenology].PhyllochronPpSensitivity.FixedValue = 0.2
            [Phenology].CAMP.FLNparams.MinLN = 7.25
            [Phenology].CAMP.FLNparams.PpLN = 0.9
            [Phenology].CAMP.FLNparams.VrnLN = 5.7
            [Phenology].CAMP.FLNparams.VxPLN = 5.5
            [Phenology].GrainFilling.Target.FixedValue = 280
            [Phenology].GrainRipening.Target.FixedValue = 120
            [Phenology].CAMP.EnvData.VrnTreatTemp = 5.8
            [Phenology].CAMP.EnvData.VrnTreatDuration = 60
            [Phenology].HeadEmergenceLongDayBase.FixedValue = 50
      Plant Oats
        Cultivar Yakov
          Command:
            [Phenology].MinimumLeafNumber.FixedValue = 7
            [Phenology].VrnSensitivity.FixedValue = 0
            [Phenology].PpSensitivity.FixedValue = 4.0
            [Phenology].EarlyReproductiveLongDayBase.FixedValue = 14.0
            [Phenology].EarlyReproductivePpSensitivity.FixedValue = 3.5
            [Structure].Phyllochron.BasePhyllochron.FixedValue = 65
            [Leaf].ExtinctionCoeff.FixedValue = 0.4
            [Leaf].CohortParameters.MaxArea.AreaLargestLeaves.FixedValue = 4000
            [Leaf].CohortParameters.SenescenceDuration.Multiplier.FixedValue = 1.8
            [Leaf].InitialLeaves[1].Area = 150
            [Leaf].CohortParameters.GrowthDuration.AgeFactor.XYPairs.Y = 1,1,0.1
            [Leaf].CohortParameters.MaxArea.AgeFactor.XYPairs.X = 3,3.5,4.0,4.5,4.9
            [Leaf].CohortParameters.MaxArea.AgeFactor.XYPairs.Y = 0.1,0.1,0.4,1,0.55
            [Structure].HeightModel.PotentialHeight.XYPairs.Y = 10,150,550,750
            [Structure].BranchingRate.PotentialBranchingRate.Vegetative.PotentialBranchingRate.XYPairs.X = 1,2,3,4,5,6,7,8
            [Structure].BranchingRate.PotentialBranchingRate.Vegetative.PotentialBranchingRate.XYPairs.Y = 0,1,1,1,0.5,0,0,0
            [Oats].Structure.BranchingRate.StressFactors.CoverEffect.XYPairs.X = 1,1,1
            [Oats].Leaf.CohortParameters.SpecificLeafAreaMax.XYPairs.X = 3,4.3,4.5,4.8
            [Oats].Leaf.CohortParameters.SpecificLeafAreaMax.XYPairs.Y = 22000,25000,27000,28000
            [Stem].MaximumNConc.XYPairs.X = 3.0, 4.2, 5
            [Stem].MaximumNConc.XYPairs.Y = 0.05,0.045,0.02
            [Grain].MaximumPotentialGrainSize.FixedValue = 0.045
            [Grain].NumberFunction.GrainNumber.GrainsPerGramOfStem.FixedValue = 18
            [Oats].Structure.BranchMortality.MortalityPhase.Mortality.MortalityPerDegDay.XYPairs.Y[1] = 0.0008
            [Leaf].BiomassRemovalDefaults.HarvestFractionLiveToRemove = 0.9
            [Leaf].BiomassRemovalDefaults.HarvestFractionDeadToRemove = 0.9
            [Leaf].BiomassRemovalDefaults.HarvestFractionLiveToResidue = 0
            [Leaf].BiomassRemovalDefaults.HarvestFractionDeadToResidue = 0
            [Stem].BiomassRemovalDefaults.HarvestFractionLiveToRemove = 0.9
            [Stem].BiomassRemovalDefaults.HarvestFractionDeadToRemove = 0.9
            [Stem].BiomassRemovalDefaults.HarvestFractionLiveToResidue = 0
            [Stem].BiomassRemovalDefaults.HarvestFractionDeadToResidue = 0
            [Panicle].BiomassRemovalDefaults.HarvestFractionLiveToRemove = 0.9
            [Panicle].BiomassRemovalDefaults.HarvestFractionDeadToRemove = 0.9
            [Panicle].BiomassRemovalDefaults.HarvestFractionLiveToResidue = 0
            [Panicle].BiomassRemovalDefaults.HarvestFractionDeadToResidue = 0
        Cultivar Yakov1
          Command:
            [Phenology].MinimumLeafNumber.FixedValue = 6.5
            [Phenology].VrnSensitivity.FixedValue = 0
            [Phenology].PpSensitivity.FixedValue = 3.5
            [Phenology].EarlyReproductiveLongDayBase.FixedValue = 5.5
            [Phenology].EarlyReproductivePpSensitivity.FixedValue = 0.5
            [Structure].Phyllochron.BasePhyllochron.FixedValue = 85
            [Leaf].CohortParameters.MaxArea.AreaLargestLeaves.FixedValue = 3500
            [Leaf].CohortParameters.SenescenceDuration.Multiplier.FixedValue = 2.5
            [Leaf].CohortParameters.GrowthDuration.AgeFactor.XYPairs.Y = 1,1,0.1
            [Grain].MaximumPotentialGrainSize.FixedValue = 0.04
            [Grain].NumberFunction.GrainNumber.GrainsPerGramOfStem.FixedValue = 45
            [Leaf].ExtinctionCoeff.FixedValue = 0.7
            [Leaf].BiomassRemovalDefaults.HarvestFractionLiveToRemove = 0.9
            [Leaf].BiomassRemovalDefaults.HarvestFractionDeadToRemove = 0.9
            [Leaf].BiomassRemovalDefaults.HarvestFractionLiveToResidue = 0
            [Leaf].BiomassRemovalDefaults.HarvestFractionDeadToResidue = 0
            [Stem].BiomassRemovalDefaults.HarvestFractionLiveToRemove = 0.9
            [Stem].BiomassRemovalDefaults.HarvestFractionDeadToRemove = 0.9
            [Stem].BiomassRemovalDefaults.HarvestFractionLiveToResidue = 0
            [Stem].BiomassRemovalDefaults.HarvestFractionDeadToResidue = 0
            [Panicle].BiomassRemovalDefaults.HarvestFractionLiveToRemove = 0.9
            [Panicle].BiomassRemovalDefaults.HarvestFractionDeadToRemove = 0.9
            [Panicle].BiomassRemovalDefaults.HarvestFractionLiveToResidue = 0
            [Panicle].BiomassRemovalDefaults.HarvestFractionDeadToResidue = 0
      Plant Potato
      Plant PlantainForage
        Cultivar TimothyProxy
          Command:
            [Phenology].ThermalTime.Response.X = 15.0, 34.5, 45.0
            [Phenology].ThermalTime.Response.Y = 0.0, 20.0, 0.0
            [Leaf].Photosynthesis.FT.XYPairs.X = 15, 17, 22, 28, 34.5, 42, 45
            [Leaf].Photosynthesis.FT.XYPairs.Y = 0, 0.0375, 0.225, 0.75, 0.75, 0.075, 0
            [Leaf].BiomassRemovalDefaults.HarvestFractionLiveToRemove = 0.9
            [Leaf].BiomassRemovalDefaults.HarvestFractionDeadToRemove = 0.9
            [Leaf].BiomassRemovalDefaults.HarvestFractionLiveToResidue = 0
            [Leaf].BiomassRemovalDefaults.HarvestFractionDeadToResidue = 0
            [Stem].BiomassRemovalDefaults.HarvestFractionLiveToRemove = 0.9
            [Stem].BiomassRemovalDefaults.HarvestFractionDeadToRemove = 0.9
            [Stem].BiomassRemovalDefaults.HarvestFractionLiveToResidue = 0
            [Stem].BiomassRemovalDefaults.HarvestFractionDeadToResidue = 0
            [Inflorescence].BiomassRemovalDefaults.HarvestFractionLiveToRemove = 0.9
            [Inflorescence].BiomassRemovalDefaults.HarvestFractionDeadToRemove = 0.9
            [Inflorescence].BiomassRemovalDefaults.HarvestFractionLiveToResidue = 0
            [Inflorescence].BiomassRemovalDefaults.HarvestFractionDeadToResidue = 0
            [Root].BiomassRemovalDefaults.HarvestFractionLiveToRemove = 0
            [Root].BiomassRemovalDefaults.HarvestFractionDeadToRemove = 0
            [Root].BiomassRemovalDefaults.HarvestFractionLiveToResidue = 0
            [Root].BiomassRemovalDefaults.HarvestFractionDeadToResidue = 0
            [Taproot].BiomassRemovalDefaults.HarvestFractionLiveToRemove = 0
            [Taproot].BiomassRemovalDefaults.HarvestFractionDeadToRemove = 0
            [Taproot].BiomassRemovalDefaults.HarvestFractionLiveToResidue = 0
            [Taproot].BiomassRemovalDefaults.HarvestFractionDeadToResidue = 0
      Plant Mustard: ResourceName=Canola
        Cultivar Mustard_sort
          Command:
            [Phenology].Vegetative.Target.XYPairs.X = 0, 25
            [Phenology].Vegetative.Target.XYPairs.Y = 210, 1
            [Phenology].StemElongation.Target.PPResponse.Amount.FixedValue = 180
            [Leaf].Phyllochron.Base.FixedValue = 55
      Plant Rape: ResourceName=Canola
        Cultivar Rape_sort
          Command:
            [Phenology].Vegetative.Target.XYPairs.X = 0, 25
            [Phenology].Vegetative.Target.XYPairs.Y = 290, 1
            [Phenology].StemElongation.Target.PPResponse.Amount.FixedValue = 240
            [Leaf].Phyllochron.Base.FixedValue = 65
      Manager RotationManager
        RotationCrops = RedClover+PlantainForage, RedClover+PlantainForage, Oats+RedClover+PlantainForage, RedClover+PlantainForage, RedClover+PlantainForage
        RotationCultivars = LocalClover;TimothyProxy, LocalClover;TimothyProxy, Yakov;LocalClover;TimothyProxy, LocalClover;TimothyProxy, LocalClover;TimothyProxy
        RotationSowingDepths = 10;10, 10;10, 20;10;10, 10;10, 10;10
        RotationRowSpacings = 150;150, 150;150, 150;150;150, 150;150, 150;150
        RotationPopulations = 450;300, 450;300, 250;150;150, 450;300, 450;300
        RotationSowingDates = -, -, 18-May, -, -
        RotationHarvestDates = 15-Jul, 15-Jul, 31-Aug, 15-Jul, 15-Jul
        RotationHarvestCrops = RedClover+PlantainForage, RedClover+PlantainForage, Oats, RedClover+PlantainForage, RedClover+PlantainForage
        RotationUses = hay, hay, grain, hay, hay
        PastureAges = 1, 2, 0, 1, 2
        TerminationDate = 20-Aug
        WinterDiebackDate = 01-Dec
```csharp
using System;
using System.Linq;
using System.Globalization;
using System.Collections.Generic;
using APSIM.Core;
using APSIM.Shared.Utilities;
using Models.Core;
using Models.PMF;
using Models.PMF.Interfaces;

namespace Models
{
    [Serializable]
    public class Script : Model, IStructureDependency
    {
        public IStructure Structure { private get; set; }
        [Link] private Clock Clock;
        [Link] private Summary Summary;
        [Link(ByName = true)] private Plant Wheat;
        [Link(ByName = true)] private Plant Oats;
        [Link(ByName = true)] private Plant RedClover;
        [Link(ByName = true)] private Plant PlantainForage;
        [Link(ByName = true)] private Plant Rape;
        [Link(ByName = true)] private Plant Mustard;
        [Description("Crop groups for each harvest year, starting with the simulation start year")]
        public string[] RotationCrops { get; set; }
        [Description("Cultivars for each year; mixture components separated by semicolons")]
        public string[] RotationCultivars { get; set; }
        [Description("Sowing depths in mm for each year and mixture component")]
        public string[] RotationSowingDepths { get; set; }
        [Description("Row spacings in mm for each year and mixture component")]
        public string[] RotationRowSpacings { get; set; }
        [Description("Populations per square metre for each year and mixture component")]
        public string[] RotationPopulations { get; set; }
        [Description("Sowing dates by harvest year; dd-MMM, or dash for established pasture")]
        public string[] RotationSowingDates { get; set; }
        [Description("Harvest or cutting dates for each year; dd-MMM")]
        public string[] RotationHarvestDates { get; set; }
        [Description("Crop names harvested in each year; mixture components separated by plus")]
        public string[] RotationHarvestCrops { get; set; }
        [Description("Harvest use for each year: grain, hay or green")]
        public string[] RotationUses { get; set; }
        [Description("Pasture year of use for each harvest year; zero for annual crops")]
        public string[] PastureAges { get; set; }
        [Description("Date to terminate outgoing pasture before the next annual crop; dd-MMM")]
        public string TerminationDate { get; set; } = "20-Aug";
        [Description("Date to transfer winter shoot dieback to residues; dd-MMM")]
        public string WinterDiebackDate { get; set; } = "01-Dec";
        public double HarvestDMKgHa { get; private set; }
        public double HarvestDMTHa { get { return HarvestDMKgHa / 1000.0; } }
        public double BiomassBeforeKgHa { get; private set; }
        public double BiomassAfterKgHa { get; private set; }
        public double YieldThisYearKgHa { get; private set; }
        public string HarvestCrop { get; private set; }
        public string HarvestUse { get; private set; }
        public int HarvestYear { get; private set; }
        public event EventHandler HarvestRecorded;
        private Dictionary<string, Plant> plants;
        private DateTime? undersowDate;
        private int firstYear, lastYear;

        [EventSubscribe("StartOfSimulation")]
        private void Start(object sender, EventArgs e)
        {
            firstYear = lastYear = Clock.StartDate.Year;
            plants = new Dictionary<string, Plant> {
                {"Wheat", Wheat}, {"Oats", Oats}, {"RedClover", RedClover},
                {"PlantainForage", PlantainForage}, {"Rape", Rape}, {"Mustard", Mustard}};
            int n = RotationCrops.Length;
            if (new [] {RotationCultivars.Length, RotationSowingDepths.Length,
                RotationRowSpacings.Length, RotationPopulations.Length,
                RotationSowingDates.Length, RotationHarvestDates.Length,
                RotationHarvestCrops.Length, RotationUses.Length, PastureAges.Length}.Any(v => v != n))
                throw new Exception("Rotation arrays must have equal lengths");
            for (int i=0; i<n; i++)
            {
                int count = Parts(RotationCrops[i], '+').Length;
                foreach (string spec in new [] {RotationCultivars[i], RotationSowingDepths[i], RotationRowSpacings[i], RotationPopulations[i]})
                    if (Parts(spec, ';').Length != count) throw new Exception("Mixture parameter count mismatch, year " + (firstYear+i));
            }
            if (Hay(0) || Winter(0))
            {
                Sow(0, false, false);
                Summary.WriteMessage(this, "INITIAL STATE APPROXIMATION: pre-2019 crop represented by sowing on simulation start; 2018 weather and established biomass are unavailable.", MessageType.Warning);
            }
        }

        [EventSubscribe("DoManagement")]
        private void Manage(object sender, EventArgs e)
        {
            int i = Clock.Today.Year-firstYear;
            if (i<0 || i>=RotationCrops.Length) return;
            if (lastYear != Clock.Today.Year) { YieldThisYearKgHa=0; lastYear=Clock.Today.Year; }
            if (undersowDate.HasValue && Clock.Today == undersowDate.Value)
            {
                Sow(i, true, true);
                undersowDate=null;
            }
            if (!Hay(i) && !Winter(i) && Match(RotationSowingDates[i]))
            {
                EndAll();
                Sow(i, false, true);
                if (Parts(RotationCrops[i], '+').Any(Perennial)) undersowDate=Clock.Today.AddDays(1);
            }
            if (Match(RotationHarvestDates[i])) Harvest(i);
            int next=i+1;
            // Terminate only the outgoing sward, including a third-year sward.
            // A second-year sward followed by a third year remains alive.
            if (Hay(i) && next<RotationCrops.Length && !Hay(next) && Match(TerminationDate)) EndAll();
            if (next<RotationCrops.Length && Winter(next) && Match(RotationSowingDates[next]))
            {
                EndAll();
                Sow(next, false, false);
            }
            // Explicit approximation of winter shoot loss: send it to residues,
            // preserve roots/reserves and never add it to harvested yield.
            // No operations in the oats establishment year after oats harvest.
            if (Hay(i) && next<RotationCrops.Length && Hay(next) && Match(WinterDiebackDate))
                foreach (Plant p in plants.Values.Where(p => Perennial(p.Name) && p.IsAlive))
                    foreach (var organ in AbovegroundOrgans(p)) organ.RemoveBiomass(0,0,1,1);
        }

        private static string[] Parts(string value, char sep) { return value.Split(sep).Select(s=>s.Trim()).ToArray(); }
        private bool Match(string date) { return date!="-" && DateUtilities.WithinDates(date, Clock.Today, date); }
        private bool Hay(int i) { return RotationUses[i]=="hay"; }
        private bool Winter(int i) { return RotationCultivars[i].Contains("Winter_rye"); }
        private static bool Perennial(string name) { return name=="RedClover" || name=="PlantainForage"; }
        private IEnumerable<IHasDamageableBiomass> AbovegroundOrgans(Plant plant)
        {
            return Structure.FindChildren<IHasDamageableBiomass>(relativeTo:plant)
                .Where(o => new [] {"Leaf","Petiole","Stem","Inflorescence","Panicle","Grain"}.Contains(((IModel)o).Name));
        }
        private void Sow(int i, bool perennialsOnly, bool splitMixture)
        {
            var names=Parts(RotationCrops[i], '+');
            var cultivars=Parts(RotationCultivars[i], ';');
            var depths=Parts(RotationSowingDepths[i], ';');
            var rows=Parts(RotationRowSpacings[i], ';');
            var pops=Parts(RotationPopulations[i], ';');
            for(int c=0;c<names.Length;c++)
            {
                if (splitMixture && Perennial(names[c])!=perennialsOnly) continue;
                Plant p=plants[names[c]];
                if(p.IsAlive) throw new Exception("Attempt to resow living crop " + p.Name);
                p.Sow(cultivar:cultivars[c], population:double.Parse(pops[c],CultureInfo.InvariantCulture),
                    depth:double.Parse(depths[c],CultureInfo.InvariantCulture), rowSpacing:double.Parse(rows[c],CultureInfo.InvariantCulture));
                Summary.WriteMessage(this, "SOW " + p.Name + " " + cultivars[c] + " " + Clock.Today.ToString("yyyy-MM-dd"), MessageType.Information);
            }
        }
        private void Harvest(int i)
        {
            HarvestDMKgHa=BiomassBeforeKgHa=BiomassAfterKgHa=0;
            HarvestYear=Clock.Today.Year;
            HarvestCrop=RotationHarvestCrops[i]; HarvestUse=RotationUses[i];
            foreach(string name in Parts(HarvestCrop,'+'))
            {
                Plant p=plants[name];
                if(!p.IsAlive) throw new Exception("Scheduled harvest of absent crop " + name);
                double before=p.AboveGround.Wt*10;
                BiomassBeforeKgHa+=before;
                if(HarvestUse=="grain")
                    HarvestDMKgHa+=Convert.ToDouble(Structure.Get("Grain.Total.Wt", relativeTo:p))*10;
                p.Harvest();
                double after=p.AboveGround.Wt*10;
                BiomassAfterKgHa+=after;
                if(HarvestUse!="grain") HarvestDMKgHa+=Math.Max(0,before-after);
                if(!Perennial(name) || HarvestUse=="green") p.EndCrop();
            }
            YieldThisYearKgHa+=HarvestDMKgHa;
            Summary.WriteMessage(this, "HARVEST " + HarvestCrop + " " + Clock.Today.ToString("yyyy-MM-dd") + " DM kg/ha=" + HarvestDMKgHa.ToString("F2",CultureInfo.InvariantCulture), MessageType.Information);
            HarvestRecorded?.Invoke(this, EventArgs.Empty);
        }
        private void EndAll()
        {
            foreach(Plant p in plants.Values.Where(p=>p.IsAlive))
            {
                Summary.WriteMessage(this,"END " + p.Name + " " + Clock.Today.ToString("yyyy-MM-dd"),MessageType.Information);
                p.EndCrop();
            }
        }
    }
}
```
      Manager Fertilise at sowing
        FertiliserTypes = NO3N, NO3N, NO3N, NO3N, NO3N
        FertiliserAmounts = 0, 0, 30, 0, 0
        ApplyAtCrops = Wheat, Oats, Mustard, Rape
```csharp
using System;
using System.Collections.Generic;
using Models.Core;
using Models.PMF;
using Models.Soils.Nutrients;

namespace Models
{
    [Serializable]
    public class Script : Model
    {
        [Link] private Clock Clock;
        [Link] private Fertiliser Fertiliser;
        [Link] private Summary Summary;

        [Description("Fertiliser type for each year of rotation (same order as rotation years)")]
        public string[] FertiliserTypes { get; set; }

        [Description("Amount of fertiliser for each year of rotation (kg/ha), same order")]
        public double[] FertiliserAmounts { get; set; }

        [Description("Apply fertiliser only at sowing of these crops (leave empty = all sowings)")]
        public string[] ApplyAtCrops { get; set; }

        private int startYear;
        private HashSet<string> fertilisedToday = new HashSet<string>();

        [EventSubscribe("StartOfSimulation")]
        private void OnStart(object sender, EventArgs e)
        {
            startYear = Clock.StartDate.Year;
        }

        [EventSubscribe("Sowing")]
        private void OnSowing(object sender, EventArgs e)
        {
            int yearIndex = Clock.Today.Year - Clock.StartDate.Year;
            Plant crop = sender as Plant;
            // Arrays refer to the harvest year. Autumn-sown rye belongs to next year.
            if (crop != null && crop.SowingData.Cultivar != null &&
                crop.SowingData.Cultivar.Contains("Winter_rye") && Clock.Today.Month >= 7)
                yearIndex++;
            if (yearIndex < 0 || yearIndex >= FertiliserAmounts.Length)
                return;

            // If ApplyAtCrops specified, only fertilise at sowing of those crops
            if (ApplyAtCrops != null && ApplyAtCrops.Length > 0)
            {
                string sownCrop = (sender as Plant)?.Name ?? "";
                bool match = false;
                foreach (string c in ApplyAtCrops)
                    if (string.Equals(c, sownCrop, StringComparison.OrdinalIgnoreCase))
                    { match = true; break; }
                if (!match)
                    return;
            }

            // Prevent double application on the same day (e.g. when sowing a mixture)
            string key = Clock.Today.ToString("yyyy-MM-dd");
            if (fertilisedToday.Contains(key))
                return;

            double amount = FertiliserAmounts[yearIndex];
            if (amount <= 0)
                return;

            string type = FertiliserTypes != null && yearIndex < FertiliserTypes.Length
                ? FertiliserTypes[yearIndex]
                : "Urea";

            Fertiliser.Apply(amount: amount, type: type);
            fertilisedToday.Add(key);
            Summary.WriteMessage(this, $"Applied {amount} kg/ha of {type} on {Clock.Today:d}", MessageType.Information);
        }
    }
}
```
      Manager Harvest (disabled)
        Crop = [Wheat]
```csharp
using APSIM.Shared.Utilities;
using Models.Utilities;
using Models.Soils;
using Models.PMF;
using Models.Core;
using System;
using System.Linq;

namespace Models
{
    [Serializable] 
    public class Script : Model
    {
        [Description("Crop")]
        public IPlant Crop { get; set; }
        
        [EventSubscribe("DoManagement")]
        private void OnDoManagement(object sender, EventArgs e)
        {
            if (Crop.IsReadyForHarvesting)
            {
                Crop.Harvest();
                Crop.EndCrop();
            }
        }
    }
}
```
      Manager SWIMSetLowerBC
        LowerBCType = seepage
        LowerBCValue = -500
```csharp
using Models.Climate;
using APSIM.Shared.Utilities;
using Models.Soils.Nutrients;
using Models.Soils;
using Models.PMF;
using Models.Core;
using System.Xml.Serialization;
using System;
using System.Linq;
using Models.AgPasture;
using Models.Interfaces;

namespace Models
{
    [Serializable] 
    [System.Xml.Serialization.XmlInclude(typeof(Model))]
    public class Script : Model
    {
        [Link] Clock clock;
        [Link] ISummary summary;
        [Link] private Swim3 swim;
        //[Link] private PastureSpecies ryegrass;
        //[Link] private SimpleGrazing grazing;
        
        public enum LowerBCTypeOptions {gradient,seepage,potential};

        [Separator("Sets the lower boundary condition type (and value if set to 'potential' for SWIM3. The change is applied at the beginning of the first day of the simulation.")]
        [Description("[Get a dropdown] What lower boundary condition is wanted?")] public LowerBCTypeOptions LowerBCType { get; set; }
        [Description("If 'potential', then what potential? (mm) ")] public double LowerBCValue { get; set; }

        public double SoilWaterStart  { get; set; }
        public double SoilWaterEnd  { get; set; }

        [EventSubscribe("DoDailyInitialisation")]
        private void DoDailyInitialisation(object sender, EventArgs e)
        {
        }

        [EventSubscribe("DoReportCalculations")]
        private void DoReportCalculations(object sender, EventArgs e)
        {
        }

        [EventSubscribe("DoManagement")]
        private void DoDailyCalculations(object sender, EventArgs e)
        {
            if (clock.Today == clock.StartDate)
            {
                summary.WriteMessage(this, "Script is setting lower boundary condition to " + LowerBCType, MessageType.Diagnostic);
                if (LowerBCType == LowerBCTypeOptions.gradient)
                    swim.SetLowerBCForGradient(bbcGradient: 0.0);   // in cm/cm (ibbc=0) Note that this is the default setting
                else if (LowerBCType == LowerBCTypeOptions.potential)
                    swim.SetLowerBCForGivenPotential(bbcPotential: LowerBCValue /10.0 );    //  convert to cm (ibbc=1), DUL is -100 cm so values more positive will often result in inflow to the bottom of the soil profile. Input in mm so divide here.
                else if (LowerBCType == LowerBCTypeOptions.seepage)
                    swim.SetLowerBCForSeepage(bbcPotentialSeepage: 0.0);  // in cm (ibbc=3). This is for zero-tension lysimeters
                else
                    throw new Exception("Wrong lower boundary condition type");
            }
        }
    }
}
```
      Manager Synchroniser (disabled)
        Identifier = <undefined>
```csharp
using APSIM.Core;
using APSIM.Shared.Utilities;
using NetMQ.Sockets;
using NetMQ;
using System.Collections.Generic;
using System.IO;
using MessagePack;
using Models.Functions;
using Models.Utilities;
using Models.Surface;
using Models.Soils;
using Models.PMF;
using Models.Core;
using System;
using System.Linq;
using Models.Soils.Nutrients;

namespace Models
{
    [Serializable]
    public class Script : Model, IStructureDependency
    {
        [Link] private Clock clock;
        [Link] private Simulation simulation;
        [Link] private Summary Summary;
        [NonSerialized] private DealerSocket connection;
        public IStructure Structure { private get; set; }

        [Description("Identifier")]
        public string Identifier { get; set; }

        [NonSerialized] private bool pausedAfterWaterToday = false;

        

        [EventSubscribe("StartOfSimulation")]
        private void OnSimulationCommencing(object sender, EventArgs e)
        {
            if (Identifier == "<undefined>")
            {
                Console.WriteLine("Need an endpoint to connect to");
                Summary.WriteMessage(this, "Need an endpoint to connect to", MessageType.Error);
                return;
            }
            Identifier = "tcp://" + Identifier;
            connection = new DealerSocket(Identifier);
            connection.SendFrame("connect");
            var msg = connection.ReceiveFrameString();
            if (msg != "ok") throw new Exception("Expected ok");
        }

        [EventSubscribe("StartOfDay")]
        private void OnStartOfDay(object s, EventArgs e) => pausedAfterWaterToday = false;

        // --- Р В РЎСџР В Р’В°Р РЋРЎвЂњР В Р’В·Р В Р’В° Р РЋР С“Р РЋР вЂљР В Р’В°Р В Р’В·Р РЋРЎвЂњ Р В РЎвЂ”Р В РЎвЂўР РЋР С“Р В Р’В»Р В Р’Вµ DoSoilWaterMovement ---
        [EventSubscribe("DoSoilWaterMovement")]
        private void OnAfterSoilWaterMovement(object s, EventArgs e)
        {
            if (connection == null || pausedAfterWaterToday) return;
            pausedAfterWaterToday = true;

            connection.SendFrame("paused1");
            bool moreToDo = true;
            while (moreToDo)
            {
                var msg = connection.ReceiveMultipartMessage();
                if (msg == null || msg.FrameCount == 0) continue;

                var command = msg[0].ConvertToString();
                switch (command)
                {
                    case "resume1":
                        moreToDo = false;
                        break;
                    case "put":
                        RequireParts(msg, 3, "put");
                        ProcessPutCommand(msg);
                        break;
                    case "get":
                        RequireParts(msg, 2, "get");
                        ProcessReadCommand(msg);
                        break;
                    default:
                        throw new Exception("Expected resume1/get/put/do during paused1, not '" + command + "'");
                }
            }
            Summary?.WriteMessage(this, "Resumed after paused1", MessageType.Information);
        }

        [EventSubscribe("EndOfDay")]
        private void OnEndOfDay(object sender, EventArgs e)
        {
            if (connection == null) return;

            connection.SendFrame("paused");
            bool moreToDo = true;
            while (moreToDo)
            {
                var msg = connection.ReceiveMultipartMessage();
                if (msg == null || msg.FrameCount == 0) continue;

                var command = msg[0].ConvertToString();
                switch (command)
                {
                    case "resume":
                        moreToDo = false;
                        break;
                    case "put":
                        RequireParts(msg, 3, "put");
                        ProcessPutCommand(msg);
                        break;
                    case "get":
                        RequireParts(msg, 2, "get");
                        ProcessReadCommand(msg);
                        break;
                    default:
                        throw new Exception("Expected resume/get/put, not '" + command + "'");
                }
            }
        }

        [EventSubscribe("EndOfSimulation")]
        private void OnSimulationEnding(object sender, EventArgs e)
        {
            if (connection == null) return;

            connection.SendFrame("finished");
            var msg = connection.ReceiveFrameString();
            if (msg != "ok") throw new Exception("Expected ok at end");
            connection.Close();
            Console.WriteLine("Simulation Ending");
        }

        // ==========================
        //        Р В РЎвЂєР В Р’В±Р РЋРІР‚В°Р В РЎвЂР В Р’Вµ Р В РЎВР В Р’ВµР РЋРІР‚С™Р В РЎвЂўР В РўвЂР РЋРІР‚в„–
        // ==========================

        private void ProcessPutCommand(NetMQMessage msg)
        {
            // msg[1] Р Р†Р вЂљРІР‚Сњ packed string variableName; msg[2] Р Р†Р вЂљРІР‚Сњ packed object value
            string variableName = MessagePackSerializer.Deserialize<string>(msg[1].Buffer);

            // Р В Р’В§Р РЋРІР‚С™Р В РЎвЂў Р В Р’В·Р В Р’В° Р РЋРІР‚С™Р В РЎвЂР В РЎвЂ” Р РЋРЎвЂњ Р В РЎвЂ”Р В Р’ВµР РЋР вЂљР В Р’ВµР В РЎВР В Р’ВµР В Р вЂ¦Р В Р вЂ¦Р В РЎвЂўР В РІвЂћвЂ“ Р В Р вЂ  APSIM
            var targetObj = Structure.Get(variableName, relativeTo: simulation);
            if (targetObj == null)
                throw new Exception($"Variable '{variableName}' not found in simulation.");
            var targetType = targetObj.GetType();

            object incoming = MessagePackSerializer.Deserialize<object>(msg[2].Buffer);

            // Р В РЎСџР РЋР вЂљР В РЎвЂўР В Р вЂ Р В Р’ВµР РЋР вЂљР В РЎвЂќР В Р’В° Р РЋР С“Р В РЎвЂўР В РЎвЂ“Р В Р’В»Р В Р’В°Р РЋР С“Р В РЎвЂўР В Р вЂ Р В Р’В°Р В Р вЂ¦Р В Р вЂ¦Р В РЎвЂўР РЋР С“Р РЋРІР‚С™Р В РЎвЂ Р В РЎВР В Р’В°Р РЋР С“Р РЋР С“Р В РЎвЂР В Р вЂ /Р РЋР С“Р В РЎвЂќР В Р’В°Р В Р’В»Р РЋР РЏР РЋР вЂљ
            if (incoming.GetType().IsArray != targetType.IsArray)
                throw new Exception("Array/scalar mismatch for " + variableName);

            if (targetType.IsArray)
            {
                Type elemType = targetType.GetElementType();
                var incomingArray = (incoming as object[]) ?? throw new Exception("Expected array payload for " + variableName);

                if (IsNumeric(elemType))
                {
                    var casted = Array.ConvertAll(incomingArray, e => (double)e);
                    Structure.Set(variableName, casted, relativeTo: simulation);
                }
                else if (IsInteger(elemType))
                {
                    var casted = Array.ConvertAll(incomingArray, e => (int)e);
                    Structure.Set(variableName, casted, relativeTo: simulation);
                }
                else if (IsString(elemType))
                {
                    var casted = Array.ConvertAll(incomingArray, e => (string)e);
                    Structure.Set(variableName, casted, relativeTo: simulation);
                }
                else
                {
                    throw new Exception("Don't know what to do setting an array of " + elemType);
                }
            }
            else
            {
                Structure.Set(variableName, Convert.ChangeType(incoming, targetType), relativeTo: simulation);
            }

            connection.SendFrame("ok");
        }

        private void ProcessReadCommand(NetMQMessage msg)
        {
            // msg[1] Р Р†Р вЂљРІР‚Сњ packed string variableName
            string variableName = MessagePackSerializer.Deserialize<string>(msg[1].Buffer);

            object value = Structure.Get(variableName, relativeTo: simulation);

            if (value is IFunction fun)
            {
                value = fun.Value();
            }
            else if (value != null && (value.GetType().IsArray || value.GetType().IsClass))
            {
                try
                {
                    value = ReflectionUtilities.Clone(value);
                }
                catch (Exception err)
                {
                    throw new Exception(
                        $"Cannot report variable \"{variableName}\": Variable is a non-reportable type: \"{value?.GetType()?.Name}\".", err);
                }
            }

            byte[] bytes = MessagePackSerializer.Serialize(value ?? "NA");
            connection.SendFrame(bytes);
        }

        private static void RequireParts(NetMQMessage msg, int expected, string cmd)
        {
            if (msg.FrameCount != expected)
                throw new Exception($"Command '{cmd}' expects {expected} frames, got {msg.FrameCount}.");
        }

        private static bool IsNumeric(Type type)
        {
            switch (Type.GetTypeCode(type))
            {
                case TypeCode.Double:
                case TypeCode.Single:
                    return true;
                default:
                    return false;
            }
        }

        private static bool IsInteger(Type type)
        {
            switch (Type.GetTypeCode(type))
            {
                case TypeCode.Int16:
                case TypeCode.Int32:
                case TypeCode.Int64:
                case TypeCode.UInt16:
                case TypeCode.UInt32:
                case TypeCode.UInt64:
                    return true;
                default:
                    return false;
            }
        }

        private static bool IsString(Type type) => Type.GetTypeCode(type) == TypeCode.String;
    }
}
```
      Report HarvestReport: EventNames=[RotationManager].Script.HarvestRecorded
        VariableNames:
          [Clock].Today as Date
          [RotationManager].Script.HarvestYear as Year
          [RotationManager].Script.HarvestCrop as Crop
          [RotationManager].Script.HarvestUse as Use
          [RotationManager].Script.HarvestDMKgHa as YieldDMKgHa
          [RotationManager].Script.HarvestDMTHa as YieldDMTHa
          [RotationManager].Script.BiomassBeforeKgHa as BeforeKgHa
          [RotationManager].Script.BiomassAfterKgHa as AfterKgHa
    Zone Field2: Area=1; Slope=0; AspectAngle=0; Altitude=50; CanopyType=BroadAcre
      Report Report2: same as Wheat.Field1.Report1
      Fertiliser
      Soil: ASCOrder=Vertosol; ASCSubOrder=Black; SoilType=Clay; Site=Norwin; NearestTown=Norwin; Region=Darling Downs and Granite Belt; State=Queensland; Country=Russia; NaturalVegetation=Qld. Bluegrass, possible Qld. Blue gum; ApsoilNumber=900; Latitude=56.77719; Longitude=56.11066; LocationAccuracy=+/- 20m; YearOfSampling=0
        DataSource=CSIRO Sustainable Ecosystems, Toowoomba; Characteriesd as part of the GRDC funded project"Doing it better, doing it smarter, managing soil water in Australian agriculture' 2011
        Comments=Clay - OC, CLL for all crops estimated-based on Bongeen Mywybilla Soil No1
        Organic: same as Wheat.Field1.Soil.Organic
        Chemical: Thickness=[150, 150, 300, 300, 300, 300, 300]; PH=[5.09, 5.09, 5, 5, 5, 5, 5]; PHUnits=Water
        Water: Thickness=[150, 150, 300, 300, 300, 300, 300]; FilledFromTop=false
          InitialValues=[0.297925, 0.274107, 0.30985, 0.3085, 0.307, 0.3052, 0.30505]
        Nutrient
        Solute NO3: InitialValuesUnits=ppm; WaterTableConcentration=0; D0=0; DepthConstant=0; MaxDepthSoluteAccessible=0; RunoffEffectivenessAtMovingSolute=0; MaxEffectiveRunoff=0
          Thickness  InitialValues  Exco  FIP
          150        5              0     1
          150        4.5            0     1
          300        3              0     1
          300        2              0     1
          300        1.5            0     1
          300        1              0     1
          300        0.5            0     1
        Solute NH4: same as Wheat.Field1.Soil.NH4
        Solute Urea: same as Wheat.Field1.Soil.Urea
        SoilTemperature: InteractionsPerDay=8
        LayerStructure: Thickness=[150, 150, 300, 300, 300, 300, 300]
        Physical: same as Wheat.Field1.Soil.Physical
        Swim3: same as Wheat.Field1.Soil.Swim3
      SurfaceOrganicMatter: InitialResidueName=redclover_stubble; InitialResidueType=redclover; InitialResidueMass=500; InitialStandingFraction=0; InitialCPR=0; InitialCNR=100
      Plant RedClover: same as Wheat.Field1.RedClover
      Plant Wheat
        Cultivar Zlata
          Command:
            [Phenology].HeadEmergencePpSensitivity.FixedValue = 2.0
            [Phenology].Phyllochron.BasePhyllochron.FixedValue = 75.0
            [Leaf].ExtinctionCoeff.VegetativePhase.FixedValue = 0.8
            [Phenology].PhyllochronPpSensitivity.FixedValue = 0.4
            [Phenology].CAMP.FLNparams.MinLN = 5.0
            [Phenology].CAMP.FLNparams.PpLN = 2.5
            [Phenology].CAMP.FLNparams.VrnLN = 7
            [Phenology].CAMP.FLNparams.VxPLN = 0.0
            [Phenology].GrainFilling.Target.FixedValue = 280
            [Phenology].GrainRipening.Target.FixedValue = 110
            [Grain].NumberFunction.GrainNumber.GrainsPerGramOfStem.FixedValue = 15
        Cultivar Irgina: same as Wheat.Field1.Wheat.Irgina
        Cultivar Winter_rye_smoke
          Command:
            [Phenology].HeadEmergencePpSensitivity.FixedValue = 2.8
            [Phenology].Phyllochron.BasePhyllochron.FixedValue = 98
            [Leaf].ExtinctionCoeff.VegetativePhase.FixedValue = 0.82
            [Phenology].PhyllochronPpSensitivity.FixedValue = 0.2
            [Phenology].CAMP.FLNparams.MinLN = 8.4
            [Phenology].CAMP.FLNparams.PpLN = 0.9
            [Phenology].CAMP.FLNparams.VrnLN = 5.7
            [Phenology].CAMP.FLNparams.VxPLN = 5.5
            [Phenology].GrainFilling.Target.FixedValue = 390
            [Phenology].GrainRipening.Target.FixedValue = 165
            [Phenology].CAMP.EnvData.VrnTreatTemp = 5.8
            [Phenology].CAMP.EnvData.VrnTreatDuration = 60
            [Phenology].HeadEmergenceLongDayBase.FixedValue = 50
      Plant Oats
        Cultivar Yakov: same as Wheat.Field1.Oats.Yakov
      Plant Potato
      Plant PlantainForage: same as Wheat.Field1.PlantainForage
      Plant Mustard: ResourceName=Canola
        Cultivar Mustard_sort
          Command:
            [Phenology].Vegetative.Target.XYPairs.X = 0, 25
            [Phenology].Vegetative.Target.XYPairs.Y = 210, 1
            [Phenology].StemElongation.Target.PPResponse.Amount.FixedValue = 180
            [Leaf].Phyllochron.Base.FixedValue = 55
      Plant Rape: ResourceName=Canola
        Cultivar Rape_sort
          Command:
            [Phenology].Vegetative.Target.XYPairs.X = 0, 25
            [Phenology].Vegetative.Target.XYPairs.Y = 290, 1
            [Phenology].StemElongation.Target.PPResponse.Amount.FixedValue = 240
            [Leaf].Phyllochron.Base.FixedValue = 65
      Manager RotationManager
        RotationCrops = Mustard, Wheat, Rape, Wheat, Oats+RedClover+PlantainForage
        RotationCultivars = Mustard_sort, Winter_rye_smoke, Rape_sort, Zlata, Yakov;LocalClover;TimothyProxy
        RotationSowingDepths = 20, 30, 20, 28, 20;10;10
        RotationRowSpacings = 200, 200, 200, 200, 150;150;150
        RotationPopulations = 45, 230, 45, 480, 250;150;150
        RotationSowingDates = 10-May, 5-Sep, 10-May, 12-May, 4-May
        RotationHarvestDates = 31-Aug, 31-Aug, 31-Aug, 17-Aug, 31-Aug
        RotationHarvestCrops = Mustard, Wheat, Rape, Wheat, Oats
        RotationUses = grain, grain, grain, grain, grain
        PastureAges = 0, 0, 0, 0, 0
        TerminationDate = 20-Aug
        WinterDiebackDate = 01-Dec
        script: same as in Wheat.Field1.RotationManager
      Manager Fertilise at sowing
        FertiliserTypes = NO3N, NO3N, NO3N, NO3N, NO3N
        FertiliserAmounts = 30, 30, 30, 30, 240
        ApplyAtCrops = Wheat, Oats, Mustard, Rape
        script: same as in Wheat.Field1.Fertilise at sowing
      Manager Harvest (disabled): same as Wheat.Field1.Harvest
      Manager SWIMSetLowerBC: same as Wheat.Field1.SWIMSetLowerBC
      Manager Synchroniser (disabled): same as Wheat.Field1.Synchroniser
      Report HarvestReport: same as Wheat.Field1.HarvestReport
    Zone Field3: Area=1; Slope=0; AspectAngle=0; Altitude=50; CanopyType=BroadAcre
      Report Report3: same as Wheat.Field1.Report1
      Fertiliser
      Soil: ASCOrder=Vertosol; ASCSubOrder=Black; SoilType=Clay; Site=Norwin; NearestTown=Norwin; Region=Darling Downs and Granite Belt; State=Queensland; Country=Russia; NaturalVegetation=Qld. Bluegrass, possible Qld. Blue gum; ApsoilNumber=900; Latitude=56.77719; Longitude=56.11066; LocationAccuracy=+/- 20m; YearOfSampling=0
        DataSource=CSIRO Sustainable Ecosystems, Toowoomba; Characteriesd as part of the GRDC funded project"Doing it better, doing it smarter, managing soil water in Australian agriculture' 2011
        Comments=Clay - OC, CLL for all crops estimated-based on Bongeen Mywybilla Soil No1
        Organic: same as Wheat.Field1.Soil.Organic
        Chemical: Thickness=[150, 150, 300, 300, 300, 300, 300]; PH=[5.1, 5.1, 5, 5, 5, 5, 5]; PHUnits=Water
        Water: Thickness=[150, 150, 300, 300, 300, 300, 300]; FilledFromTop=false
          InitialValues=[0.422675, 0.359927, 0.40935, 0.4035, 0.397, 0.3892, 0.38855]
        Nutrient
        Solute NO3: same as Wheat.Field1.Soil.NO3
        Solute NH4: same as Wheat.Field1.Soil.NH4
        Solute Urea: same as Wheat.Field1.Soil.Urea
        SoilTemperature: InteractionsPerDay=8
        LayerStructure: Thickness=[150, 150, 300, 300, 300, 300, 300]
        Physical: same as Wheat.Field1.Soil.Physical
        Swim3: same as Wheat.Field1.Soil.Swim3
      SurfaceOrganicMatter: InitialResidueName=redclover_stubble; InitialResidueType=redclover; InitialResidueMass=500; InitialStandingFraction=0; InitialCPR=0; InitialCNR=100
      Plant RedClover: same as Wheat.Field1.RedClover
      Plant Wheat
        Cultivar Zlata: same as Wheat.Field1.Wheat.Zlata
        Cultivar Irgina: same as Wheat.Field1.Wheat.Irgina
        Cultivar Winter_rye_smoke
          Command:
            [Phenology].HeadEmergencePpSensitivity.FixedValue = 2.8
            [Phenology].Phyllochron.BasePhyllochron.FixedValue = 98
            [Leaf].ExtinctionCoeff.VegetativePhase.FixedValue = 0.82
            [Phenology].PhyllochronPpSensitivity.FixedValue = 0.2
            [Phenology].CAMP.FLNparams.MinLN = 7.25
            [Phenology].CAMP.FLNparams.PpLN = 0.9
            [Phenology].CAMP.FLNparams.VrnLN = 5.7
            [Phenology].CAMP.FLNparams.VxPLN = 5.5
            [Phenology].GrainFilling.Target.FixedValue = 390
            [Phenology].GrainRipening.Target.FixedValue = 165
            [Phenology].CAMP.EnvData.VrnTreatTemp = 5.8
            [Phenology].CAMP.EnvData.VrnTreatDuration = 60
            [Phenology].HeadEmergenceLongDayBase.FixedValue = 50
      Plant Oats
        Cultivar Yakov
          Command:
            [Phenology].MinimumLeafNumber.FixedValue = 6.5
            [Phenology].VrnSensitivity.FixedValue = 0
            [Phenology].PpSensitivity.FixedValue = 3.5
            [Phenology].EarlyReproductiveLongDayBase.FixedValue = 5.5
            [Phenology].EarlyReproductivePpSensitivity.FixedValue = 0.5
            [Structure].Phyllochron.BasePhyllochron.FixedValue = 65
            [Leaf].CohortParameters.MaxArea.AreaLargestLeaves.FixedValue = 1500
            [Leaf].CohortParameters.SenescenceDuration.Multiplier.FixedValue = 1.5
            [Leaf].CohortParameters.GrowthDuration.AgeFactor.XYPairs.Y = 1,1,0.1
            [Grain].MaximumPotentialGrainSize.FixedValue = 0.04
            [Grain].NumberFunction.GrainNumber.GrainsPerGramOfStem.FixedValue = 20
            [Leaf].ExtinctionCoeff.FixedValue = 0.5
            [Leaf].BiomassRemovalDefaults.HarvestFractionLiveToRemove = 0.9
            [Leaf].BiomassRemovalDefaults.HarvestFractionDeadToRemove = 0.9
            [Leaf].BiomassRemovalDefaults.HarvestFractionLiveToResidue = 0
            [Leaf].BiomassRemovalDefaults.HarvestFractionDeadToResidue = 0
            [Stem].BiomassRemovalDefaults.HarvestFractionLiveToRemove = 0.9
            [Stem].BiomassRemovalDefaults.HarvestFractionDeadToRemove = 0.9
            [Stem].BiomassRemovalDefaults.HarvestFractionLiveToResidue = 0
            [Stem].BiomassRemovalDefaults.HarvestFractionDeadToResidue = 0
            [Panicle].BiomassRemovalDefaults.HarvestFractionLiveToRemove = 0.9
            [Panicle].BiomassRemovalDefaults.HarvestFractionDeadToRemove = 0.9
            [Panicle].BiomassRemovalDefaults.HarvestFractionLiveToResidue = 0
            [Panicle].BiomassRemovalDefaults.HarvestFractionDeadToResidue = 0
        Cultivar Argamak
          Command:
            [Phenology].MinimumLeafNumber.FixedValue = 8
            [Phenology].VrnSensitivity.FixedValue = 0
            [Phenology].PpSensitivity.FixedValue = 0.3
            [Structure].Phyllochron.BasePhyllochron.FixedValue = 50
            [Leaf].ExtinctionCoeff.FixedValue = 0.5
            [Leaf].CohortParameters.MaxArea.AreaLargestLeaves.FixedValue = 5000
            [Leaf].InitialLeaves[1].Area = 150
            [Leaf].CohortParameters.MaxArea.AgeFactor.XYPairs.X = 3,3.5,4.0,4.5,4.9
            [Leaf].CohortParameters.MaxArea.AgeFactor.XYPairs.Y = 0.1,0.1,0.4,1,0.55
            [Structure].HeightModel.PotentialHeight.XYPairs.Y = 10,150,550,750
            [Structure].BranchingRate.PotentialBranchingRate.Vegetative.PotentialBranchingRate.XYPairs.X = 1,2,3,4,5,6,7,8
            [Structure].BranchingRate.PotentialBranchingRate.Vegetative.PotentialBranchingRate.XYPairs.Y = 0,1,1,1,0.5,0,0,0
            [Oats].Structure.BranchingRate.StressFactors.CoverEffect.XYPairs.X = 1,1,1
            [Oats].Leaf.CohortParameters.SpecificLeafAreaMax.XYPairs.X = 3,4.3,4.5,4.8
            [Oats].Leaf.CohortParameters.SpecificLeafAreaMax.XYPairs.Y = 28000,32000,34000,36000
            [Stem].MaximumNConc.XYPairs.Y = 0.05,0.045,0.02
            [Stem].MaximumNConc.XYPairs.X = 3.0, 4.2, 5
            [Oats].Structure.BranchMortality.MortalityPhase.Mortality.MortalityPerDegDay.XYPairs.Y[1] = 0.0008
            [Leaf].BiomassRemovalDefaults.HarvestFractionLiveToRemove = 0.9
            [Leaf].BiomassRemovalDefaults.HarvestFractionDeadToRemove = 0.9
            [Leaf].BiomassRemovalDefaults.HarvestFractionLiveToResidue = 0
            [Leaf].BiomassRemovalDefaults.HarvestFractionDeadToResidue = 0
            [Stem].BiomassRemovalDefaults.HarvestFractionLiveToRemove = 0.9
            [Stem].BiomassRemovalDefaults.HarvestFractionDeadToRemove = 0.9
            [Stem].BiomassRemovalDefaults.HarvestFractionLiveToResidue = 0
            [Stem].BiomassRemovalDefaults.HarvestFractionDeadToResidue = 0
            [Panicle].BiomassRemovalDefaults.HarvestFractionLiveToRemove = 0.9
            [Panicle].BiomassRemovalDefaults.HarvestFractionDeadToRemove = 0.9
            [Panicle].BiomassRemovalDefaults.HarvestFractionLiveToResidue = 0
            [Panicle].BiomassRemovalDefaults.HarvestFractionDeadToResidue = 0
      Plant Potato
      Plant PlantainForage: same as Wheat.Field1.PlantainForage
      Plant Mustard: ResourceName=Canola
        Cultivar Mustard_sort
          Command:
            [Phenology].Vegetative.Target.XYPairs.X = 0, 25
            [Phenology].Vegetative.Target.XYPairs.Y = 210, 1
            [Phenology].StemElongation.Target.PPResponse.Amount.FixedValue = 180
            [Leaf].Phyllochron.Base.FixedValue = 55
      Plant Rape: ResourceName=Canola
        Cultivar Rape_sort
          Command:
            [Phenology].Vegetative.Target.XYPairs.X = 0, 25
            [Phenology].Vegetative.Target.XYPairs.Y = 290, 1
            [Phenology].StemElongation.Target.PPResponse.Amount.FixedValue = 240
            [Leaf].Phyllochron.Base.FixedValue = 65
      Manager RotationManager
        RotationCrops = Oats+RedClover+PlantainForage, RedClover+PlantainForage, RedClover+PlantainForage, Wheat, Wheat
        RotationCultivars = Argamak;LocalClover;TimothyProxy, LocalClover;TimothyProxy, LocalClover;TimothyProxy, Winter_rye_smoke, Zlata
        RotationSowingDepths = 20;10;10, 10;10, 10;10, 20, 28
        RotationRowSpacings = 150;150;150, 150;150, 150;150, 150, 200
        RotationPopulations = 300;200;200, 450;300, 450;300, 250, 400
        RotationSowingDates = 7-May, -, -, 9-Sep, 3-May
        RotationHarvestDates = 31-Aug, 15-Jul, 15-Jul, 31-Aug, 21-Aug
        RotationHarvestCrops = Oats, RedClover+PlantainForage, RedClover+PlantainForage, Wheat, Wheat
        RotationUses = grain, hay, hay, grain, grain
        PastureAges = 0, 1, 2, 0, 0
        TerminationDate = 20-Aug
        WinterDiebackDate = 01-Dec
        script: same as in Wheat.Field1.RotationManager
      Manager Fertilise at sowing
        FertiliserTypes = NO3N, NO3N, NO3N, NO3N, NO3N
        FertiliserAmounts = 30, 30, 30, 30, 30
        ApplyAtCrops = Wheat, Oats, Mustard, Rape
        script: same as in Wheat.Field1.Fertilise at sowing
      Manager Harvest (disabled): same as Wheat.Field1.Harvest
      Manager SWIMSetLowerBC: same as Wheat.Field1.SWIMSetLowerBC
      Manager Synchroniser (disabled): same as Wheat.Field1.Synchroniser
      Report HarvestReport: same as Wheat.Field1.HarvestReport
    Zone Field4: Area=1; Slope=0; AspectAngle=0; Altitude=50; CanopyType=BroadAcre
      Report Report4: same as Wheat.Field1.Report1
      Fertiliser
      Soil: ASCOrder=Vertosol; ASCSubOrder=Black; SoilType=Clay; Site=Norwin; NearestTown=Norwin; Region=Darling Downs and Granite Belt; State=Queensland; Country=Russia; NaturalVegetation=Qld. Bluegrass, possible Qld. Blue gum; ApsoilNumber=900; Latitude=56.77719; Longitude=56.11066; LocationAccuracy=+/- 20m; YearOfSampling=0
        DataSource=CSIRO Sustainable Ecosystems, Toowoomba; Characteriesd as part of the GRDC funded project"Doing it better, doing it smarter, managing soil water in Australian agriculture' 2011
        Comments=Clay - OC, CLL for all crops estimated-based on Bongeen Mywybilla Soil No1
        Organic: same as Wheat.Field1.Soil.Organic
        Chemical: Thickness=[150, 150, 300, 300, 300, 300, 300]; PH=[5.09, 5.09, 5, 5, 5, 5, 5]; PHUnits=Water
        Water: Thickness=[150, 150, 300, 300, 300, 300, 300]; InitialValues=[0.3104, 0.282689, 0.3198, 0.318, 0.316, 0.3136, 0.3134]; FilledFromTop=false
        Nutrient
        Solute NO3: InitialValuesUnits=ppm; WaterTableConcentration=0; D0=0; DepthConstant=0; MaxDepthSoluteAccessible=0; RunoffEffectivenessAtMovingSolute=0; MaxEffectiveRunoff=0
          Thickness  InitialValues  Exco  FIP
          150        5.5            0     1
          150        4              0     1
          300        3.5            0     1
          300        2.5            0     1
          300        1.5            0     1
          300        1              0     1
          300        0.5            0     1
        Solute NH4: same as Wheat.Field1.Soil.NH4
        Solute Urea: same as Wheat.Field1.Soil.Urea
        SoilTemperature: InteractionsPerDay=8
        LayerStructure: Thickness=[150, 150, 300, 300, 300, 300, 300]
        Physical: same as Wheat.Field1.Soil.Physical
        Swim3: same as Wheat.Field1.Soil.Swim3
      SurfaceOrganicMatter: InitialResidueName=redclover_stubble; InitialResidueType=redclover; InitialResidueMass=500; InitialStandingFraction=0; InitialCPR=0; InitialCNR=100
      Plant RedClover: same as Wheat.Field1.RedClover
      Plant Wheat
        Cultivar Zlata
          Command:
            [Phenology].HeadEmergencePpSensitivity.FixedValue = 2.0
            [Phenology].Phyllochron.BasePhyllochron.FixedValue = 75.0
            [Leaf].ExtinctionCoeff.VegetativePhase.FixedValue = 0.8
            [Phenology].PhyllochronPpSensitivity.FixedValue = 0.4
            [Phenology].CAMP.FLNparams.MinLN = 5.0
            [Phenology].CAMP.FLNparams.PpLN = 2.5
            [Phenology].CAMP.FLNparams.VrnLN = 7
            [Phenology].CAMP.FLNparams.VxPLN = 0.0
            [Phenology].GrainFilling.Target.FixedValue = 250
            [Phenology].GrainRipening.Target.FixedValue = 100
            [Grain].NumberFunction.GrainNumber.GrainsPerGramOfStem.FixedValue = 15
        Cultivar Irgina: same as Wheat.Field1.Wheat.Irgina
        Cultivar Winter_rye_smoke: same as Wheat.Field3.Wheat.Winter_rye_smoke
      Plant Oats
        Cultivar Yakov: same as Wheat.Field3.Oats.Yakov
      Plant Potato
      Plant PlantainForage: same as Wheat.Field1.PlantainForage
      Plant Mustard: ResourceName=Canola
        Cultivar Mustard_sort
          Command:
            [Phenology].Vegetative.Target.XYPairs.X = 0, 25
            [Phenology].Vegetative.Target.XYPairs.Y = 210, 1
            [Phenology].StemElongation.Target.PPResponse.Amount.FixedValue = 180
            [Leaf].Phyllochron.Base.FixedValue = 55
      Plant Rape: ResourceName=Canola
        Cultivar Rape_sort
          Command:
            [Phenology].Vegetative.Target.XYPairs.X = 0, 25
            [Phenology].Vegetative.Target.XYPairs.Y = 290, 1
            [Phenology].StemElongation.Target.PPResponse.Amount.FixedValue = 240
            [Leaf].Phyllochron.Base.FixedValue = 65
      Manager RotationManager
        RotationCrops = RedClover+PlantainForage, RedClover+PlantainForage, Wheat, Oats+RedClover+PlantainForage, RedClover+PlantainForage
        RotationCultivars = LocalClover;TimothyProxy, LocalClover;TimothyProxy, Zlata, Yakov;LocalClover;TimothyProxy, LocalClover;TimothyProxy
        RotationSowingDepths = 10;10, 10;10, 20, 20;10;10, 10;10
        RotationRowSpacings = 150;150, 150;150, 150, 150;150;150, 150;150
        RotationPopulations = 400;250, 400;250, 200, 200;150;150, 450;300
        RotationSowingDates = -, -, 15-May, 12-May, -
        RotationHarvestDates = 15-Jul, 15-Jul, 14-Aug, 31-Aug, 15-Jul
        RotationHarvestCrops = RedClover+PlantainForage, RedClover+PlantainForage, Wheat, Oats, RedClover+PlantainForage
        RotationUses = hay, hay, grain, grain, hay
        PastureAges = 1, 2, 0, 0, 1
        TerminationDate = 20-Aug
        WinterDiebackDate = 01-Dec
        script: same as in Wheat.Field1.RotationManager
      Manager Fertilise at sowing: same as Wheat.Field3.Fertilise at sowing
      Manager Harvest (disabled): same as Wheat.Field1.Harvest
      Manager SWIMSetLowerBC: same as Wheat.Field1.SWIMSetLowerBC
      Manager Synchroniser (disabled): same as Wheat.Field1.Synchroniser
      Report HarvestReport: same as Wheat.Field1.HarvestReport
    Zone Field5: Area=1; Slope=0; AspectAngle=0; Altitude=50; CanopyType=BroadAcre
      Report Report5: same as Wheat.Field1.Report1
      Fertiliser
      Soil: ASCOrder=Vertosol; ASCSubOrder=Black; SoilType=Clay; Site=Norwin; NearestTown=Norwin; Region=Darling Downs and Granite Belt; State=Queensland; Country=Russia; NaturalVegetation=Qld. Bluegrass, possible Qld. Blue gum; ApsoilNumber=900; Latitude=56.77719; Longitude=56.11066; LocationAccuracy=+/- 20m; YearOfSampling=0
        DataSource=CSIRO Sustainable Ecosystems, Toowoomba; Characteriesd as part of the GRDC funded project"Doing it better, doing it smarter, managing soil water in Australian agriculture' 2011
        Comments=Clay - OC, CLL for all crops estimated-based on Bongeen Mywybilla Soil No1
        Organic: same as Wheat.Field1.Soil.Organic
        Chemical: Thickness=[150, 150, 300, 300, 300, 300, 300]; PH=[5.3, 5.1, 5, 5, 5, 5, 5]; PHUnits=Water
        Water: Thickness=[150, 150, 300, 300, 300, 300, 300]; InitialValues=[0.4102, 0.351345, 0.3994, 0.394, 0.388, 0.3808, 0.3802]; FilledFromTop=false
        Nutrient
        Solute NO3: InitialValuesUnits=ppm; WaterTableConcentration=0; D0=0; DepthConstant=0; MaxDepthSoluteAccessible=0; RunoffEffectivenessAtMovingSolute=0; MaxEffectiveRunoff=0
          Thickness  InitialValues  Exco  FIP
          150        6              0     1
          150        5.5            0     1
          300        4              0     1
          300        3              0     1
          300        2              0     1
          300        1              0     1
          300        0.5            0     1
        Solute NH4: same as Wheat.Field1.Soil.NH4
        Solute Urea: same as Wheat.Field1.Soil.Urea
        SoilTemperature: InteractionsPerDay=8
        LayerStructure: Thickness=[150, 150, 300, 300, 300, 300, 300]
        Physical: same as Wheat.Field1.Soil.Physical
        Swim3: same as Wheat.Field1.Soil.Swim3
      SurfaceOrganicMatter: InitialResidueName=redclover_stubble; InitialResidueType=redclover; InitialResidueMass=500; InitialStandingFraction=0; InitialCPR=0; InitialCNR=100
      Plant RedClover: same as Wheat.Field1.RedClover
      Plant Wheat: same as Wheat.Field4.Wheat
      Plant Oats: same as Wheat.Field4.Oats
      Plant Potato
      Plant PlantainForage: same as Wheat.Field1.PlantainForage
      Plant Mustard: ResourceName=Canola
        Cultivar Mustard_sort
          Command:
            [Phenology].Vegetative.Target.XYPairs.X = 0, 25
            [Phenology].Vegetative.Target.XYPairs.Y = 210, 1
            [Phenology].StemElongation.Target.PPResponse.Amount.FixedValue = 180
            [Leaf].Phyllochron.Base.FixedValue = 55
      Plant Rape: ResourceName=Canola
        Cultivar Rape_sort
          Command:
            [Phenology].Vegetative.Target.XYPairs.X = 0, 25
            [Phenology].Vegetative.Target.XYPairs.Y = 290, 1
            [Phenology].StemElongation.Target.PPResponse.Amount.FixedValue = 240
            [Leaf].Phyllochron.Base.FixedValue = 65
      Manager RotationManager
        RotationCrops = Wheat, Oats+RedClover+PlantainForage, RedClover+PlantainForage, RedClover+PlantainForage, Wheat
        RotationCultivars = Winter_rye_smoke, Yakov;LocalClover;TimothyProxy, LocalClover;TimothyProxy, LocalClover;TimothyProxy, Winter_rye_smoke
        RotationSowingDepths = 20, 20;10;10, 10;10, 10;10, 20
        RotationRowSpacings = 150, 150;150;150, 150;150, 150;150, 150
        RotationPopulations = 250, 250;150;150, 450;300, 450;300, 150
        RotationSowingDates = 15-Sep, 18-May, -, -, 25-Oct
        RotationHarvestDates = 31-Aug, 31-Aug, 15-Jul, 15-Jul, 31-Aug
        RotationHarvestCrops = Wheat, Oats, RedClover+PlantainForage, RedClover+PlantainForage, Wheat
        RotationUses = grain, grain, hay, hay, grain
        PastureAges = 0, 0, 1, 2, 0
        TerminationDate = 20-Aug
        WinterDiebackDate = 01-Dec
        script: same as in Wheat.Field1.RotationManager
      Manager Fertilise at sowing
        FertiliserTypes = NO3N, NO3N, NO3N, NO3N, NO3N
        FertiliserAmounts = 240, 30, 30, 30, 0
        ApplyAtCrops = Wheat, Oats, Mustard, Rape
        script: same as in Wheat.Field1.Fertilise at sowing
      Manager Harvest (disabled): same as Wheat.Field1.Harvest
      Manager SWIMSetLowerBC: same as Wheat.Field1.SWIMSetLowerBC
      Manager Synchroniser (disabled): same as Wheat.Field1.Synchroniser
      Report HarvestReport: same as Wheat.Field1.HarvestReport
    Zone Field6: Area=1; Slope=0; AspectAngle=0; Altitude=50; CanopyType=BroadAcre
      Report Report6: same as Wheat.Field1.Report1
      Fertiliser
      Soil: same as Wheat.Field1.Soil
      SurfaceOrganicMatter: InitialResidueName=redclover_stubble; InitialResidueType=redclover; InitialResidueMass=500; InitialStandingFraction=0; InitialCPR=0; InitialCNR=100
      Plant RedClover: same as Wheat.Field1.RedClover
      Plant Wheat: same as Wheat.Field1.Wheat
      Plant Oats
        Cultivar Yakov: same as Wheat.Field1.Oats.Yakov1
      Plant Potato
      Plant PlantainForage: same as Wheat.Field1.PlantainForage
      Plant Mustard: ResourceName=Canola
        Cultivar Mustard_sort
          Command:
            [Phenology].Vegetative.Target.XYPairs.X = 0, 25
            [Phenology].Vegetative.Target.XYPairs.Y = 210, 1
            [Phenology].StemElongation.Target.PPResponse.Amount.FixedValue = 180
            [Leaf].Phyllochron.Base.FixedValue = 55
      Plant Rape: ResourceName=Canola
        Cultivar Rape_sort
          Command:
            [Phenology].Vegetative.Target.XYPairs.X = 0, 25
            [Phenology].Vegetative.Target.XYPairs.Y = 290, 1
            [Phenology].StemElongation.Target.PPResponse.Amount.FixedValue = 240
            [Leaf].Phyllochron.Base.FixedValue = 65
      Manager RotationManager
        RotationCrops = RedClover+PlantainForage, Wheat, Oats+RedClover+PlantainForage, RedClover+PlantainForage, RedClover+PlantainForage
        RotationCultivars = LocalClover;TimothyProxy, Zlata, Yakov;LocalClover;TimothyProxy, LocalClover;TimothyProxy, LocalClover;TimothyProxy
        RotationSowingDepths = 10;10, 20, 20;10;10, 10;10, 10;10
        RotationRowSpacings = 150;150, 150, 150;150;150, 150;150, 150;150
        RotationPopulations = 450;300, 200, 250;150;150, 450;300, 450;300
        RotationSowingDates = -, 11-May, 18-May, -, -
        RotationHarvestDates = 15-Jul, 20-Aug, 31-Aug, 15-Jul, 15-Jul
        RotationHarvestCrops = RedClover+PlantainForage, Wheat, Oats, RedClover+PlantainForage, RedClover+PlantainForage
        RotationUses = hay, grain, grain, hay, hay
        PastureAges = 3, 0, 0, 1, 2
        TerminationDate = 20-Aug
        WinterDiebackDate = 01-Dec
        script: same as in Wheat.Field1.RotationManager
      Manager Fertilise at sowing: same as Wheat.Field3.Fertilise at sowing
      Manager Harvest (disabled): same as Wheat.Field1.Harvest
      Manager SWIMSetLowerBC: same as Wheat.Field1.SWIMSetLowerBC
      Manager Synchroniser (disabled): same as Wheat.Field1.Synchroniser
      Report HarvestReport: same as Wheat.Field1.HarvestReport
    Zone Field7: Area=1; Slope=0; AspectAngle=0; Altitude=50; CanopyType=BroadAcre
      Report Report7: same as Wheat.Field1.Report1
      Fertiliser
      Soil: ASCOrder=Vertosol; ASCSubOrder=Black; SoilType=Clay; Site=Norwin; NearestTown=Norwin; Region=Darling Downs and Granite Belt; State=Queensland; Country=Russia; NaturalVegetation=Qld. Bluegrass, possible Qld. Blue gum; ApsoilNumber=900; Latitude=56.77719; Longitude=56.11066; LocationAccuracy=+/- 20m; YearOfSampling=0
        DataSource=CSIRO Sustainable Ecosystems, Toowoomba; Characteriesd as part of the GRDC funded project"Doing it better, doing it smarter, managing soil water in Australian agriculture' 2011
        Comments=Clay - OC, CLL for all crops estimated-based on Bongeen Mywybilla Soil No1
        Organic: same as Wheat.Field1.Soil.Organic
        Chemical: Thickness=[150, 150, 300, 300, 300, 300, 300]; PH=[5.09, 5.09, 5, 5, 5, 5, 5]; PHUnits=Water
        Water: Thickness=[150, 150, 300, 300, 300, 300, 300]; FilledFromTop=false
          InitialValues=[0.297925, 0.274107, 0.30985, 0.3085, 0.307, 0.3052, 0.30505]
        Nutrient
        Solute NO3: same as Wheat.Field1.Soil.NO3
        Solute NH4: same as Wheat.Field1.Soil.NH4
        Solute Urea: same as Wheat.Field1.Soil.Urea
        SoilTemperature: InteractionsPerDay=8
        LayerStructure: Thickness=[150, 150, 300, 300, 300, 300, 300]
        Physical: same as Wheat.Field1.Soil.Physical
        Swim3: same as Wheat.Field1.Soil.Swim3
      SurfaceOrganicMatter: InitialResidueName=redclover_stubble; InitialResidueType=redclover; InitialResidueMass=500; InitialStandingFraction=0; InitialCPR=0; InitialCNR=100
      Plant RedClover: same as Wheat.Field1.RedClover
      Plant Wheat: same as Wheat.Field1.Wheat
      Plant Oats: same as Wheat.Field6.Oats
      Plant Potato
      Plant PlantainForage: same as Wheat.Field1.PlantainForage
      Plant Mustard: ResourceName=Canola
        Cultivar Mustard_sort
          Command:
            [Phenology].Vegetative.Target.XYPairs.X = 0, 25
            [Phenology].Vegetative.Target.XYPairs.Y = 210, 1
            [Phenology].StemElongation.Target.PPResponse.Amount.FixedValue = 180
            [Leaf].Phyllochron.Base.FixedValue = 55
      Plant Rape: ResourceName=Canola
        Cultivar Rape_sort
          Command:
            [Phenology].Vegetative.Target.XYPairs.X = 0, 25
            [Phenology].Vegetative.Target.XYPairs.Y = 290, 1
            [Phenology].StemElongation.Target.PPResponse.Amount.FixedValue = 240
            [Leaf].Phyllochron.Base.FixedValue = 65
      Manager RotationManager
        RotationCrops = Wheat, Rape, Wheat, Wheat, Oats+RedClover+PlantainForage
        RotationCultivars = Irgina, Rape_sort, Winter_rye_smoke, Zlata, Yakov;LocalClover;TimothyProxy
        RotationSowingDepths = 20, 20, 20, 20, 20;10;10
        RotationRowSpacings = 150, 200, 150, 150, 150;150;150
        RotationPopulations = 200, 45, 200, 200, 250;150;150
        RotationSowingDates = 7-May, 10-May, 8-Sep, 12-May, 4-May
        RotationHarvestDates = 9-Aug, 31-Aug, 31-Aug, 17-Aug, 31-Aug
        RotationHarvestCrops = Wheat, Rape, Wheat, Wheat, Oats
        RotationUses = grain, grain, grain, grain, grain
        PastureAges = 0, 0, 0, 0, 0
        TerminationDate = 20-Aug
        WinterDiebackDate = 01-Dec
        script: same as in Wheat.Field1.RotationManager
      Manager Fertilise at sowing: same as Wheat.Field3.Fertilise at sowing
      Manager Harvest (disabled): same as Wheat.Field1.Harvest
      Manager SWIMSetLowerBC: same as Wheat.Field1.SWIMSetLowerBC
      Manager Synchroniser (disabled): same as Wheat.Field1.Synchroniser
      Report HarvestReport: same as Wheat.Field1.HarvestReport
    Zone Field8: Area=1; Slope=0; AspectAngle=0; Altitude=50; CanopyType=BroadAcre
      Report Report8: same as Wheat.Field1.Report1
      Fertiliser
      Soil: same as Wheat.Field7.Soil
      SurfaceOrganicMatter: InitialResidueName=redclover_stubble; InitialResidueType=redclover; InitialResidueMass=500; InitialStandingFraction=0; InitialCPR=0; InitialCNR=100
      Plant RedClover: same as Wheat.Field1.RedClover
      Plant Wheat: same as Wheat.Field1.Wheat
      Plant Oats: same as Wheat.Field6.Oats
      Plant Potato
      Plant PlantainForage: same as Wheat.Field1.PlantainForage
      Plant Mustard: ResourceName=Canola
        Cultivar Mustard_sort
          Command:
            [Phenology].Vegetative.Target.XYPairs.X = 0, 25
            [Phenology].Vegetative.Target.XYPairs.Y = 210, 1
            [Phenology].StemElongation.Target.PPResponse.Amount.FixedValue = 180
            [Leaf].Phyllochron.Base.FixedValue = 55
      Plant Rape: ResourceName=Canola
        Cultivar Rape_sort
          Command:
            [Phenology].Vegetative.Target.XYPairs.X = 0, 25
            [Phenology].Vegetative.Target.XYPairs.Y = 290, 1
            [Phenology].StemElongation.Target.PPResponse.Amount.FixedValue = 240
            [Leaf].Phyllochron.Base.FixedValue = 65
      Manager RotationManager
        RotationCrops = RedClover+PlantainForage, RedClover+PlantainForage, Rape, Wheat, Wheat
        RotationCultivars = LocalClover;TimothyProxy, LocalClover;TimothyProxy, Rape_sort, Winter_rye_smoke, Zlata
        RotationSowingDepths = 10;10, 10;10, 20, 20, 20
        RotationRowSpacings = 150;150, 150;150, 200, 150, 150
        RotationPopulations = 450;300, 450;300, 45, 200, 200
        RotationSowingDates = -, -, 10-May, 9-Sep, 3-May
        RotationHarvestDates = 15-Jul, 15-Jul, 31-Aug, 31-Aug, 21-Aug
        RotationHarvestCrops = RedClover+PlantainForage, RedClover+PlantainForage, Rape, Wheat, Wheat
        RotationUses = hay, hay, grain, grain, grain
        PastureAges = 2, 3, 0, 0, 0
        TerminationDate = 20-Aug
        WinterDiebackDate = 01-Dec
        script: same as in Wheat.Field1.RotationManager
      Manager Fertilise at sowing: same as Wheat.Field3.Fertilise at sowing
      Manager Harvest (disabled): same as Wheat.Field1.Harvest
      Manager SWIMSetLowerBC: same as Wheat.Field1.SWIMSetLowerBC
      Manager Synchroniser (disabled): same as Wheat.Field1.Synchroniser
      Report HarvestReport: same as Wheat.Field1.HarvestReport
    Zone Field9: Area=1; Slope=0; AspectAngle=0; Altitude=50; CanopyType=BroadAcre
      Report Report9: same as Wheat.Field1.Report1
      Fertiliser
      Soil: ASCOrder=Vertosol; ASCSubOrder=Black; SoilType=Clay; Site=Norwin; NearestTown=Norwin; Region=Darling Downs and Granite Belt; State=Queensland; Country=Russia; NaturalVegetation=Qld. Bluegrass, possible Qld. Blue gum; ApsoilNumber=900; Latitude=56.77719; Longitude=56.11066; LocationAccuracy=+/- 20m; YearOfSampling=0
        DataSource=CSIRO Sustainable Ecosystems, Toowoomba; Characteriesd as part of the GRDC funded project"Doing it better, doing it smarter, managing soil water in Australian agriculture' 2011
        Comments=Clay - OC, CLL for all crops estimated-based on Bongeen Mywybilla Soil No1
        Organic: same as Wheat.Field1.Soil.Organic
        Chemical: Thickness=[150, 150, 300, 300, 300, 300, 300]; PH=[5.09, 5.09, 5, 5, 5, 5, 5]; PHUnits=Water
        Water: Thickness=[150, 150, 300, 300, 300, 300, 300]; FilledFromTop=false
          InitialValues=[0.347825, 0.308435, 0.34965, 0.3465, 0.343, 0.3388, 0.33845]
        Nutrient
        Solute NO3: same as Wheat.Field1.Soil.NO3
        Solute NH4: same as Wheat.Field1.Soil.NH4
        Solute Urea: same as Wheat.Field1.Soil.Urea
        SoilTemperature: InteractionsPerDay=8
        LayerStructure: Thickness=[150, 150, 300, 300, 300, 300, 300]
        Physical: same as Wheat.Field1.Soil.Physical
        Swim3: same as Wheat.Field1.Soil.Swim3
      SurfaceOrganicMatter: InitialResidueName=redclover_stubble; InitialResidueType=redclover; InitialResidueMass=500; InitialStandingFraction=0; InitialCPR=0; InitialCNR=100
      Plant RedClover: same as Wheat.Field1.RedClover
      Plant Wheat: same as Wheat.Field4.Wheat
      Plant Oats: same as Wheat.Field4.Oats
      Plant Potato
      Plant PlantainForage: same as Wheat.Field1.PlantainForage
      Plant Mustard: ResourceName=Canola
        Cultivar Mustard_sort
          Command:
            [Phenology].Vegetative.Target.XYPairs.X = 0, 25
            [Phenology].Vegetative.Target.XYPairs.Y = 210, 1
            [Phenology].StemElongation.Target.PPResponse.Amount.FixedValue = 180
            [Leaf].Phyllochron.Base.FixedValue = 55
      Plant Rape: ResourceName=Canola
        Cultivar Rape_sort
          Command:
            [Phenology].Vegetative.Target.XYPairs.X = 0, 25
            [Phenology].Vegetative.Target.XYPairs.Y = 290, 1
            [Phenology].StemElongation.Target.PPResponse.Amount.FixedValue = 240
            [Leaf].Phyllochron.Base.FixedValue = 65
      Manager RotationManager
        RotationCrops = Oats+RedClover, Mustard, Rape, Mustard, Wheat
        RotationCultivars = Yakov;LocalClover, Mustard_sort, Rape_sort, Mustard_sort, Winter_rye_smoke
        RotationSowingDepths = 20;10, 20, 20, 20, 20
        RotationRowSpacings = 150;150, 200, 200, 200, 150
        RotationPopulations = 200;150, 45, 45, 45, 200
        RotationSowingDates = 10-May, 10-May, 10-May, 10-May, 10-Sep
        RotationHarvestDates = 15-Jul, 31-Aug, 31-Aug, 31-Aug, 31-Aug
        RotationHarvestCrops = Oats+RedClover, Mustard, Rape, Mustard, Wheat
        RotationUses = green, grain, grain, grain, grain
        PastureAges = 0, 0, 0, 0, 0
        TerminationDate = 20-Aug
        WinterDiebackDate = 01-Dec
        script: same as in Wheat.Field1.RotationManager
      Manager Fertilise at sowing: same as Wheat.Field3.Fertilise at sowing
      Manager Harvest (disabled): same as Wheat.Field1.Harvest
      Manager SWIMSetLowerBC: same as Wheat.Field1.SWIMSetLowerBC
      Manager Synchroniser (disabled): same as Wheat.Field1.Synchroniser
      Report HarvestReport: same as Wheat.Field1.HarvestReport
    Zone Field10: Area=1; Slope=0; AspectAngle=0; Altitude=50; CanopyType=BroadAcre
      Report Report10: same as Wheat.Field1.Report1
      Fertiliser
      Soil: same as Wheat.Field7.Soil
      SurfaceOrganicMatter: InitialResidueName=redclover_stubble; InitialResidueType=redclover; InitialResidueMass=500; InitialStandingFraction=0; InitialCPR=0; InitialCNR=100
      Plant RedClover: same as Wheat.Field1.RedClover
      Plant Wheat: same as Wheat.Field1.Wheat
      Plant Oats: same as Wheat.Field6.Oats
      Plant Potato
      Plant PlantainForage: same as Wheat.Field1.PlantainForage
      Plant Mustard: ResourceName=Canola
        Cultivar Mustard_sort
          Command:
            [Phenology].Vegetative.Target.XYPairs.X = 0, 25
            [Phenology].Vegetative.Target.XYPairs.Y = 210, 1
            [Phenology].StemElongation.Target.PPResponse.Amount.FixedValue = 180
            [Leaf].Phyllochron.Base.FixedValue = 55
      Plant Rape: ResourceName=Canola
        Cultivar Rape_sort
          Command:
            [Phenology].Vegetative.Target.XYPairs.X = 0, 25
            [Phenology].Vegetative.Target.XYPairs.Y = 290, 1
            [Phenology].StemElongation.Target.PPResponse.Amount.FixedValue = 240
            [Leaf].Phyllochron.Base.FixedValue = 65
      Manager RotationManager
        RotationCrops = RedClover+PlantainForage, Mustard, Wheat, Oats+RedClover+PlantainForage, RedClover+PlantainForage
        RotationCultivars = LocalClover;TimothyProxy, Mustard_sort, Zlata, Yakov;LocalClover;TimothyProxy, LocalClover;TimothyProxy
        RotationSowingDepths = 10;10, 20, 20, 20;10;10, 10;10
        RotationRowSpacings = 150;150, 150, 150, 150;150;150, 150;150
        RotationPopulations = 450;300, 200, 200, 250;150;150, 450;300
        RotationSowingDates = -, 10-May, 18-May, 12-May, -
        RotationHarvestDates = 15-Jul, 31-Aug, 16-Aug, 31-Aug, 15-Jul
        RotationHarvestCrops = RedClover+PlantainForage, Mustard, Wheat, Oats, RedClover+PlantainForage
        RotationUses = hay, grain, grain, grain, hay
        PastureAges = 3, 0, 0, 0, 1
        TerminationDate = 20-Aug
        WinterDiebackDate = 01-Dec
        script: same as in Wheat.Field1.RotationManager
      Manager Fertilise at sowing
        FertiliserTypes = NH4NO3N, NH4NO3N, NH4NO3N, NH4NO3N, NH4NO3N
        FertiliserAmounts = 60, 60, 60, 60, 60
        ApplyAtCrops = Wheat, Oats, Mustard, Rape
        script: same as in Wheat.Field1.Fertilise at sowing
      Manager Harvest (disabled): same as Wheat.Field1.Harvest
      Manager SWIMSetLowerBC: same as Wheat.Field1.SWIMSetLowerBC
      Manager Synchroniser (disabled): same as Wheat.Field1.Synchroniser
      Report HarvestReport: same as Wheat.Field1.HarvestReport
  DataStore
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