Simulations: Version=221
  Simulation
    Clock: Start=2021-01-01; End=2021-12-31
    Summary
    Weather
      FileName=C:/Users/user/Desktop/soil_project/bmi_apsim_pinn/weather/weather_2021_normalized.met
    SoilArbitrator
    MicroClimate: a_interception=0; b_interception=1; c_interception=0; d_interception=0; SoilHeatFluxFraction=0.4; MinimumHeightDiffForNewLayer=0; NightInterceptionFraction=0.5; ReferenceHeight=2
    Zone Field4: Area=0.2; Slope=0; AspectAngle=0; Altitude=50; CanopyType=BroadAcre
      Report Report4: EventNames=[Clock].EndOfDay
        VariableNames:
          [Clock].Today
          [Wheat].LAI as WheatLAI
          [Wheat].Phenology.Zadok.Stage as WheatZadok
          [Wheat].Phenology.CurrentStageName as WheatStage
          [Wheat].AboveGround.Wt as WheatAGWt
          [Wheat].AboveGround.N as WheatAGN
          [Wheat].Grain.Total.Wt*10 as WheatYield
          [Wheat].Grain.Protein as WheatProtein
          [Wheat].Grain.Size as WheatSize
          [Wheat].Grain.Number as WheatNumber
          [Wheat].Grain.Total.Wt as WheatGrainWt
          [Wheat].Grain.Total.N as WheatGrainN
          [Wheat].Total.Wt as WheatTotalWt
          [RedClover].LAI as CloverLAI
          [RedClover].Phenology.CurrentStageName as CloverStage
          [RedClover].AboveGround.Wt as CloverAGWt
          [RedClover].AboveGround.N as CloverAGN
          [RedClover].Total.Wt as CloverTotalWt
          [PlantainForage].LAI as PlantainLAI
          [PlantainForage].AboveGround.Wt as PlantainAGWt
          [PlantainForage].AboveGround.N as PlantainAGN
          [PlantainForage].Total.Wt as PlantainTotalWt
          [Oats].LAI as OatsLAI
          [Oats].Phenology.Zadok.Stage as OatsZadok
          [Oats].Phenology.CurrentStageName as OatsStage
          [Oats].AboveGround.Wt as OatsAGWt
          [Oats].AboveGround.N as OatsAGN
          [Oats].Grain.Total.Wt*10 as OatsYield
          [Oats].Grain.Total.Wt as OatsGrainWt
          [Oats].Total.Wt as OatsTotalWt
          [Soil].Swim3.Drainage as Drainage
          [Soil].Swim3.Runoff as Runoff
          [Soil].Swim3.Pond as PondDepth
          [Soil].Swim3.PAW as PAW
          sum([Soil].Water.MM) as WaterStored
          [Soil].Water.Volumetric as SW
          sum([NO3].kgha + [NH4].kgha + [Urea].kgha) as MineralN
          [Denitrification].Value + [Denitrification].Natm as Denitrification
          sum([Nutrient].Organic.C) as OrganicC
      Fertiliser
      Soil: ASCOrder=Vertosol; ASCSubOrder=Black; SoilType=Clay; Site=Norwin; NearestTown=Norwin; Region=Darling Downs and Granite Belt; State=Queensland; Country=Russia; NaturalVegetation=Qld. Bluegrass, possible Qld. Blue gum; ApsoilNumber=900; Latitude=56.77719; Longitude=56.11066; LocationAccuracy=+/- 20m; YearOfSampling=0
        DataSource=CSIRO Sustainable Ecosystems, Toowoomba; Characteriesd as part of the GRDC funded project"Doing it better, doing it smarter, managing soil water in Australian agriculture' 2011
        Comments=Clay - OC, CLL for all crops estimated-based on Bongeen Mywybilla Soil No1
        Organic: FOMCNRatio=30; CarbonUnits=Total
          Thickness  Carbon  SoilCNRatio  FBiom  FInert  FOM
          150        1.44    12           0.06   0.35    347.129
          150        1.16    12           0.04   0.55    270.344
          300        1.04    12           0.03   0.75    163.972
          300        0.93    12           0.02   1       99.4541
          300        0.81    12           0.01   1       60.322
          300        0.73    12           0.01   1       36.5871
          300        0.5     12           0.01   1       22.1912
        Chemical: Thickness=[150, 150, 300, 300, 300, 300, 300]; PH=[5.09, 5.09, 5, 5, 5, 5, 5]; PHUnits=Water
        Water: Thickness=[150, 150, 300, 300, 300, 300, 300]; InitialValues=[0.33535, 0.299853, 0.3397, 0.337, 0.334, 0.3304, 0.3301]; FilledFromTop=false
        Nutrient
        Solute NO3: InitialValuesUnits=ppm; WaterTableConcentration=0; D0=0; DepthConstant=0; MaxDepthSoluteAccessible=0; RunoffEffectivenessAtMovingSolute=0; MaxEffectiveRunoff=0
          Thickness  InitialValues  Exco  FIP
          150        4              0     1
          150        3.5            0     1
          300        3              0     1
          300        2              0     1
          300        1.5            0     1
          300        1              0     1
          300        0.5            0     1
        Solute NH4: InitialValuesUnits=ppm; WaterTableConcentration=0; D0=0.05; DepthConstant=0; MaxDepthSoluteAccessible=0; RunoffEffectivenessAtMovingSolute=0; MaxEffectiveRunoff=0
          Thickness  InitialValues  Exco  FIP
          150        1              0     1
          150        0.8            0     1
          300        0.5            0     1
          300        0.3            0     1
          300        0.2            0     1
          300        0.1            0     1
          300        0.05           0     1
        Solute Urea: InitialValuesUnits=kg/ha; WaterTableConcentration=0; D0=0.05; DepthConstant=0; MaxDepthSoluteAccessible=0; RunoffEffectivenessAtMovingSolute=0; MaxEffectiveRunoff=0
          Thickness  InitialValues  Exco  FIP
          150        0              0     1
          150        0              0     1
          300        0              0     1
          300        0              0     1
          300        0              0     1
          300        0              0     1
          300        0              0     1
        SoilTemperature: InteractionsPerDay=8
        LayerStructure: Thickness=[150, 150, 300, 300, 300, 300, 300]
        CERESSoilTemperature Temperature0
        Physical
          Thickness  ParticleSizeSand  ParticleSizeSilt  ParticleSizeClay  Rocks  BD    AirDry    LL15      DUL    SAT    KS
          150        52.31             33.03             14.66             0      1.19  0.13025   0.2605    0.51   0.515  20
          150        81.61             10.68             7.71              0      1.25  0.198689  0.248362  0.42   0.487  20
          300        40                30                30                0      1.3   0.28      0.28      0.479  0.48   20
          300        40                30                30                0      1.35  0.28      0.28      0.47   0.472  20
          300        40                30                30                0      1.35  0.28      0.28      0.46   0.464  20
          300        40                30                30                0      1.35  0.28      0.28      0.448  0.449  20
          300        40                30                30                0      1.35  0.28      0.28      0.447  0.452  20
          SoilCrop WheatSoil: LL=[0.261, 0.248, 0.28, 0.28, 0.28, 0.28, 0.28]; KL=[0.06, 0.06, 0.06, 0.04, 0.04, 0.02, 0.01]; XF=[1, 1, 1, 1, 1, 1, 1]
          SoilCrop BarleySoil: LL=[0.261, 0.248, 0.28, 0.28, 0.28, 0.28, 0.28]; KL=[0.06, 0.06, 0.06, 0.04, 0.04, 0.02, 0.01]; XF=[1, 1, 1, 1, 1, 1, 1]
          SoilCrop RedCloverSoil: LL=[0.261, 0.248, 0.28, 0.28, 0.28, 0.28, 0.28]; KL=[0.06, 0.06, 0.06, 0.05, 0.05, 0.03, 0.02]; XF=[1, 1, 1, 1, 1, 1, 1]
          SoilCrop PlantainForageSoil: LL=[0.261, 0.248, 0.28, 0.28, 0.28, 0.28, 0.28]; KL=[0.06, 0.06, 0.06, 0.045, 0.04, 0.02, 0.01]; XF=[1, 1, 1, 1, 0.8, 0.5, 0.2]
          SoilCrop OatsSoil: LL=[0.261, 0.248, 0.28, 0.28, 0.28, 0.28, 0.28]; KL=[0.06, 0.06, 0.06, 0.04, 0.03, 0.015, 0.005]; XF=[1, 1, 1, 1, 0.8, 0.3, 0.1]
          SoilCrop PotatoSoil: LL=[0.261, 0.248, 0.28, 0.28, 0.28, 0.28, 0.28]; KL=[0.09, 0.08, 0.06, 0.04, 0.02, 0.01, 0.005]; XF=[1, 1, 1, 1, 1, 1, 1]
          SoilCrop MustardSoil: LL=[0.261, 0.248, 0.28, 0.28, 0.28, 0.28, 0.28]; KL=[0.09, 0.08, 0.06, 0.04, 0.02, 0.01, 0.005]; XF=[1, 1, 1, 1, 1, 1, 1]
          SoilCrop RapeSoil: LL=[0.261, 0.248, 0.28, 0.28, 0.28, 0.28, 0.28]; KL=[0.09, 0.08, 0.06, 0.04, 0.02, 0.01, 0.005]; XF=[1, 1, 1, 1, 1, 1, 1]
        Swim3: hydrol_effective_depth=450; hydrol_effective_exponent=4.16; Salb=0.13; CN2Bare=50; CNRed=20; CNCov=0.8; KDul=150; PSIDul=-100; VC=true; DTMin=0; DTMax=60; MaxWaterIncrement=5; SpaceWeightingFactor=0.5; SoluteSpaceWeightingFactor=1; Dis=1; Disp=1; A=2; DTHC=0.1; DTHP=2; vcon1=7.28e-09; vcon2=7.26e-07; eo_time=06:00; eo_durn=720; default_rain_time=00:00; default_rain_duration=720; Diagnostics=false
        CERESSoilTemperature Temperature
      SurfaceOrganicMatter: InitialResidueName=redclover_stubble; InitialResidueType=redclover; InitialResidueMass=500; InitialStandingFraction=0; InitialCPR=0; InitialCNR=100
      Plant RedClover
      Plant Wheat
        Cultivar Zlata
          Command:
            [Phenology].HeadEmergencePpSensitivity.FixedValue = 2.0
            [Phenology].Phyllochron.BasePhyllochron.FixedValue = 70
            [Leaf].ExtinctionCoeff.VegetativePhase.FixedValue = 0.8
            [Phenology].PhyllochronPpSensitivity.FixedValue = 0.4
            [Phenology].CAMP.FLNparams.MinLN = 5.5
            [Phenology].CAMP.FLNparams.PpLN = 2.5
            [Phenology].CAMP.FLNparams.VrnLN = 7
            [Phenology].CAMP.FLNparams.VxPLN = 0.0
            [Phenology].GrainFilling.Target.FixedValue = 250
            [Phenology].GrainRipening.Target.FixedValue = 100
        Cultivar Irgina
          Command:
            [Phenology].HeadEmergencePpSensitivity.FixedValue = 2.0
            [Phenology].Phyllochron.BasePhyllochron.FixedValue = 50
            [Leaf].ExtinctionCoeff.VegetativePhase.FixedValue = 0.8
            [Phenology].PhyllochronPpSensitivity.FixedValue = 0.4
            [Phenology].CAMP.FLNparams.MinLN = 5
            [Phenology].CAMP.FLNparams.PpLN = 2.5
            [Phenology].CAMP.FLNparams.VrnLN = 7
            [Phenology].CAMP.FLNparams.VxPLN = 0.0
            [Phenology].GrainFilling.Target.FixedValue = 225
            [Phenology].GrainRipening.Target.FixedValue = 100
        Cultivar winter_rye_smoke
      Plant Oats
      Plant Potato
      Plant PlantainForage
      Manager Sow using a variable rule
        RotationCrops = Wheat
        RotationCultivars = Zlata
        RotationSowingDepths = 20
        RotationRowSpacings = 150
        RotationPopulations = 200
        RotationSowingDates = 10-May
        RotationHarvestDates = 31-Aug
```csharp
using APSIM.Shared.Utilities;
using Models.Core;
using Models.PMF;
using System;
using System.Collections.Generic;
using System.Globalization;
using System.Linq;

namespace Models
{
    [Serializable]
    public class Script : Model
    {
        [Link] private Clock Clock;
        [Link] private Summary Summary;
        [Link(ByName = true)] private Plant Wheat;
        [Link(ByName = true)] private Plant RedClover;
        [Link(ByName = true)] private Plant PlantainForage;
        [Link(ByName = true)] private Plant Oats;
        [Link(ByName = true)] private Plant Potato;

        [Description("Crop names in rotation order (e.g. Wheat, Maize, Canola)")]
        public string[] RotationCrops { get; set; }
        [Description("Cultivar for each crop in rotation (same order)")]
        public string[] RotationCultivars { get; set; }
        [Description("Sowing depth for each crop (mm)")]
        public string[] RotationSowingDepths { get; set; }
        [Description("Row spacing for each crop (mm)")]
        public string[] RotationRowSpacings { get; set; }
        [Description("Population for each crop (/m2)")]
        public string[] RotationPopulations { get; set; }
        [Description("Sowing date for each crop (d-mmm; dash for perennial carry-over)")]
        public string[] RotationSowingDates { get; set; }
        [Description("Harvest or cut date for each crop (d-mmm)")]
        public string[] RotationHarvestDates { get; set; }

        private Dictionary<string, IPlant> plants;
        private int startYear;

        [EventSubscribe("StartOfSimulation")]
        private void OnSimulationCommencing(object sender, EventArgs e)
        {
            startYear = Clock.StartDate.Year;
            plants = new Dictionary<string, IPlant>(StringComparer.OrdinalIgnoreCase)
            {
                { "Wheat", Wheat }, { "RedClover", RedClover },
                { "PlantainForage", PlantainForage }, { "Oats", Oats },
                { "Potato", Potato }
            };
            ValidateArrays();

            int index = IndexForYear(Clock.Today.Year);
            if (Clock.Today == Clock.StartDate && index >= 0 && index < RotationCrops.Length &&
                (IsPurePerennial(index) || IsWinterCrop(index)))
                SowGroup(index, "startup approximation: crop established before available weather record");
        }

        [EventSubscribe("DoManagement")]
        private void OnDoManagement(object sender, EventArgs e)
        {
            int index = IndexForYear(Clock.Today.Year);
            if (index < 0 || index >= RotationCrops.Length)
                return;

            if (!IsWinterCrop(index) && !IsPurePerennial(index) && DateMatches(RotationSowingDates[index]))
            {
                EndPlantsNotIn(index);
                SowGroup(index, "scheduled sowing");
            }

            if (DateMatches(RotationHarvestDates[index]))
                HarvestGroup(index);

            int next = index + 1;
            if (next < RotationCrops.Length && IsWinterCrop(next) && DateMatches(RotationSowingDates[next]))
            {
                EndPlantsNotIn(next);
                SowGroup(next, "autumn sowing for next harvest year");
            }

            if (Clock.Today.Month == 12 && Clock.Today.Day == 31)
            {
                if (next < RotationCrops.Length)
                    EndPlantsNotIn(next);
                else
                    EndAllPlants();
            }
        }

        private int IndexForYear(int year) => year - startYear;

        private void ValidateArrays()
        {
            int n = RotationCrops.Length;
            if (new[] { RotationCultivars.Length, RotationSowingDepths.Length,
                        RotationRowSpacings.Length, RotationPopulations.Length,
                        RotationSowingDates.Length, RotationHarvestDates.Length }.Any(x => x != n))
                throw new Exception("All rotation and calendar arrays must have the same length.");
        }

        private bool DateMatches(string dayMonth)
        {
            if (string.IsNullOrWhiteSpace(dayMonth) || dayMonth == "-")
                return false;
            return DateUtilities.WithinDates(dayMonth, Clock.Today, dayMonth);
        }

        private string[] Parts(string value, char separator) =>
            value.Split(separator).Select(x => x.Trim()).ToArray();

        private bool IsPerennial(string crop) =>
            crop.Equals("RedClover", StringComparison.OrdinalIgnoreCase) ||
            crop.Equals("PlantainForage", StringComparison.OrdinalIgnoreCase);

        private bool IsPurePerennial(int index) => Parts(RotationCrops[index], '+').All(IsPerennial);

        private bool IsWinterCrop(int index) =>
            RotationCrops[index].IndexOf("Wheat", StringComparison.OrdinalIgnoreCase) >= 0 &&
            RotationCultivars[index].IndexOf("Winter_rye", StringComparison.OrdinalIgnoreCase) >= 0;

        private void SowGroup(int index, string reason)
        {
            string[] crops = Parts(RotationCrops[index], '+');
            string[] cultivars = Parts(RotationCultivars[index], ';');
            string[] depths = Parts(RotationSowingDepths[index], ';');
            string[] spacings = Parts(RotationRowSpacings[index], ';');
            string[] populations = Parts(RotationPopulations[index], ';');
            for (int i = 0; i < crops.Length; i++)
            {
                IPlant plant = plants[crops[i]];
                if (plant.IsAlive)
                    continue;
                string cultivar = i < cultivars.Length ? cultivars[i] : "Default";
                double depth = double.Parse(i < depths.Length ? depths[i] : "20", CultureInfo.InvariantCulture);
                double spacing = double.Parse(i < spacings.Length ? spacings[i] : "150", CultureInfo.InvariantCulture);
                double population = double.Parse(i < populations.Length ? populations[i] : "200", CultureInfo.InvariantCulture);
                plant.Sow(population: population, cultivar: cultivar, depth: depth, rowSpacing: spacing);
                Summary.WriteMessage(this, $"Sowed {crops[i]} ({cultivar}) on {Clock.Today:d}: {reason}", MessageType.Information);
            }
        }

        private void HarvestGroup(int index)
        {
            foreach (string crop in Parts(RotationCrops[index], '+'))
            {
                IPlant plant = plants[crop];
                if (!plant.IsAlive)
                    continue;
                plant.Harvest();
                if (!IsPerennial(crop))
                    plant.EndCrop();
            }
            Summary.WriteMessage(this, $"Scheduled harvest/cut on {Clock.Today:d}", MessageType.Information);
        }

        private void EndPlantsNotIn(int index)
        {
            HashSet<string> keep = new HashSet<string>(Parts(RotationCrops[index], '+'), StringComparer.OrdinalIgnoreCase);
            foreach (KeyValuePair<string, IPlant> item in plants)
                if (item.Value.IsAlive && !keep.Contains(item.Key))
                    item.Value.EndCrop();
        }

        private void EndAllPlants()
        {
            foreach (IPlant plant in plants.Values)
                if (plant.IsAlive)
                    plant.EndCrop();
        }
    }
}
```
      Manager Fertilise at sowing
        Crop = [Wheat]
        FertiliserType = NO3N
        Amount = 60
```csharp
using Models.Soils;
using System;
using System.Linq;
using Models.Core;
using Models.PMF;
namespace Models
{
    [Serializable]
    public class Script : Model
    {
        [Link] Clock Clock;
        [Link] Fertiliser Fertiliser;
        
        [Description("Crop to be fertilised")]
        public IPlant Crop { get; set; }

        [Description("Type of fertiliser to apply? ")] 
        [Display(Type = DisplayType.FertiliserType)]public string FertiliserType { get; set; }
    
        [Description("Amount of fertiliser to be applied (kg/ha)")]
        public double Amount { get; set; }
        
        [EventSubscribe("Sowing")]
        private void OnSowing(object sender, EventArgs e)
        {
            Model crop = sender as Model;
            if (Crop != null && crop.Name.ToLower() == (Crop as IModel).Name.ToLower())
                Fertiliser.Apply(amount: Amount, type: FertiliserType);
        }
    }
}
```
      Manager Harvest
        Crop = [Wheat]
```csharp
using APSIM.Shared.Utilities;
using Models.Utilities;
using Models.Soils;
using Models.PMF;
using Models.Core;
using System;
using System.Linq;

namespace Models
{
    [Serializable] 
    public class Script : Model
    {
        [Description("Crop")]
        public IPlant Crop { get; set; }
        
        [EventSubscribe("DoManagement")]
        private void OnDoManagement(object sender, EventArgs e)
        {
            if (Crop.IsReadyForHarvesting)
            {
                Crop.Harvest();
                Crop.EndCrop();
            }
        }
    }
}
```
      Manager SWIMSetLowerBC
        LowerBCType = seepage
        LowerBCValue = -500
```csharp
using Models.Climate;
using APSIM.Shared.Utilities;
using Models.Soils.Nutrients;
using Models.Soils;
using Models.PMF;
using Models.Core;
using System.Xml.Serialization;
using System;
using System.Linq;
using Models.AgPasture;
using Models.Interfaces;

namespace Models
{
    [Serializable] 
    [System.Xml.Serialization.XmlInclude(typeof(Model))]
    public class Script : Model
    {
        [Link] Clock clock;
        [Link] ISummary summary;
        [Link] private Swim3 swim;
        //[Link] private PastureSpecies ryegrass;
        //[Link] private SimpleGrazing grazing;
        
        public enum LowerBCTypeOptions {gradient,seepage,potential};

        [Separator("Sets the lower boundary condition type (and value if set to 'potential' for SWIM3. The change is applied at the beginning of the first day of the simulation.")]
        [Description("[Get a dropdown] What lower boundary condition is wanted?")] public LowerBCTypeOptions LowerBCType { get; set; }
        [Description("If 'potential', then what potential? (mm) ")] public double LowerBCValue { get; set; }

        public double SoilWaterStart  { get; set; }
        public double SoilWaterEnd  { get; set; }

        [EventSubscribe("DoDailyInitialisation")]
        private void DoDailyInitialisation(object sender, EventArgs e)
        {
        }

        [EventSubscribe("DoReportCalculations")]
        private void DoReportCalculations(object sender, EventArgs e)
        {
        }

        [EventSubscribe("DoManagement")]
        private void DoDailyCalculations(object sender, EventArgs e)
        {
            if (clock.Today == clock.StartDate)
            {
                summary.WriteMessage(this, "Script is setting lower boundary condition to " + LowerBCType, MessageType.Diagnostic);
                if (LowerBCType == LowerBCTypeOptions.gradient)
                    swim.SetLowerBCForGradient(bbcGradient: 0.0);   // in cm/cm (ibbc=0) Note that this is the default setting
                else if (LowerBCType == LowerBCTypeOptions.potential)
                    swim.SetLowerBCForGivenPotential(bbcPotential: LowerBCValue /10.0 );    //  convert to cm (ibbc=1), DUL is -100 cm so values more positive will often result in inflow to the bottom of the soil profile. Input in mm so divide here.
                else if (LowerBCType == LowerBCTypeOptions.seepage)
                    swim.SetLowerBCForSeepage(bbcPotentialSeepage: 0.0);  // in cm (ibbc=3). This is for zero-tension lysimeters
                else
                    throw new Exception("Wrong lower boundary condition type");
            }
        }
    }
}
```
      Manager Synchroniser
        Identifier = <undefined>
```csharp
using APSIM.Core;
using APSIM.Shared.Utilities;
using NetMQ.Sockets;
using NetMQ;
using System.Collections.Generic;
using System.IO;
using MessagePack;
using Models.Functions;
using Models.Utilities;
using Models.Surface;
using Models.Soils;
using Models.PMF;
using Models.Core;
using System;
using System.Linq;
using Models.Soils.Nutrients;

namespace Models
{
    [Serializable]
    public class Script : Model, IStructureDependency
    {
        [Link] private Clock clock;
        [Link] private Simulation simulation;
        [Link] private Summary Summary;
        [NonSerialized] private DealerSocket connection;
        public IStructure Structure { private get; set; }

        [Description("Identifier")]
        public string Identifier { get; set; }

        [NonSerialized] private bool pausedAfterWaterToday = false;

        

        [EventSubscribe("StartOfSimulation")]
        private void OnSimulationCommencing(object sender, EventArgs e)
        {
            if (Identifier == "<undefined>")
            {
                Console.WriteLine("Need an endpoint to connect to");
                Summary.WriteMessage(this, "Need an endpoint to connect to", MessageType.Error);
                return;
            }
            Identifier = "tcp://" + Identifier;
            connection = new DealerSocket(Identifier);
            connection.SendFrame("connect");
            var msg = connection.ReceiveFrameString();
            if (msg != "ok") throw new Exception("Expected ok");
        }

        [EventSubscribe("StartOfDay")]
        private void OnStartOfDay(object s, EventArgs e) => pausedAfterWaterToday = false;

        // --- Пауза сразу после DoSoilWaterMovement ---
        [EventSubscribe("DoSoilWaterMovement")]
        private void OnAfterSoilWaterMovement(object s, EventArgs e)
        {
            if (connection == null || pausedAfterWaterToday) return;
            pausedAfterWaterToday = true;

            connection.SendFrame("paused1");
            bool moreToDo = true;
            while (moreToDo)
            {
                var msg = connection.ReceiveMultipartMessage();
                if (msg == null || msg.FrameCount == 0) continue;

                var command = msg[0].ConvertToString();
                switch (command)
                {
                    case "resume1":
                        moreToDo = false;
                        break;
                    case "put":
                        RequireParts(msg, 3, "put");
                        ProcessPutCommand(msg);
                        break;
                    case "get":
                        RequireParts(msg, 2, "get");
                        ProcessReadCommand(msg);
                        break;
                    default:
                        throw new Exception("Expected resume1/get/put/do during paused1, not '" + command + "'");
                }
            }
            Summary?.WriteMessage(this, "Resumed after paused1", MessageType.Information);
        }

        [EventSubscribe("EndOfDay")]
        private void OnEndOfDay(object sender, EventArgs e)
        {
            if (connection == null) return;

            connection.SendFrame("paused");
            bool moreToDo = true;
            while (moreToDo)
            {
                var msg = connection.ReceiveMultipartMessage();
                if (msg == null || msg.FrameCount == 0) continue;

                var command = msg[0].ConvertToString();
                switch (command)
                {
                    case "resume":
                        moreToDo = false;
                        break;
                    case "put":
                        RequireParts(msg, 3, "put");
                        ProcessPutCommand(msg);
                        break;
                    case "get":
                        RequireParts(msg, 2, "get");
                        ProcessReadCommand(msg);
                        break;
                    default:
                        throw new Exception("Expected resume/get/put, not '" + command + "'");
                }
            }
        }

        [EventSubscribe("EndOfSimulation")]
        private void OnSimulationEnding(object sender, EventArgs e)
        {
            if (connection == null) return;

            connection.SendFrame("finished");
            var msg = connection.ReceiveFrameString();
            if (msg != "ok") throw new Exception("Expected ok at end");
            connection.Close();
            Console.WriteLine("Simulation Ending");
        }

        // ==========================
        //        Общие методы
        // ==========================

        private void ProcessPutCommand(NetMQMessage msg)
        {
            // msg[1] — packed string variableName; msg[2] — packed object value
            string variableName = MessagePackSerializer.Deserialize<string>(msg[1].Buffer);

            // Что за тип у переменной в APSIM
            var targetObj = Structure.Get(variableName, relativeTo: simulation);
            if (targetObj == null)
                throw new Exception($"Variable '{variableName}' not found in simulation.");
            var targetType = targetObj.GetType();

            object incoming = MessagePackSerializer.Deserialize<object>(msg[2].Buffer);

            // Проверка согласованности массив/скаляр
            if (incoming.GetType().IsArray != targetType.IsArray)
                throw new Exception("Array/scalar mismatch for " + variableName);

            if (targetType.IsArray)
            {
                Type elemType = targetType.GetElementType();
                var incomingArray = (incoming as object[]) ?? throw new Exception("Expected array payload for " + variableName);

                if (IsNumeric(elemType))
                {
                    var casted = Array.ConvertAll(incomingArray, e => (double)e);
                    Structure.Set(variableName, casted, relativeTo: simulation);
                }
                else if (IsInteger(elemType))
                {
                    var casted = Array.ConvertAll(incomingArray, e => (int)e);
                    Structure.Set(variableName, casted, relativeTo: simulation);
                }
                else if (IsString(elemType))
                {
                    var casted = Array.ConvertAll(incomingArray, e => (string)e);
                    Structure.Set(variableName, casted, relativeTo: simulation);
                }
                else
                {
                    throw new Exception("Don't know what to do setting an array of " + elemType);
                }
            }
            else
            {
                Structure.Set(variableName, Convert.ChangeType(incoming, targetType), relativeTo: simulation);
            }

            connection.SendFrame("ok");
        }

        private void ProcessReadCommand(NetMQMessage msg)
        {
            // msg[1] — packed string variableName
            string variableName = MessagePackSerializer.Deserialize<string>(msg[1].Buffer);

            object value = Structure.Get(variableName, relativeTo: simulation);

            if (value is IFunction fun)
            {
                value = fun.Value();
            }
            else if (value != null && (value.GetType().IsArray || value.GetType().IsClass))
            {
                try
                {
                    value = ReflectionUtilities.Clone(value);
                }
                catch (Exception err)
                {
                    throw new Exception(
                        $"Cannot report variable \"{variableName}\": Variable is a non-reportable type: \"{value?.GetType()?.Name}\".", err);
                }
            }

            byte[] bytes = MessagePackSerializer.Serialize(value ?? "NA");
            connection.SendFrame(bytes);
        }

        private static void RequireParts(NetMQMessage msg, int expected, string cmd)
        {
            if (msg.FrameCount != expected)
                throw new Exception($"Command '{cmd}' expects {expected} frames, got {msg.FrameCount}.");
        }

        private static bool IsNumeric(Type type)
        {
            switch (Type.GetTypeCode(type))
            {
                case TypeCode.Double:
                case TypeCode.Single:
                    return true;
                default:
                    return false;
            }
        }

        private static bool IsInteger(Type type)
        {
            switch (Type.GetTypeCode(type))
            {
                case TypeCode.Int16:
                case TypeCode.Int32:
                case TypeCode.Int64:
                case TypeCode.UInt16:
                case TypeCode.UInt32:
                case TypeCode.UInt64:
                    return true;
                default:
                    return false;
            }
        }

        private static bool IsString(Type type) => Type.GetTypeCode(type) == TypeCode.String;
    }
}
```
  DataStore
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